OpenVSP model (file version 5), 7 components.
Geometry view with OpenVSP parameter names; values to 6 digits, angles in degrees, lengths in the model's unit.
Overall bounding box: X_Min=0 X_Len=601.92 Y_Min=-134.16 Y_Len=268.32 Z_Min=-47.5246 Z_Len=120.705

Fuselage "Fuselage"
  location (X Y Z) 0 0 0, rotation 0 0 0
  bounding box size 601.92 63.8146 50
  Design: Length=601.92
  cross sections:
    n  XLocPercent  YLocPercent  ZLocPercent  shape
    0  0            0            0            point
    1  0.5          0            0            ellipse Ellipse_Height=50 Ellipse_Width=50
    2  1            0            0            circle Circle_Diameter=45

Wing "Vstab-Upper"
  location (X Y Z) 465 0 13.1803, rotation 90 0 0
  bounding box size 125.391 35.3113 60
  totals: TotalSpan=60 TotalProjectedSpan=60 TotalChord=106.625 TotalArea=6397.5 TotalAR=0.56272
  root: chord 122.5, twist 0, edit curve Width=122.5 Height=37.91 AbsoluteFlag=0 SymType=0 linear points (X Y): 0.5 0, 0.5 -0.465726, -0.5 0, 0.5 0.465726, 0.5 0
  sections:
    n  Span  Root_Chord  Tip_Chord  Area    Sweep  Sweep_Location  Dihedral  Twist  Twist_Location  tip airfoil
    1  60    122.5       90.75      6397.5  30     0               0         0      0.25            edit curve Width=90.75 Height=37.91 AbsoluteFlag=0 SymType=0 linear points (X Y): 0.5 0, 0.5 -0.465726, -0.5 0, 0.5 0.465726, 0.5 0

Wing "Vstab-Lower"
  location (X Y Z) 462.705 0 -3.52459, rotation -90 0 0
  bounding box size 122 47.2374 44
  totals: TotalSpan=44 TotalProjectedSpan=44 TotalChord=109 TotalArea=4796 TotalAR=0.40367
  root: chord 122, twist 0, edit curve Width=122 Height=50.7137 AbsoluteFlag=0 SymType=0 linear points (X Y): 0.5 0, 0.5 -0.465726, -0.5 0, 0.5 0.465726, 0.5 0
  sections:
    n  Span  Root_Chord  Tip_Chord  Area  Sweep  Sweep_Location  Dihedral  Twist  Twist_Location  tip airfoil
    1  44    122         96         4796  30     0               0         0      0.25            edit curve Width=96 Height=50.7137 AbsoluteFlag=0 SymType=0 linear points (X Y): 0.5 0, 0.5 -0.465726, -0.5 0, 0.5 0.465726, 0.5 0

Wing "Hstab"
  location (X Y Z) 486.885 43.1967 0, rotation 0 0 -2
  symmetric about XZ
  bounding box size 103.952 213.31 20.472
  totals: TotalSpan=137 TotalProjectedSpan=132.332 TotalChord=54.775 TotalArea=7504.18 TotalAR=2.3336
  root: chord 84.27, twist 0, airfoil file "HSTAB ROOT"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 BaseThickChord=0.0500051 ThickChord=0.0500051
  sections:
    n  Span  Root_Chord  Tip_Chord  Area     Sweep  Sweep_Location  Dihedral  Twist  Twist_Location  tip airfoil
    1  68.5  84.27       25.28      3752.09  42     0.25            -15       0      0.25            airfoil file "HSTAB TIP"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 BaseThickChord=0.0500051 ThickChord=0.0500051

Wing "Wing"
  location (X Y Z) 278.557 0 0, rotation 0 0 0
  symmetric about XZ
  bounding box size 184 268.32 9.21392
  totals: TotalSpan=268.32 TotalProjectedSpan=268.32 TotalChord=109.89 TotalArea=29485.7 TotalAR=2.44171
  root: chord 184, twist 0, airfoil file "HSTAB ROOT"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 BaseThickChord=0.0500051 ThickChord=0.0500051
  sections:
    n  Span    Root_Chord  Tip_Chord  Area     Sweep  Sweep_Location  Dihedral  Twist  Twist_Location  tip airfoil
    1  134.16  184         35.78      14742.8  0      0.7             0         0      0.25            airfoil file "WING TIP"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 BaseThickChord=0.0500051 ThickChord=0.0500051

Fuselage "SideFairing"
  location (X Y Z) 100 0 0, rotation 0 0 0
  bounding box size 485 137.588 35
  Design: Length=485
  cross sections:
    n  XLocPercent  YLocPercent  ZLocPercent  shape
    0  0            0            0            point
    1  1            0            0            ellipse Ellipse_Height=35 Ellipse_Width=75

Fuselage "Cockpit"
  location (X Y Z) 65 0 15, rotation 0 -3 0
  bounding box size 180.224 20 40.9138
  Design: Length=180
  cross sections:
    n  XLocPercent  YLocPercent  ZLocPercent  shape
    0  0            0            -0.05        point
    1  0.5          0            0            ellipse Ellipse_Height=21 Ellipse_Width=20
    2  1            0            -0.1         point
