OpenVSP model (file version 4), 9 components.
Geometry view with OpenVSP parameter names; values to 6 digits, angles in degrees, lengths in the model's unit.
Overall bounding box: X_Min=0 X_Len=36.2587 Y_Min=-16.8659 Y_Len=33.7319 Z_Min=-3.0675 Z_Len=10.1526

Fuselage "Fuselage"
  location (X Y Z) 0 0 0, rotation 0 0 0
  bounding box size 36.2587 3.01 3.7
  Design: Length=36.2
  cross sections:
    n  XLocPercent  YLocPercent  ZLocPercent  shape
    0  0            0            -0.0165563   point
    1  0.0421734    0            -0.0124172   ellipse Ellipse_Height=2 Ellipse_Width=2.15
    2  0.128072     0            0            general fuselage BotStr=0.9 BotTanAngle=90 CornerRad=0 Height=3.7 LowStr=0.83 MaxWidthLoc=0.1 TopStr=0.856773 TopTanAngle=90 UpStr=0.83 Width=3.01
    3  0.681242     0            0            general fuselage BotStr=0.9 BotTanAngle=90 CornerRad=0 Height=3.5 LowStr=0.83 MaxWidthLoc=0.1 TopStr=0.856773 TopTanAngle=90 UpStr=0.83 Width=3.01
    4  0.896507     0            0.0149007    ellipse Ellipse_Height=1.78 Ellipse_Width=1.3
    5  0.981113     0            0.0232859    ellipse Ellipse_Height=0.8 Ellipse_Width=0.6
    6  1            0            0.0253863    circle Circle_Diameter=0.35
    7  1            0            0.0248344    point

Wing "Wing", child of "Fuselage"
  location (X Y Z) 9.67826 0 -1.3, rotation 0 1.1 0
  symmetric about XZ
  bounding box size 12.8755 33.7319 4.17278
  totals: TotalSpan=34.5845 TotalProjectedSpan=33.7 TotalChord=4.26125 TotalArea=131.269
  root: chord 9, twist 0, NACA 4-series Camber=0 CamberLoc=0.2 ThickChord=0.10989
  sections:
    n  Span     Root_Chord  Tip_Chord  Area     Sweep    Sweep_Location  Dihedral  Twist  Twist_Location  tip airfoil
    1  2.7991   9           5.05       19.6637  54.2364  0               10.4891   0      0.25            NACA 4-series Camber=0 CamberLoc=0.2 ThickChord=0.113636
    2  3.35459  5.05        3.83       14.8944  25.3727  0               10.8696   0      0.25            NACA 4-series Camber=0 CamberLoc=0.2 ThickChord=0.09
    3  5.56928  3.83        2.79       18.4343  26.6     0               11        0      0.25            NACA 4-series Camber=0 CamberLoc=0.2 ThickChord=0.07
    4  5.56928  2.79        1.75       12.6423  26.6     0               16.6304   0      0.25            NACA 4-series Camber=0 CamberLoc=0.2 ThickChord=0.0636364

Fuselage "Engine", child of "Wing"
  location (X Y Z) 11.3449 4.82 -1.66667, rotation 0 0 0; relative location 1.66667 4.82 -0.366667, rotation 0 0 0
  symmetric about XZ
  bounding box size 4.98806 12.2417 2.80166
  Design: Length=4.98806
  cross sections:
    n  XLocPercent  YLocPercent  ZLocPercent  shape
    0  1            0            0            point
    1  0            0            0            ellipse Ellipse_Height=2.1 Ellipse_Width=1.9
    2  0.679348     0            0            ellipse Ellipse_Height=1.95932 Ellipse_Width=1.65
    3  0.679348     0            0            circle Circle_Diameter=1.25
    4  1            0            0            point

Fuselage "fan", child of "Engine"
  location (X Y Z) 11.8449 4.82 -1.66667, rotation 0 0 0; relative location 0.5 0 0, rotation 0 0 0
  symmetric about XZ
  bounding box size 0.2 11.44 1.8
  Design: Length=0.2
  cross sections:
    n  XLocPercent  YLocPercent  ZLocPercent  shape
    0  0            0            0            point
    1  0            0            0            circle Circle_Diameter=1.8
    2  1            0            0            as above
    3  1            0            0            point

Pod "Hub", child of "fan"
  location (X Y Z) 11.6449 4.82 -1.66667, rotation 0 0 0; relative location -0.2 0 0, rotation 0 0 0
  symmetric about XZ
  bounding box size 1 10.0036 0.363636
  Design: FineRatio=5.5 Length=1

Wing "Pod", child of "Engine"
  location (X Y Z) 11.9449 4.82 -0.849275, rotation 90 0 -2.5; relative location 0.6 0 0.817391, rotation 90 0 -2.5
  symmetric about XZ
  bounding box size 5.10832 10.2538 0.702892
  totals: TotalSpan=1.24 TotalProjectedSpan=1.24 TotalChord=4.28906 TotalArea=5.43844
  root: chord 5, twist 0, NACA 4-series Camber=0 CamberLoc=0.2 ThickChord=0.122727
  sections:
    n  Span  Root_Chord  Tip_Chord  Area      Sweep  Sweep_Location  Dihedral  Twist  Twist_Location  tip airfoil
    1  0.35  5           5.07812    1.76367   0      0               0         0      0.25            NACA 4-series Camber=0 CamberLoc=0.2 ThickChord=0.0954545
    2  0.27  5.07812     2          0.955547  85     0               0         0      0.25            NACA 4-series Camber=0 CamberLoc=0.2 ThickChord=0.1

Wing "Stabilizer", child of "Fuselage"
  location (X Y Z) 30.0362 0 0.7, rotation 1.41304 0 0
  symmetric about XZ
  bounding box size 5.76646 9.69701 1.02453
  totals: TotalSpan=9.8 TotalProjectedSpan=9.72695 TotalChord=3.06736 TotalArea=23.2848
  root: chord 5.15281, twist 0, NACA 4-series Camber=0 CamberLoc=0.2 ThickChord=0.1
  sections:
    n  Span      Root_Chord  Tip_Chord  Area     Sweep    Sweep_Location  Dihedral  Twist  Twist_Location  tip airfoil
    1  0.818722  5.15281     3.05859    3.36143  66.5455  0               7         0      0.25            as above
    2  4.08128   3.05859     0.999437   8.28098  35.2091  0               7         0      0.25            as above

Wing "Fin", child of "Stabilizer"
  location (X Y Z) 28.7875 0 0.7, rotation 90 0 0
  bounding box size 7.38986 0.58335 6.38513
  totals: TotalSpan=6.38513 TotalProjectedSpan=6.38513 TotalChord=3.8355 TotalArea=24.4901
  root: chord 5.83164, twist 0, NACA 4-series Camber=0 CamberLoc=0.2 ThickChord=0.1
  sections:
    n  Span     Root_Chord  Tip_Chord  Area     Sweep  Sweep_Location  Dihedral  Twist  Twist_Location  tip airfoil
    1  6.38513  5.83164     1.83935    24.4901  41     0               0         0      0.25            as above

Fuselage "Belly fairing", child of "Fuselage"
  location (X Y Z) 8.58696 0 -0.652174, rotation 0 0 0
  bounding box size 15.1364 3.3 2.5
  Design: Length=15.1364
  cross sections:
    n  XLocPercent  YLocPercent  ZLocPercent  shape
    0  0            0            -0.0198198   point
    1  0.209239     0            -0.0198198   general fuselage BotStr=0.83 BotTanAngle=90 CornerRad=0 Height=2 LowStr=0.83 MaxWidthLoc=-0.2 TopStr=1.18118 TopTanAngle=90 UpStr=0.83 Width=2.8
    2  0.5          0            -0.0217391   general fuselage BotStr=0.840136 BotTanAngle=90 CornerRad=0 Height=2.5 LowStr=0.83 MaxWidthLoc=-0.372727 TopStr=1.23469 TopTanAngle=90 UpStr=0.249545 Width=3.3
    3  0.75         0            -0.0230399   general fuselage BotStr=0.83 BotTanAngle=90 CornerRad=0 Height=2 LowStr=0.83 MaxWidthLoc=-0.154545 TopStr=0.83 TopTanAngle=90 UpStr=0.83 Width=2.8
    4  1            0            0            point
