OpenVSP model (file version 4), 11 components.
Geometry view with OpenVSP parameter names; values to 6 digits, angles in degrees, lengths in the model's unit.
Overall bounding box: X_Min=0 X_Len=21.9839 Y_Min=-13.0063 Y_Len=26.0126 Z_Min=-0.75 Z_Len=6.54667

Fuselage "FuselageGeom"
  location (X Y Z) 0 0 0, rotation 0 0 0
  bounding box size 21.3228 2.73817 2.54651
  Design: Length=21.3
  cross sections:
    n  XLocPercent  YLocPercent  ZLocPercent  shape
    0  0            0            -0.01362     point
    1  0.0282153    0            -0.00798122  ellipse Ellipse_Height=1 Ellipse_Width=1
    2  0.112676     0            0.0164319    ellipse Ellipse_Height=2.2 Ellipse_Width=2.35
    3  0.158543     0            0.0234742    general fuselage BotStr=0.881727 BotTanAngle=90 CornerRad=0 Height=2.5 LowStr=0.83 MaxWidthLoc=-0.104072 TopStr=1.03507 TopTanAngle=90 UpStr=0.83 Width=2.69
    4  0.586854     0            0.0234742    as above
    5  0.828049     0            0.0356808    ellipse Ellipse_Height=1.9 Ellipse_Width=1.5
    6  1            0            0.0657277    circle Circle_Diameter=0.3
    7  1            0            0.0657277    point

Wing "Wing", child of "FuselageGeom"
  location (X Y Z) 8.5 0 1.6, rotation 0 0 0
  symmetric about XZ
  bounding box size 2.65 26.0126 0.57154
  totals: TotalSpan=25.89 TotalProjectedSpan=25.8798 TotalChord=2.32499 TotalArea=57.7314
  root: chord 2.65, twist 0, NACA 4-series Camber=0 CamberLoc=0.2 ThickChord=0.159091
  sections:
    n  Span     Root_Chord  Tip_Chord  Area     Sweep  Sweep_Location  Dihedral  Twist  Twist_Location  tip airfoil
    1  4.57811  2.65        2.65       12.132   0      0               0         0      0.25            as above
    2  8.36689  2.65        1.34998    16.7337  4.5    0               2         0      0.25            NACA 4-series Camber=0 CamberLoc=0.2 ThickChord=0.1

Fuselage "Engines", child of "Wing"
  location (X Y Z) 6.22 4.08112 1.2, rotation 0 0 0
  symmetric about XZ
  bounding box size 6.42327 9.39452 1.35675
  Design: Length=6.42327
  cross sections:
    n  XLocPercent  YLocPercent  ZLocPercent  shape
    0  0            0            -0.0105932   point
    1  0.148305     0            -0.0105932   circle Circle_Diameter=0.75
    2  0.148305     0            -0.0402542   general fuselage BotStr=0.83 BotTanAngle=90 CornerRad=0 Height=1.15 LowStr=1.4 MaxWidthLoc=0 TopStr=0.83 TopTanAngle=90 UpStr=1.1 Width=0.9
    3  0.3          0            -0.0317797   general fuselage BotStr=0.83 BotTanAngle=90 CornerRad=0 Height=1.3 LowStr=1.4 MaxWidthLoc=0 TopStr=0.83 TopTanAngle=90 UpStr=1.35147 Width=1.1
    4  0.65         0            -0.0169492   general fuselage BotStr=0.83 BotTanAngle=90 CornerRad=0 Height=1.2 LowStr=1.4 MaxWidthLoc=0 TopStr=0.83 TopTanAngle=90 UpStr=1.52337 Width=0.95
    5  1            0            0.0311368    point

Propeller "Prop", child of "Engines"
  location (X Y Z) 6.57 4.081 1.15, rotation 0 0 0
  symmetric about XZ
  bounding box size 0.212374 11.9352 3.77318
  Design: Diameter=3.96 NumBlade=4 Beta34=20 UseBeta34Flag=1 Feather=0 Rotate=21.6495 ReverseFlag=0 FoldAngle=0 AF=152.507
  cross sections:
    n  RadiusFrac  shape
    0  0           circle Circle_Diameter=0.1584
    1  0.45        NACA 4-series Camber=0.05 CamberLoc=0.4 Chord=0.378366 ThickChord=0.12
    2  0.7         NACA 4-series Camber=0.05 CamberLoc=0.4 Chord=0.396 ThickChord=0.05
    3  1           NACA 4-series Camber=0.01 CamberLoc=0.4 Chord=0.2574 ThickChord=0.03
  Chord along r/R (cubic Bezier): 0: 0.08, 0.2: 0.15, 0.4: 0.2, 0.6: 0.2, 0.716667: 0.2, 0.833333: 0.2, 0.95: 0.2, 0.966667: 0.2, 0.983333: 0.2, 1: 0.13
  Twist along r/R (PCHIP): 0: 46.75, 0.75: 20, 1: 13

Fuselage "Wingbox", child of "FuselageGeom"
  location (X Y Z) 6.35135 0 0.7, rotation 0 0 0
  bounding box size 7 2.66449 1.91559
  Design: Length=7
  cross sections:
    n  XLocPercent  YLocPercent  ZLocPercent  shape
    0  0            0            0            point
    1  0.171429     0            0.025        rounded rectangle RoundRectXSec_Radius=0.3 RoundedRect_Height=1 RoundedRect_Width=2.3
    2  0.3          0            0.0357143    rounded rectangle RoundRectXSec_Radius=0.2 RoundedRect_Height=1.5 RoundedRect_Width=2.6
    3  0.657143     0            0.0214286    rounded rectangle RoundRectXSec_Radius=0.3 RoundedRect_Height=1.5 RoundedRect_Width=2.6
    4  0.885714     0            0.0257143    rounded rectangle RoundRectXSec_Radius=0.25 RoundedRect_Height=0.5 RoundedRect_Width=2.28
    5  1            0            0.0142857    point

Wing "Fin", child of "FuselageGeom"
  location (X Y Z) 16.6 0 1.7, rotation 90 0 -1.89189
  bounding box size 5.38392 0.390259 4.23197
  totals: TotalSpan=4.22224 TotalProjectedSpan=4.22224 TotalChord=2.47314 TotalArea=14.12
  root: chord 4.09831, twist 0, NACA 4-series Camber=0 CamberLoc=0.2 ThickChord=0.0950226
  sections:
    n  Span      Root_Chord  Tip_Chord  Area      Sweep    Sweep_Location  Dihedral  Twist  Twist_Location  tip airfoil
    1  3.90593   4.09831     2.89712    13.6618   31.1485  0               0         0      0.25            NACA 4-series Camber=0 CamberLoc=0.2 ThickChord=0.104072
    2  0.316313  2.89712     0          0.458198  77.0269  0               0         0      0.25            NACA 4-series Camber=0 CamberLoc=0.2 ThickChord=0.131818

Wing "Stab", child of "Fin"
  location (X Y Z) 19.6018 0 5.4, rotation 0 0 0
  symmetric about XZ
  bounding box size 2.08856 7.82149 0.209299
  totals: TotalSpan=7.66828 TotalProjectedSpan=7.66828 TotalChord=1.81788 TotalArea=13.94
  root: chord 2.08856, twist 0, NACA 4-series Camber=0 CamberLoc=0.2 ThickChord=0.1
  sections:
    n  Span     Root_Chord  Tip_Chord  Area  Sweep  Sweep_Location  Dihedral  Twist  Twist_Location  tip airfoil
    1  3.83414  2.08856     1.54719    6.97  8      0               0         0      0.25            as above

Wing "dorsal", child of "Fin"
  location (X Y Z) 18.1377 0 2.8, rotation -90 0 90
  symmetric about XZ
  bounding box size 6.97445 0.272069 2.10973
  totals: TotalSpan=13.9489 TotalProjectedSpan=13.9489 TotalChord=1.375 TotalArea=19.1797
  root: chord 1.75, twist 0, NACA 4-series Camber=0 CamberLoc=0.2 ThickChord=0.126697
  sections:
    n  Span     Root_Chord  Tip_Chord  Area     Sweep    Sweep_Location  Dihedral  Twist  Twist_Location  tip airfoil
    1  6.97445  1.75        1          9.58987  9.04072  0               0         0      0.25            NACA 4-series Camber=0 CamberLoc=0.2 ThickChord=0.271493

Fuselage "Cabin", child of "FuselageGeom"
  location (X Y Z) 3.4 0 0.65, rotation 0 0 0
  bounding box size 9.12 2.49 1.95076
  Design: Length=9.12
  cross sections:
    n  XLocPercent  YLocPercent  ZLocPercent  shape
    0  0            0            0            point
    1  0            0            0            general fuselage BotStr=1.41286 BotTanAngle=83.8636 CornerRad=0 Height=1.94 LowStr=1.23426 MaxWidthLoc=-0.226242 TopStr=0.995307 TopTanAngle=90 UpStr=0.83 Width=2.49
    2  1            0            0            as above
    3  1            0            0            point

SeatGroup "SeatGroup", child of "Cabin"
  location (X Y Z) 12.05 -0.9 0, rotation 0 -90 0
  bounding box size 6.85436 2.31 0.783654
  Design: BackAngle=25 BackHeight=0.4 BackThick=0.1 SeatHeight=0.35 SeatLength=0.4 Width=0.44
  Layout: AisleWidth=0.4 NumLeft=2 NumMiddle=0 NumRight=2 NumRow=9 SeatGap=0.05 SeatPitch=0.78
  custom script SeatGroup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

Fuselage "Cargo", child of "FuselageGeom"
  location (X Y Z) 12.52 0 0.65, rotation 0 0 0
  bounding box size 2.25 2.49 1.95076
  Design: Length=2.25
  cross sections:
    n  XLocPercent  YLocPercent  ZLocPercent  shape
    0  0            0            0            point
    1  0            0            0            general fuselage BotStr=1.41286 BotTanAngle=83.8636 CornerRad=0 Height=1.94 LowStr=1.23426 MaxWidthLoc=-0.226242 TopStr=0.995307 TopTanAngle=90 UpStr=0.83 Width=2.49
    2  1            0            0            general fuselage BotStr=1.41286 BotTanAngle=83.8636 CornerRad=0 Height=1.94 LowStr=1.23426 MaxWidthLoc=-0.226242 TopStr=0.995307 TopTanAngle=90 UpStr=0.83 Width=2.15
    3  1            0            0            point
