OpenVSP model (file version 5), 20 components.
Geometry view with OpenVSP parameter names; values to 6 digits, angles in degrees, lengths in the model's unit.
Overall bounding box: X_Min=-1.25 X_Len=17.299 Y_Min=-9.94649 Y_Len=19.893 Z_Min=-3.70943 Z_Len=6.08652

Wing "WingGeom"
  location (X Y Z) 4 0 -1.4, rotation 0 0 0
  symmetric about XZ
  bounding box size 4.00017 19.893 0.954652
  totals: TotalSpan=19.9 TotalProjectedSpan=19.8686 TotalChord=3.625 TotalArea=69.925 TotalAR=5.64548
  root: chord 4, twist 0, airfoil file "AS5046 (16%)"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 BaseThickChord=0.160118 ThickChord=0.160118
  sections:
    n  Span  Root_Chord  Tip_Chord  Area     Sweep  Sweep_Location  Dihedral  Twist  Twist_Location  tip airfoil
    1  3.5   4           4          14       0      0               0         0      0               as above
    2  6.45  4           2.5        20.9625  5      0               4         0      1               as above

Custom "SparFwdCenter", child of "WingGeom"
  location (X Y Z) 4.95 -3.5 -1.374, rotation 0 0 90; relative location 0.95 -3.5 0.026, rotation 0 0 90
  bounding box size 0.34375 7 0.61
  Design: Height=0.61 Length=7 SquareFlag=0 Width=0.34375
  custom script Box0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

Custom "SparAftCenter", child of "WingGeom"
  location (X Y Z) 6.8958 -3.5 -1.408, rotation 0 0 90; relative location 2.8958 -3.5 -0.008, rotation 0 0 90
  bounding box size 0.09375 7 0.3275
  Design: Height=0.3275 Length=7 SquareFlag=0 Width=0.09375
  custom script Box0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

Custom "Male90Pct", child of "WingGeom"
  location (X Y Z) 7.4 -0.714286 1.25, rotation 0 -65 180; relative location 3.4 -0.714286 2.65, rotation 0 -65 180
  bounding box size 4.5798 1.78806 3.12128
  Angles: Head_XAng=0 Head_YAng=7.55212 Head_ZAng=0 LL_Arm_XAng=0 LL_Arm_YAng=68.75 LL_Leg_YAng=-61 LR_Arm_XAng=0 LR_Arm_YAng=68.75 LR_Leg_YAng=-61 L_Foot_XAng=0 L_Foot_YAng=0 L_Foot_ZAng=0 L_Hand_ZAng=0 R_Foot_XAng=0 R_Foot_YAng=0 R_Foot_ZAng=0 R_Hand_ZAng=0 UL_Arm_YAng=8.325 UL_Arm_ZAng=0 UL_Leg_YAng=90 UL_Leg_ZAng=0 UR_Arm_YAng=8.325 UR_Arm_ZAng=0 UR_Leg_YAng=90 UR_Leg_ZAng=0
  Design: Height=6 Trigger=0 UnitMult=0.00328084 Units=1
  custom script Male90Pct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

Fuselage "FuselageGeom"
  location (X Y Z) 0 0 -0.64, rotation 0 0 0
  bounding box size 14.51 4.41945 4.00927
  Design: Length=14.3451
  cross sections:
    n  XLocPercent  YLocPercent  YRotate  ZLocPercent  shape
    0  0            0            0        0            circle Circle_Diameter=1.07454
    1  0.0121836    0            0        -0.00374532  general fuselage BotStr=1.49193 BotTanAngle=90 CornerRad=0 Height=1.32125 LowStr=0.83 MaxWidthLoc=0.064 TopStr=1.49193 TopTanAngle=90 UpStr=0.83 Width=2.86544
    2  0.337079     0            0        -0.0108696   general fuselage BotStr=1.62598 BotTanAngle=90 CornerRad=0 Height=2.47144 LowStr=0.881263 MaxWidthLoc=0.136364 TopStr=1.62115 TopTanAngle=90 UpStr=0.795861 Width=3.40263
    3  0.575007     0            14       0.02397      general fuselage BotStr=1.43976 BotTanAngle=90 CornerRad=0 Height=3.11616 LowStr=1.57502 MaxWidthLoc=0.0844221 TopStr=1.34055 TopTanAngle=90 UpStr=1.18627 Width=3.40263
    4  1            0            17       0.000118147  general fuselage BotStr=1.83 BotTanAngle=90 CornerRad=0 Height=0.920815 LowStr=1.69206 MaxWidthLoc=0 TopStr=1.32422 TopTanAngle=90 UpStr=0.83 Width=0.268634

Wing "HorizonalStabalizer"
  location (X Y Z) 12.4762 0 -0.35, rotation 0 0 0
  symmetric about XZ
  bounding box size 2.35378 7.29348 0.213221
  totals: TotalSpan=7.29348 TotalProjectedSpan=7.29348 TotalChord=1.96172 TotalArea=14.3078 TotalAR=3.7179
  root: chord 2.35397, twist -0.75, NACA 4-series Camber=0 CamberLoc=0.2 ThickChord=0.09
  sections:
    n  Span     Root_Chord  Tip_Chord  Area     Sweep    Sweep_Location  Dihedral  Twist  Twist_Location  tip airfoil
    1  3.64674  2.35397     1.56947    7.15388  8.19375  0               0         0      0.25            NACA 4-series Camber=0 CamberLoc=0.2 ThickChord=0.1

Wing "VertFin", child of "HorizonalStabalizer"
  location (X Y Z) 12.35 0 -1.05, rotation 90 0 0
  bounding box size 3.69899 0.309141 3.42709
  totals: TotalSpan=3.42709 TotalProjectedSpan=3.42709 TotalChord=2.10535 TotalArea=8.2503 TotalAR=1.42358
  root: chord 3.08961, twist 0, NACA 4-series Camber=0 CamberLoc=0.2 ThickChord=0.1
  sections:
    n  Span      Root_Chord  Tip_Chord  Area     Sweep  Sweep_Location  Dihedral  Twist  Twist_Location  tip airfoil
    1  1.60514   3.08961     2.53391    4.51326  31     0               0         0      0.25            as above
    2  0.871952  2.53391     2.13422    2.03519  31     0               0         0      0.25            as above
    3  0.7       2.13422     1.79       1.37348  31     0               0         0      0.25            as above
    4  0.25      1.79        0.836957   0.32837  31     0               0         0      0.25            as above

Stack "Spinner"
  location (X Y Z) -1.25 0 -0.64, rotation 0 0 0
  bounding box size 1.25 1 1
  mass: Density=1 Shell_Flag=1 Mass_Area=1 Mass_Prior=0
  cross sections:
    n  XDelta  YDelta  ZDelta  shape
    0  0       0       0       point
    1  1.25    0       0       circle Circle_Diameter=1

Custom "Disk"
  location (X Y Z) 0 0 -0.64, rotation 0 0 0
  bounding box size 0 3.5 3.5
  Design: Diameter=3.5
  custom script Disk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

Stack "Wheels"
  location (X Y Z) 3.86 2.3913 -3.25, rotation 0 0 90
  symmetric about XZ
  bounding box size 0.918859 5.93118 0.918859
  cross sections:
    n  XDelta    YDelta  ZDelta  shape
    0  0         0       0       point
    1  0         0       0       circle Circle_Diameter=0.918859
    2  0.574287  0       0       as above
    3  0         0       0       point

Stack "TailWheel", child of "Wheels"
  location (X Y Z) 15.5 0 -1.63043, rotation 0 0 90
  bounding box size 0.25 0.08333 0.25
  cross sections:
    n  XDelta   YDelta  ZDelta  shape
    0  0        0       0       circle Circle_Diameter=0.25
    1  0.08333  0       0       as above

Stack "Wheel_Pants"
  location (X Y Z) 2.68261 -2.65 -3.04348, rotation 0 0 0
  symmetric about XZ
  bounding box size 2.98638 6.31143 0.969363
  cross sections:
    n  XDelta    YDelta  ZDelta  shape
    0  0         0       0       point
    1  1.22261   0       0       super ellipse Super_Height=0.969363 Super_M=2 Super_MaxWidthLoc=0 Super_N=2 Super_Width=1.01143
    2  0.942012  0       0       super ellipse Super_Height=0.529611 Super_M=2 Super_MaxWidthLoc=0 Super_N=2.62182 Super_Width=0.407402
    3  0.821755  0       0       point

Stack "LandingGear"
  location (X Y Z) 3.25 0 -1.52174, rotation 0.951087 0.108696 90
  symmetric about XZ
  bounding box size 1.15292 5.04451 1.58704
  cross sections:
    n  XDelta   XRotate    YDelta     YRotate  ZDelta    shape
    0  0        0          0          0        0         super ellipse Super_Height=0.2 Super_M=2.6 Super_MaxWidthLoc=0 Super_N=2 Super_Width=0.5
    1  1.40984  0          0          0        0         as above
    2  0.99     -0.818182  -0.655738  80.1818  -1.47541  as above

Stack "TailGear", child of "LandingGear"
  location (X Y Z) 12.9891 0 -0.652174, rotation 0 20 0
  bounding box size 2.45476 0.08333 0.961389
  cross sections:
    n  XDelta   YDelta  ZDelta  shape
    0  0        0       0       circle Circle_Diameter=0.08333
    1  2.58197  0       0       as above

Stack "Case"
  location (X Y Z) 0 0 -0.64, rotation 0 0 0
  bounding box size 1.84061 0.75 1.19045
  cross sections:
    n   XDelta     YDelta  ZDelta     shape
    0   0          0       0          point
    1   0          0       0          circle Circle_Diameter=0.470584
    2   0.0180521  0       0          circle Circle_Diameter=0.469353
    3   0.0180521  0       0          circle Circle_Diameter=0.178059
    4   0.0439464  0       0          as above
    5   0          0       0          circle Circle_Diameter=0.344406
    6   0.157586   0       -0.147968  ellipse Ellipse_Height=0.833827 Ellipse_Width=0.63833
    7   0.261163   0       0.0591871  rounded rectangle RoundRectXSec_Radius=0.15 RoundedRect_Height=0.98431 RoundedRect_Width=0.75
    8   0.941814   0       0          rounded rectangle RoundRectXSec_Radius=0.156221 RoundedRect_Height=0.98431 RoundedRect_Width=0.75
    9   0          0       0          rounded rectangle RoundRectXSec_Radius=0 RoundedRect_Height=1.19045 RoundedRect_Width=0.701081
    10  0.4        0       0          rounded rectangle RoundRectXSec_Radius=0.288506 RoundedRect_Height=1.19045 RoundedRect_Width=0.701081
    11  0          0       0          point

Stack "StackGeom", child of "Case"
  location (X Y Z) 0.94 0 -1.17, rotation 0 90 0; relative location 0.94 0 -0.53, rotation 0 90 0
  bounding box size 0.605175 0.463147 0.981777
  cross sections:
    n  XDelta    YDelta  ZDelta     shape
    0  0         0       0          rounded rectangle RoundRectXSec_Radius=0.2 RoundedRect_Height=0.42598 RoundedRect_Width=0.42598
    1  0.161266  0       0          as above
    2  0         0       0          circle Circle_Diameter=0.162253
    3  0.111333  0       0          as above
    4  0         -0.04   0.0887705  rounded rectangle RoundRectXSec_Radius=0.137173 RoundedRect_Height=0.445812 RoundedRect_Width=0.420314
    5  0.361     0       0          as above
    6  0         0.04    0.0361     rounded rectangle RoundRectXSec_Radius=0.137173 RoundedRect_Height=0.53463 RoundedRect_Width=0.274346
    7  0.261133  0       0          as above
    8  0         0       0          point

Stack "IntakeFilter", child of "StackGeom"
  location (X Y Z) 0.49 0 -1.93087, rotation 0 -39.7283 0; relative location -0.45 0 -0.76087, rotation 0 -39.7283 0
  bounding box size 0.533912 0.603526 0.464163
  cross sections:
    n  XDelta    YDelta  YRotate  ZDelta     shape
    0  0         0       0        0          rounded rectangle RoundRectXSec_Radius=0 RoundedRect_Height=0.462091 RoundedRect_Width=0.462091
    1  0.264965  0       36       -0.274262  circle Circle_Diameter=0.220382

Stack "OilSump", child of "Case"
  location (X Y Z) 1.5587 -0.55 -1.69, rotation 0 0 90; relative location 1.5587 -0.55 -1.05, rotation 0 0 90
  bounding box size 0.656557 1.14112 0.611681
  cross sections:
    n  XDelta    YDelta  ZDelta  shape
    0  0         0       0       point
    1  0.52331   0       0       super ellipse Super_Height=0.598191 Super_M=1.4 Super_MaxWidthLoc=0 Super_N=2.70909 Super_Width=0.564539
    2  0.617808  0       0       point

Stack "Starter", child of "Case"
  location (X Y Z) 1.8387 0 -0.19, rotation 0 0 0; relative location 1.8387 0 0.45, rotation 0 0 0
  bounding box size 0.602847 0.32923 0.32923
  cross sections:
    n  XDelta     YDelta  ZDelta  shape
    0  0          0       0       circle Circle_Diameter=0.318977
    1  0.525902   0       0       circle Circle_Diameter=0.32923
    2  0          0       0       circle Circle_Diameter=0.100115
    3  0.0602596  0       0       as above
    4  0          0       0       point

Stack "Magneto", child of "Starter"
  location (X Y Z) 1.8387 0 -0.69913, rotation 0 0 0; relative location 0 0 -0.50913, rotation 0 0 0
  bounding box size 0.412218 0.325972 0.418659
  cross sections:
    n  XDelta     YDelta  ZDelta     shape
    0  0          0       0          circle Circle_Diameter=0.31582
    1  0.0867828  0       0.0542392  rounded rectangle RoundRectXSec_Radius=0.146379 RoundedRect_Height=0.413019 RoundedRect_Width=0.325972
    2  0.271196   0       0          rounded rectangle RoundRectXSec_Radius=0.0445124 RoundedRect_Height=0.387241 RoundedRect_Width=0.274184
    3  0          0       0.0271196  circle Circle_Diameter=0.216855
    4  0.0542392  0       0          circle Circle_Diameter=0.216713
