OpenVSP model (file version 4), 16 components.
Geometry view with OpenVSP parameter names; values to 6 digits, angles in degrees, lengths in the model's unit.
Overall bounding box: X_Min=-0.025 X_Len=6.19172 Y_Min=-5.05169 Y_Len=10.1034 Z_Min=-1.05032 Z_Len=2.67461

Fuselage "Fuselage"
  location (X Y Z) 0.23 0 0, rotation 0 0 0
  bounding box size 3.98 1.26552 1.24205
  Design: Length=3.98
  cross sections:
    n  XLocPercent  YLocPercent  ZLocPercent  shape
    0  0            0            -0.0376884   point
    1  0.0150754    0            -0.0376884   general fuselage BotStr=0.83 BotTanAngle=90 CornerRad=0 Height=0.2 LowStr=0.83 MaxWidthLoc=0 TopStr=1.12295 TopTanAngle=90 UpStr=0.83 Width=0.2
    2  0.194997     0            -0.0577889   general fuselage BotStr=1.0065 BotTanAngle=90 CornerRad=0 Height=0.78 LowStr=0.633893 MaxWidthLoc=0 TopStr=0.940091 TopTanAngle=90 UpStr=1.50966 Width=1.15
    3  0.341709     0            -0.0502513   general fuselage BotStr=0.989864 BotTanAngle=90 CornerRad=0 Height=0.89 LowStr=0.83 MaxWidthLoc=0 TopStr=1.6285 TopTanAngle=90 UpStr=0.83 Width=1.15
    4  0.605043     0            0.00502513   general fuselage BotStr=0.83 BotTanAngle=90 CornerRad=0 Height=1.15 LowStr=0.83 MaxWidthLoc=0 TopStr=1.06364 TopTanAngle=90 UpStr=1.375 Width=1.15
    5  0.813254     0            0.0276382    general fuselage BotStr=0.83 BotTanAngle=90 CornerRad=0 Height=0.88 LowStr=0.83 MaxWidthLoc=0 TopStr=0.8 TopTanAngle=90 UpStr=1.375 Width=1.15
    6  0.984925     0            0.0816583    circle Circle_Diameter=0.22
    7  1            0            0.0807297    point

Wing "Wing-long"
  location (X Y Z) 2.28 0 0.26, rotation 0 0 0
  symmetric about XZ
  bounding box size 3.88672 10.1034 1.52586
  totals: TotalSpan=12.1485 TotalProjectedSpan=9.85 TotalChord=0.840853 TotalArea=12.3022
  root: chord 1.9, twist 0, NACA 4-series Camber=0 CamberLoc=0.2 ThickChord=0.17
  sections:
    n  Span      Root_Chord  Tip_Chord  Area       Sweep    Sweep_Location  Dihedral  Twist  Twist_Location  tip airfoil
    1  0.784802  1.9         1.3        1.25568    30.0455  0               0         0      0.25            NACA 4-series Camber=0 CamberLoc=0.2 ThickChord=0.16
    2  3.66674   1.3         0.864267   3.9679     29.9     0               -0.7      0      0.25            NACA 4-series Camber=0 CamberLoc=0.2 ThickChord=0.13
    3  0.57901   0.864267    0.65       0.438388   35       0               58        0      0.25            NACA 4-series Camber=0 CamberLoc=0.2 ThickChord=0.131818
    4  0.939909  0.65        0.33       0.460556   30.3636  0               73.2609   0      0.25            NACA 4-series Camber=0 CamberLoc=0.2 ThickChord=0.172727
    5  0.103806  0.33        0.22       0.0285465  55       0               180       0      0.25            NACA 4-series Camber=0 CamberLoc=0.2 ThickChord=0.1

Wing "Wing-short", child of "Wing-long"
  location (X Y Z) 0.75 0 -0.15, rotation 0 0 0
  symmetric about XZ
  bounding box size 0.98 6.93719 0.278736
  totals: TotalSpan=7.14291 TotalProjectedSpan=6.9 TotalChord=0.61 TotalArea=5.57972
  root: chord 0.98, twist 0, NACA 4-series Camber=0 CamberLoc=0.2 ThickChord=0.17
  sections:
    n  Span      Root_Chord  Tip_Chord  Area       Sweep    Sweep_Location  Dihedral  Twist  Twist_Location  tip airfoil
    1  3.33567   0.98        0.62       2.66854    1.68182  0               0         0      0.25            NACA 4-series Camber=0 CamberLoc=0.2 ThickChord=0.14
    2  0.11701   0.62        0.53       0.0672806  30       0               -40       0      0.25            NACA 4-series Camber=0 CamberLoc=0.2 ThickChord=0.11
    3  0.118778  0.53        0.38       0.0540438  45       0               -78       0      0.25            NACA 4-series Camber=0 CamberLoc=0.2 ThickChord=0.1

Pod "Pod back"
  location (X Y Z) 4.48 0 0.3213, rotation 0 0 180
  bounding box size 1.33333 0.266667 0.266667
  Design: FineRatio=10 Length=1.33333

Pod "Pod forward", child of "Pod back"
  location (X Y Z) -0.025 0 -0.15, rotation 0 0 0
  bounding box size 1.33333 0.283186 0.283186
  Design: FineRatio=9.41667 Length=1.33333

Propeller "Prop forward"
  location (X Y Z) 0.2 0 -0.15, rotation 0 0 0
  bounding box size 0.0830826 1.25632 1.43768
  Design: Diameter=1.6 NumBlade=3 Beta34=20 UseBeta34Flag=1 Feather=0 Rotate=0 ReverseFlag=0 FoldAngle=0 AF=151.973
  cross sections:
    n  RadiusFrac  shape
    0  0.136957    circle Circle_Diameter=0.064
    1  0.45        NACA 4-series Camber=0.05 CamberLoc=0.4 Chord=0.148223 ThickChord=0.12
    2  0.7         NACA 4-series Camber=0.05 CamberLoc=0.4 Chord=0.16 ThickChord=0.05
    3  1           NACA 4-series Camber=0.01 CamberLoc=0.4 Chord=0.104 ThickChord=0.03
  Chord along r/R (cubic Bezier): 0.136957: 0.08, 0.291304: 0.15, 0.445652: 0.2, 0.6: 0.2, 0.716667: 0.2, 0.833333: 0.2, 0.95: 0.2, 0.966667: 0.2, 0.983333: 0.2, 1: 0.13
  Twist along r/R (PCHIP): 0.136957: 46.75, 0.75: 20, 1: 13

Propeller "Prop back"
  location (X Y Z) 4.25 0 0.3213, rotation 0 0 0
  bounding box size 0.0843203 1.25631 1.43768
  Design: Diameter=1.6 NumBlade=3 Beta34=20 UseBeta34Flag=1 Feather=0 Rotate=0 ReverseFlag=0 FoldAngle=0 AF=152.229
  cross sections:
    n  RadiusFrac  shape
    0  0.0831522   circle Circle_Diameter=0.064
    1  0.45        NACA 4-series Camber=0.05 CamberLoc=0.4 Chord=0.150479 ThickChord=0.12
    2  0.7         NACA 4-series Camber=0.05 CamberLoc=0.4 Chord=0.16 ThickChord=0.05
    3  1           NACA 4-series Camber=0.01 CamberLoc=0.4 Chord=0.104 ThickChord=0.03
  Chord along r/R (cubic Bezier): 0.0831522: 0.08, 0.255435: 0.15, 0.427717: 0.2, 0.6: 0.2, 0.716667: 0.2, 0.833333: 0.2, 0.95: 0.2, 0.966667: 0.2, 0.983333: 0.2, 1: 0.13
  Twist along r/R (PCHIP): 0.0831522: 46.75, 0.75: 20, 1: 13

Fuselage "Gear landing"
  location (X Y Z) 2.75 -0.25 -0.317391, rotation -47.2283 90 0
  symmetric about XZ
  bounding box size 0.1 1.75037 0.630196
  Design: Length=0.85
  cross sections:
    n  XLocPercent  YLocPercent  ZLocPercent  ZRotate   shape
    0  0            0            0            0         point
    1  0.25         0            0            0         general fuselage BotStr=0.83 BotTanAngle=90 CornerRad=0 Height=0.1 LowStr=0.83 MaxWidthLoc=0 TopStr=0.83 TopTanAngle=90 UpStr=0.83 Width=0.1
    2  0.5          0            0            0         general fuselage BotStr=0.8235 BotTanAngle=90 CornerRad=0 Height=0.1 LowStr=0.815182 MaxWidthLoc=0 TopStr=0.840136 TopTanAngle=90 UpStr=0.806864 Width=0.1
    3  0.875        0            0            0         as above
    4  1            0            0            -44.1818  ellipse Ellipse_Height=0.1 Ellipse_Width=0.1

BodyOfRevolution "Wheel", child of "Gear landing"
  location (X Y Z) 2.75 0.84 -0.9, rotation 0 0 90
  symmetric about XZ
  bounding box size 0.300638 1.88175 0.300638
  Design: A0=0.0254469 Ae=0.0362138 Amin=0.00744337 AminW=0.276967 Angle=-10 Diameter=0.18 Mode=0
  profile: circle Circle_Diameter=0.1

Fuselage "Disk", child of "Wheel"
  location (X Y Z) 2.75 0.85 -0.9, rotation 0 0 90
  symmetric about XZ
  bounding box size 0.22 1.76 0.22
  Design: Length=0.03
  cross sections:
    n  XLocPercent  YLocPercent  ZLocPercent  shape
    0  0            0            0            point
    1  0            0            0            circle Circle_Diameter=0.2
    2  1            0            0            as above
    3  1            0            0            point

Fuselage "Gear landing"
  location (X Y Z) 1.03333 0 -0.1, rotation 0 90 0
  bounding box size 0.1 0.1 0.7
  Design: Length=0.7
  cross sections:
    n  XLocPercent  YLocPercent  ZLocPercent  shape
    0  0            0            0            point
    1  0.25         0            0            general fuselage BotStr=0.83 BotTanAngle=90 CornerRad=0 Height=0.1 LowStr=0.83 MaxWidthLoc=0 TopStr=0.83 TopTanAngle=90 UpStr=0.83 Width=0.1
    2  0.5          0            0            general fuselage BotStr=0.8235 BotTanAngle=90 CornerRad=0 Height=0.1 LowStr=0.815182 MaxWidthLoc=0 TopStr=0.840136 TopTanAngle=90 UpStr=0.806864 Width=0.1
    3  1            0            0            general fuselage BotStr=0.83 BotTanAngle=90 CornerRad=0 Height=0.1 LowStr=0.83 MaxWidthLoc=0 TopStr=0.83 TopTanAngle=90 UpStr=0.83 Width=0.07
    4  1            0            0            point

BodyOfRevolution "Wheel", child of "Gear landing"
  location (X Y Z) 1.03071 -0.0473744 -0.9, rotation 0 0 90; relative location 0.983333 0 -0.9, rotation 0 0 90
  bounding box size 0.300638 0.103273 0.300638
  Design: A0=0.0254469 Ae=0.0362138 Amin=0.00744337 AminW=0.276967 Angle=-10 Diameter=0.18 Mode=0
  profile: circle Circle_Diameter=0.1

Fuselage "Disk", child of "Wheel"
  location (X Y Z) 1.028 0 -0.9, rotation 0 0 90
  bounding box size 0.22 0.03 0.22
  Design: Length=0.03
  cross sections:
    n  XLocPercent  YLocPercent  ZLocPercent  shape
    0  0            0            0            point
    1  0            0            0            circle Circle_Diameter=0.2
    2  1            0            0            as above
    3  1            0            0            point

Hinge "Hinge forward"
  location (X Y Z) 0.983 0 -0.9, rotation 0 0 0
  Hinge: JointRotMax=360 JointRotMaxFlag=0 JointRotMin=-360 JointRotMinFlag=0 JointRotate=0 JointRotateFlag=1 JointTransMax=1000 JointTransMaxFlag=0 JointTransMin=-1000 JointTransMinFlag=0 JointTranslate=0 JointTranslateFlag=0 OrientRotFlag=0 PrimOffAbsRelFlag=1 PrimType=0 PrimULoc=0 PrimVecAbsRelFlag=1 PrimWLoc=0 PrimXOff=0 PrimXOffRel=0 PrimXVec=1 PrimXVecRel=1 PrimYOff=0 PrimYOffRel=0 PrimYVec=0 PrimYVecRel=0 PrimZOff=0 PrimZOffRel=0 PrimZVec=0 PrimZVecRel=0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

Hinge "Hinge back 1", child of "Hinge forward"
  location (X Y Z) 2.75 -0.9 -0.9, rotation 0 0 0; relative location 1.767 -0.9 0, rotation 0 0 0
  Hinge: JointRotMax=360 JointRotMaxFlag=0 JointRotMin=-360 JointRotMinFlag=0 JointRotate=0 JointRotateFlag=1 JointTransMax=1000 JointTransMaxFlag=0 JointTransMin=-1000 JointTransMinFlag=0 JointTranslate=0 JointTranslateFlag=0 OrientRotFlag=0 PrimOffAbsRelFlag=1 PrimType=0 PrimULoc=0 PrimVecAbsRelFlag=1 PrimWLoc=0 PrimXOff=0 PrimXOffRel=0 PrimXVec=1 PrimXVecRel=1 PrimYOff=0 PrimYOffRel=0 PrimYVec=0 PrimYVecRel=0 PrimZOff=0 PrimZOffRel=0 PrimZVec=0 PrimZVecRel=0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

Hinge "Hinge back 1", child of "Hinge back 1"
  location (X Y Z) 2.75 0.9 -0.9, rotation 0 0 0; relative location 0 1.8 0, rotation 0 0 0
  Hinge: JointRotMax=360 JointRotMaxFlag=0 JointRotMin=-360 JointRotMinFlag=0 JointRotate=0 JointRotateFlag=1 JointTransMax=1000 JointTransMaxFlag=0 JointTransMin=-1000 JointTransMinFlag=0 JointTranslate=0 JointTranslateFlag=0 OrientRotFlag=0 PrimOffAbsRelFlag=1 PrimType=0 PrimULoc=0 PrimVecAbsRelFlag=1 PrimWLoc=0 PrimXOff=0 PrimXOffRel=0 PrimXVec=1 PrimXVecRel=1 PrimYOff=0 PrimYOffRel=0 PrimYVec=0 PrimYVecRel=0 PrimZOff=0 PrimZOffRel=0 PrimZVec=0 PrimZVecRel=0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
