OpenVSP model (file version 5), 6 components.
Geometry view with OpenVSP parameter names; values to 6 digits, angles in degrees, lengths in the model's unit.
Overall bounding box: X_Min=-3.09524 X_Len=6.36778 Y_Min=-3.76183 Y_Len=7.52367 Z_Min=-0.688699 Z_Len=2.55016

Wing "WingGeom"
  location (X Y Z) -1.73913 0.434783 -0.108696, rotation 4.56522 0 0
  symmetric about XZ
  bounding box size 2.92468 7.52367 0.439884
  totals: TotalSpan=6.66729 TotalProjectedSpan=6.66729 TotalChord=2.00528 TotalArea=10.6455 TotalAR=4.17573
  root: chord 2.5, twist 0, NACA 4-series Camber=0 CamberLoc=0.2 ThickChord=0.1
  sections:
    n  Span       Root_Chord  Tip_Chord  Area      Sweep  Sweep_Location  Dihedral  Twist  Twist_Location  tip airfoil
    1  0.042356   2.5         2.47656    0.105394  30     0               0         0      0.25            as above
    2  0.042356   2.47656     2.45312    0.104401  30     0               0         0      0.25            as above
    3  0.0847119  2.45312     2.40625    0.205823  30     0               0         0      0.25            as above
    4  0.169424   2.40625     2.3125     0.399734  30     0               0         0      0.25            as above
    5  0.338848   2.3125      1.75       0.688284  30     0               0         0      0.25            as above
    6  0.288256   1.75        1.65625    0.490936  30     0               0         0      0.25            as above
    7  0.288256   1.65625     1.5625     0.463912  30     0               0         0      0.25            as above
    8  0.275431   1.5625      1.68034    0.446589  30     0               0         0      0.25            as above
    9  1.80401    1.68034     1          2.41768   30     0               0         0      0.25            as above

TransportFuse "TransportFuse"
  location (X Y Z) -3.09524 0 0, rotation 0 0 0
  bounding box size 6.33402 1 1.10833
  Design: AftCenter=0.358333 AftHeight=0.23275 AftMult=2.905 AftWidth=0.08425 Diameter=1 Length=6.33402 NoseCenter=-0.275 NoseMult=1.6675
  custom script TransportFuse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

Wing "WingGeom"
  location (X Y Z) 2.28261 0 0.326087, rotation 4.23913 0 0
  symmetric about XZ
  bounding box size 0.989931 2.99497 0.141709
  totals: TotalSpan=3.00227 TotalProjectedSpan=3.00227 TotalChord=0.365898 TotalArea=1.10624 TotalAR=8.14801
  root: chord 0.493, twist 0, NACA 4-series Camber=0 CamberLoc=0.2 ThickChord=0.1
  sections:
    n  Span      Root_Chord  Tip_Chord  Area       Sweep  Sweep_Location  Dihedral  Twist  Twist_Location  tip airfoil
    1  0.459636  0.493       0.446781   0.215979   30     0               0         0      0.25            as above
    2  0.317732  0.446781    0.400562   0.134614   30     0               0         0      0.25            as above
    3  0.334773  0.400562    0.308125   0.118625   30     0               0         0      0.25            as above
    4  0.388995  0.308125    0.12325    0.0839013  30     0               0         0      0.25            as above

Wing "WingGeom"
  location (X Y Z) 2.06522 0 0.434783, rotation 90 0 0
  bounding box size 1.12149 0.112214 1.42668
  totals: TotalSpan=1.42668 TotalProjectedSpan=1.42668 TotalChord=0.700929 TotalArea=1 TotalAR=2.03541
  root: chord 1.12149, twist 0, NACA 4-series Camber=0 CamberLoc=0.2 ThickChord=0.1
  sections:
    n  Span     Root_Chord  Tip_Chord  Area  Sweep  Sweep_Location  Dihedral  Twist  Twist_Location  tip airfoil
    1  1.42668  1.12149     0.280372   1     30     0               0         0      0.25            as above

Fuselage "FuselageGeom"
  location (X Y Z) -1.95652 -1.41304 -0.434783, rotation 0 0 0
  bounding box size 0.747656 0.423194 0.507833
  Design: Length=1.09834
  cross sections:
    n  XLocPercent  YLocPercent  ZLocPercent  shape
    0  1            0            0            point
    1  0.5          0            0            ellipse Ellipse_Height=0.507833 Ellipse_Width=0.423194
    2  0.75         0            0            as above
    3  1            0            0            point

Fuselage "FuselageGeom", child of "FuselageGeom"
  location (X Y Z) -1.95652 1.41304 -0.434783, rotation 0 0 0
  bounding box size 0.747656 0.423194 0.507833
  Design: Length=1.09834
  cross sections:
    n  XLocPercent  YLocPercent  ZLocPercent  shape
    0  1            0            0            point
    1  0.5          0            0            ellipse Ellipse_Height=0.507833 Ellipse_Width=0.423194
    2  0.75         0            0            as above
    3  1            0            0            point
