OpenVSP model (file version 5), 58 components.
Geometry view with OpenVSP parameter names; values to 6 digits, angles in degrees, lengths in the model's unit.
Overall bounding box: X_Min=-3.16994 X_Len=27.5394 Y_Min=-22.51 Y_Len=45.0201 Z_Min=-4.25 Z_Len=12.25

Fuselage "FuselageGeom"
  location (X Y Z) 0 0 0, rotation 0 0 0
  bounding box size 24 5.291 5.30088
  Design: Length=24
  cross sections:
    n   XLocPercent  YLocPercent  ZLocPercent  shape
    0   0            0            -0.0125      point
    1   0.0416667    0            -0.00416667  ellipse Ellipse_Height=1.4 Ellipse_Width=1.6
    2   0.0833333    0            0            ellipse Ellipse_Height=2.5 Ellipse_Width=2.5
    3   0.166667     0            0.00543478   ellipse Ellipse_Height=4 Ellipse_Width=3.8
    4   0.25         0            0.0108696    super ellipse Super_Height=4.9 Super_M=2.5 Super_MaxWidthLoc=0 Super_N=2.5 Super_Width=4.6
    5   0.333333     0            0.0108696    super ellipse Super_Height=5.3 Super_M=2.5 Super_MaxWidthLoc=0 Super_N=2.5 Super_Width=5.2
    6   0.416667     0            0.0108696    super ellipse Super_Height=5.3 Super_M=3 Super_MaxWidthLoc=0 Super_N=3 Super_Width=5.2
    7   0.5          0            0.0108696    super ellipse Super_Height=5.1 Super_M=3 Super_MaxWidthLoc=0 Super_N=3 Super_Width=5.1
    8   0.583333     0            0.0108696    super ellipse Super_Height=4.4 Super_M=3 Super_MaxWidthLoc=0 Super_N=3 Super_Width=4.5
    9   0.666667     0            0.00416667   super ellipse Super_Height=3.6 Super_M=3 Super_MaxWidthLoc=0 Super_N=3 Super_Width=3.6
    10  0.75         0            0.00208333   super ellipse Super_Height=2.75 Super_M=3 Super_MaxWidthLoc=0 Super_N=3 Super_Width=2.4
    11  0.833333     0            0            super ellipse Super_Height=1.9 Super_M=3 Super_MaxWidthLoc=0 Super_N=3 Super_Width=1.5
    12  0.916667     0            0            super ellipse Super_Height=1 Super_M=3 Super_MaxWidthLoc=0 Super_N=3 Super_Width=0.772973
    13  1            0            0            super ellipse Super_Height=0.1 Super_M=3 Super_MaxWidthLoc=0 Super_N=3 Super_Width=0.5

Wing "Wing"
  location (X Y Z) 8.3 0 2.5, rotation 0 0 0
  symmetric about XZ
  bounding box size 5 26.0918 1.33784
  totals: TotalSpan=26.2 TotalProjectedSpan=26.0918 TotalChord=3.875 TotalArea=102.57 TotalAR=6.63723
  root: chord 5, twist 0, NACA 4-series Camber=0.09 CamberLoc=0.525455 ThickChord=0.122727
  sections:
    n  Span  Root_Chord  Tip_Chord  Area    Sweep  Sweep_Location  Dihedral  Twist  Twist_Location  tip airfoil
    1  7.1   5           3.7        30.885  0      0               6.5       0      0.25            NACA 4-series Camber=0.09 CamberLoc=0.496364 ThickChord=0.122727
    2  6     3.7         3.1        20.4    0      0               -3.04545  0      0.25            NACA 4-series Camber=0.09 CamberLoc=0.489091 ThickChord=0.118182

Blank "BlankGeom", child of "Wing"
  location (X Y Z) 8.3 13.05 3, rotation 0 0 0

Wing "WingGeom", child of "BlankGeom"
  location (X Y Z) 8.3 13.05 3, rotation 0 0 0
  symmetric about XZ
  bounding box size 1.92017 32.8904 0.455628
  totals: TotalSpan=6.8 TotalProjectedSpan=6.7904 TotalChord=1.86 TotalArea=12.648 TotalAR=3.64559
  root: chord 1.92, twist 0, NACA 4-series Camber=0.00327273 CamberLoc=0.1 ThickChord=0.186364
  sections:
    n  Span  Root_Chord  Tip_Chord  Area   Sweep  Sweep_Location  Dihedral  Twist  Twist_Location  tip airfoil
    1  3.4   1.92        1.8        6.324  0      0               -3.04545  0      0.25            NACA 4-series Camber=0 CamberLoc=0.2 ThickChord=0.1

Blank "BlankGeom", child of "WingGeom"
  location (X Y Z) 8.3 16.45 2.82, rotation 0 0 0

Wing "WingGeom", child of "BlankGeom"
  location (X Y Z) 8.3 16.45 2.82, rotation 0 0 0
  symmetric about XZ
  bounding box size 2.75 33.32 0.27516
  totals: TotalSpan=0.42 TotalProjectedSpan=0.42 TotalChord=2.725 TotalArea=1.1445 TotalAR=0.154128
  root: chord 2.75, twist 0, NACA 4-series Camber=0 CamberLoc=0.2 ThickChord=0.1
  sections:
    n  Span  Root_Chord  Tip_Chord  Area     Sweep  Sweep_Location  Dihedral  Twist  Twist_Location  tip airfoil
    1  0.21  2.75        2.7        0.57225  0      0               0         0      0.25            as above

Hinge "HingeGeom -right outer", child of "WingGeom"
  location (X Y Z) 10.1 16.45 2.82, rotation 0 -56.3099 -86.3593; relative location 1.8 3.4 -0.18, rotation 0 -56.3099 -86.3593
  Hinge: JointRotMax=360 JointRotMaxFlag=0 JointRotMin=-360 JointRotMinFlag=0 JointRotate=-58 JointRotateFlag=1 JointTransMax=1000 JointTransMaxFlag=0 JointTransMin=-1000 JointTransMinFlag=0 JointTranslate=0 JointTranslateFlag=0 OrientRotFlag=1 PrimOffAbsRelFlag=1 PrimType=2 PrimULoc=0 PrimVecAbsRelFlag=1 PrimWLoc=0 PrimXOff=0 PrimXOffRel=0 PrimXVec=0.0352229 PrimXVecRel=0.0352229 PrimYOff=0 PrimYOffRel=0 PrimYVec=-0.997982 PrimYVecRel=-0.997982 PrimZOff=0 PrimZOffRel=0 PrimZVec=0.0528343 PrimZVecRel=0.0528343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

Stack "StackGeom", child of "HingeGeom -right outer"
  location (X Y Z) 10.5495 16.4651 2.80633, rotation -3.08814 1.63565 -87.9806; relative location 0 0.45 0, rotation 0 0 0
  bounding box size 1.29856 3.4242 0.303761
  cross sections:
    n  XDelta  YDelta  ZDelta  shape
    0  0       0       0       CST airfoil Chord=0.9 ContLERad=1 LowDegree=7 ThickChord=0.119291 UpDegree=7 Au=[0.170988 0.157287 0.162312 0.143623 0.149218 0.137218 0.140721 0.141105] Al=[-0.170988 -0.157287 -0.162312 -0.143623 -0.149218 -0.137218 -0.140721 -0.141105]
    1  3.4     0.14    0       CST airfoil Chord=1.18 ContLERad=1 LowDegree=7 ThickChord=0.119946 UpDegree=7 Au=[0.180744 0.157287 0.162312 0.143623 0.149218 0.137218 0.140721 0.141105] Al=[-0.180744 -0.157287 -0.162312 -0.143623 -0.149218 -0.137218 -0.140721 -0.141105]

Hinge "HingeGeom -right  inner", child of "Wing"
  location (X Y Z) 12 7.05 3.3, rotation 0 31.6075 -77.7832; relative location 3.7 7.05 0.8, rotation 0 31.6075 -77.7832
  Hinge: JointRotMax=360 JointRotMaxFlag=0 JointRotMin=-360 JointRotMinFlag=0 JointRotate=12.604 JointRotateFlag=1 JointTransMax=1000 JointTransMaxFlag=0 JointTransMin=-1000 JointTransMinFlag=0 JointTranslate=0 JointTranslateFlag=0 OrientRotFlag=1 PrimOffAbsRelFlag=1 PrimType=2 PrimULoc=0 PrimVecAbsRelFlag=1 PrimWLoc=0 PrimXOff=0 PrimXOffRel=0 PrimXVec=0.180221 PrimXVecRel=0.180221 PrimYOff=0 PrimYOffRel=0 PrimYVec=-0.977354 PrimYVecRel=-0.977354 PrimZOff=0 PrimZOffRel=0 PrimZVec=-0.110905 PrimZVecRel=-0.110905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

Stack "StackGeom", child of "HingeGeom -right  inner"
  location (X Y Z) 12.695 7.20488 3.06447, rotation 2.80366 19.2587 -78.9944; relative location 0 0.75 0, rotation 0 0 0
  bounding box size 2.82785 5.58765 1.25374
  cross sections:
    n  XDelta  YDelta  ZDelta  shape
    0  0       0       0       CST airfoil Chord=1.5 ContLERad=1 LowDegree=7 ThickChord=0.119291 UpDegree=7 Au=[0.170988 0.157287 0.162312 0.143623 0.149218 0.137218 0.140721 0.141105] Al=[-0.170988 -0.157287 -0.162312 -0.143623 -0.149218 -0.137218 -0.140721 -0.141105]
    1  5.4     0.25    0       CST airfoil Chord=2 ContLERad=1 LowDegree=7 ThickChord=0.119946 UpDegree=7 Au=[0.180744 0.157287 0.162312 0.143623 0.149218 0.137218 0.140721 0.141105] Al=[-0.180744 -0.157287 -0.162312 -0.143623 -0.149218 -0.137218 -0.140721 -0.141105]

Hinge "HingeGeom -right mid", child of "Wing"
  location (X Y Z) 11.41 13 2.95, rotation 0 -30.9454 -83.4001
  Hinge: JointRotMax=360 JointRotMaxFlag=0 JointRotMin=-360 JointRotMinFlag=0 JointRotate=-53.3659 JointRotateFlag=1 JointTransMax=1000 JointTransMaxFlag=0 JointTransMin=-1000 JointTransMinFlag=0 JointTranslate=0 JointTranslateFlag=0 OrientRotFlag=1 PrimOffAbsRelFlag=1 PrimType=2 PrimULoc=0.5 PrimVecAbsRelFlag=1 PrimWLoc=0 PrimXOff=0 PrimXOffRel=0 PrimXVec=0.0985748 PrimXVecRel=0.0985748 PrimYOff=0 PrimYOffRel=0 PrimYVec=-0.993373 PrimYVecRel=-0.993373 PrimZOff=0 PrimZOffRel=0 PrimZVec=0.0591019 PrimZVecRel=0.0591019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

Stack "StackGeom", child of "HingeGeom -right mid"
  location (X Y Z) 11.9948 13.0435 2.70652, rotation -5.7145 22.1381 -83.891; relative location 0 0.635 0, rotation 0 0 0
  bounding box size 1.91243 5.99702 0.862133
  cross sections:
    n  XDelta  YDelta  ZDelta  ZRotate  shape
    0  0       0       0       0        CST airfoil Chord=1.27 ContLERad=1 LowDegree=7 ThickChord=0.119291 UpDegree=7 Au=[0.170988 0.157287 0.162312 0.143623 0.149218 0.137218 0.140721 0.141105] Al=[-0.170988 -0.157287 -0.162312 -0.143623 -0.149218 -0.137218 -0.140721 -0.141105]
    1  5.8     0.1     0       11.4545  CST airfoil Chord=1.5 ContLERad=1 LowDegree=7 ThickChord=0.119946 UpDegree=7 Au=[0.180744 0.157287 0.162312 0.143623 0.149218 0.137218 0.140721 0.141105] Al=[-0.180744 -0.157287 -0.162312 -0.143623 -0.149218 -0.137218 -0.140721 -0.141105]

Hinge "HingeGeom - left side outer", child of "Wing"
  location (X Y Z) 10.1 -16.45 2.82, rotation 0 -47.7688 86.8981; relative location 1.8 -16.45 0.32, rotation 0 -47.7688 86.8981
  Hinge: JointRotMax=360 JointRotMaxFlag=0 JointRotMin=-360 JointRotMinFlag=0 JointRotate=226.19 JointRotateFlag=1 JointTransMax=1000 JointTransMaxFlag=0 JointTransMin=-1000 JointTransMinFlag=0 JointTranslate=0 JointTranslateFlag=0 OrientRotFlag=1 PrimOffAbsRelFlag=1 PrimType=2 PrimULoc=0 PrimVecAbsRelFlag=1 PrimWLoc=0 PrimXOff=-2.61905 PrimXOffRel=-2.61905 PrimXVec=0.03637 PrimXVecRel=0.03637 PrimYOff=-0.5 PrimYOffRel=-0.5 PrimYVec=0.998535 PrimYVecRel=0.998535 PrimZOff=0.96 PrimZOffRel=0.96 PrimZVec=0.0400666 PrimZVecRel=0.0400666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

Stack "StackGeom", child of "HingeGeom - left side outer"
  location (X Y Z) 10.5495 -16.4669 2.83206, rotation -177.761 1.61903 -87.9149; relative location 0 0.45 0, rotation 0 0 0
  bounding box size 1.30242 3.42911 0.264276
  cross sections:
    n  XDelta  YDelta  ZDelta  shape
    0  0       0       0       CST airfoil Chord=0.9 ContLERad=1 LowDegree=7 ThickChord=0.119291 UpDegree=7 Au=[0.170988 0.157287 0.162312 0.143623 0.149218 0.137218 0.140721 0.141105] Al=[-0.170988 -0.157287 -0.162312 -0.143623 -0.149218 -0.137218 -0.140721 -0.141105]
    1  3.4     0.14    0       CST airfoil Chord=1.18 ContLERad=1 LowDegree=7 ThickChord=0.119946 UpDegree=7 Au=[0.180744 0.157287 0.162312 0.143623 0.149218 0.137218 0.140721 0.141105] Al=[-0.180744 -0.157287 -0.162312 -0.143623 -0.149218 -0.137218 -0.140721 -0.141105]

Hinge "HingeGeom -left inner", child of "Wing"
  location (X Y Z) 12 -7.05 3.3, rotation 0 31.6075 77.7832; relative location 3.7 -7.05 0.8, rotation 0 31.6075 77.7832
  Hinge: JointRotMax=360 JointRotMaxFlag=0 JointRotMin=-360 JointRotMinFlag=0 JointRotate=-197.651 JointRotateFlag=1 JointTransMax=1000 JointTransMaxFlag=0 JointTransMin=-1000 JointTransMinFlag=0 JointTranslate=0 JointTranslateFlag=0 OrientRotFlag=1 PrimOffAbsRelFlag=1 PrimType=2 PrimULoc=0 PrimVecAbsRelFlag=1 PrimWLoc=0 PrimXOff=0 PrimXOffRel=0 PrimXVec=0.180221 PrimXVecRel=0.180221 PrimYOff=0 PrimYOffRel=0 PrimYVec=0.977354 PrimYVecRel=0.977354 PrimZOff=0 PrimZOffRel=0 PrimZVec=-0.110905 PrimZVecRel=-0.110905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

Stack "StackGeom", child of "HingeGeom -left inner"
  location (X Y Z) 12.7141 -7.20124 3.12759, rotation 176.203 -14.302 -79.2814; relative location 0 0.75 0, rotation 0 0 0
  bounding box size 2.8781 5.58052 1.09367
  cross sections:
    n  XDelta  YDelta  ZDelta  shape
    0  0       0       0       CST airfoil Chord=1.5 ContLERad=1 LowDegree=7 ThickChord=0.119291 UpDegree=7 Au=[0.170988 0.157287 0.162312 0.143623 0.149218 0.137218 0.140721 0.141105] Al=[-0.170988 -0.157287 -0.162312 -0.143623 -0.149218 -0.137218 -0.140721 -0.141105]
    1  5.4     0.25    0       CST airfoil Chord=2 ContLERad=1 LowDegree=7 ThickChord=0.119946 UpDegree=7 Au=[0.180744 0.157287 0.162312 0.143623 0.149218 0.137218 0.140721 0.141105] Al=[-0.180744 -0.157287 -0.162312 -0.143623 -0.149218 -0.137218 -0.140721 -0.141105]

Hinge "HingeGeom - left mid", child of "Wing"
  location (X Y Z) 11.41 -13 2.95, rotation 0 -22.35 83.7889
  Hinge: JointRotMax=360 JointRotMaxFlag=0 JointRotMin=-360 JointRotMinFlag=0 JointRotate=-152.762 JointRotateFlag=1 JointTransMax=1000 JointTransMaxFlag=0 JointTransMin=-1000 JointTransMinFlag=0 JointTranslate=0 JointTranslateFlag=0 OrientRotFlag=1 PrimOffAbsRelFlag=1 PrimType=2 PrimULoc=0.5 PrimVecAbsRelFlag=1 PrimWLoc=0 PrimXOff=1.42857 PrimXOffRel=1.42857 PrimXVec=0.100064 PrimXVecRel=0.100064 PrimYOff=0 PrimYOffRel=0 PrimYVec=0.99413 PrimYVecRel=0.99413 PrimZOff=0.47619 PrimZOffRel=0.47619 PrimZVec=0.0411413 PrimZVecRel=0.0411413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

Stack "StackGeom", child of "HingeGeom - left mid"
  location (X Y Z) 12.0396 -13.0611 2.89463, rotation -177.152 -4.74527 -84.2373; relative location 0 0.635 0, rotation 0 0 0
  bounding box size 2.02317 6.0363 0.428086
  cross sections:
    n  XDelta  YDelta  ZDelta  ZRotate  shape
    0  0       0       0       0        CST airfoil Chord=1.27 ContLERad=1 LowDegree=7 ThickChord=0.119291 UpDegree=7 Au=[0.170988 0.157287 0.162312 0.143623 0.149218 0.137218 0.140721 0.141105] Al=[-0.170988 -0.157287 -0.162312 -0.143623 -0.149218 -0.137218 -0.140721 -0.141105]
    1  5.8     0.1     0       11.4545  CST airfoil Chord=1.5 ContLERad=1 LowDegree=7 ThickChord=0.119946 UpDegree=7 Au=[0.180744 0.157287 0.162312 0.143623 0.149218 0.137218 0.140721 0.141105] Al=[-0.180744 -0.157287 -0.162312 -0.143623 -0.149218 -0.137218 -0.140721 -0.141105]

Wing "Tail"
  location (X Y Z) 20 0 0.1, rotation 0 0 0
  symmetric about XZ
  bounding box size 4.26449 2.41863 1.21651
  totals: TotalSpan=3 TotalProjectedSpan=2.41863 TotalChord=3.89 TotalArea=11.67 TotalAR=0.501266
  root: chord 4, twist 0, NACA 4-series Camber=0 CamberLoc=0.2 ThickChord=0.1
  sections:
    n  Span  Root_Chord  Tip_Chord  Area   Sweep  Sweep_Location  Dihedral  Twist  Twist_Location  tip airfoil
    1  1.5   4           3.78       5.835  -10    0               36.2727   0      0.25            NACA 4-series Camber=0 CamberLoc=0.2 ThickChord=0.0681818

Blank "BlankGeom", child of "Tail"
  location (X Y Z) 19.75 1.21 0.91, rotation 0 0 0

Wing "Tail", child of "BlankGeom"
  location (X Y Z) 19.75 1.21 1, rotation 0 0 0
  symmetric about XZ
  bounding box size 3.53796 12.0945 3.7644
  totals: TotalSpan=12 TotalProjectedSpan=9.67452 TotalChord=2.145 TotalArea=25.74 TotalAR=3.63622
  root: chord 2.48, twist 0, NACA 4-series Camber=0 CamberLoc=0.205455 ThickChord=0.1
  sections:
    n  Span  Root_Chord  Tip_Chord  Area   Sweep  Sweep_Location  Dihedral  Twist  Twist_Location  tip airfoil
    1  6     2.48        1.81       12.87  -10    0               36.2727   0      0.25            NACA 4-series Camber=0 CamberLoc=0.2 ThickChord=0.1

Blank "BlankGeom", child of "Tail"
  location (X Y Z) 18.69 6.049 4.56, rotation 0 0 0

Wing "Tail", child of "BlankGeom"
  location (X Y Z) 18.69 6.0487 4.56, rotation 0 0 0
  symmetric about XZ
  bounding box size 3.04577 13.339 0.624364
  totals: TotalSpan=1.54 TotalProjectedSpan=1.24156 TotalChord=2.855 TotalArea=4.3967 TotalAR=0.350599
  root: chord 2.91, twist 0, NACA 4-series Camber=0 CamberLoc=0.2 ThickChord=0.0590909
  sections:
    n  Span  Root_Chord  Tip_Chord  Area     Sweep  Sweep_Location  Dihedral  Twist  Twist_Location  tip airfoil
    1  0.77  2.91        2.8        2.19835  -10    0               36.2727   0      0.25            NACA 4-series Camber=0 CamberLoc=0.2 ThickChord=0.059

Hinge "HingeGeom - tip right outer", child of "Tail"
  location (X Y Z) 20.52 5.99 4.508, rotation 0 64.0127 -50.7704
  Hinge: JointRotMax=360 JointRotMaxFlag=0 JointRotMin=-360 JointRotMinFlag=0 JointRotate=69.0476 JointRotateFlag=1 JointTransMax=1000 JointTransMaxFlag=0 JointTransMin=-1000 JointTransMinFlag=0 JointTranslate=0 JointTranslateFlag=0 OrientRotFlag=1 PrimOffAbsRelFlag=1 PrimType=2 PrimULoc=0 PrimVecAbsRelFlag=1 PrimWLoc=0 PrimXOff=0 PrimXOffRel=0 PrimXVec=0.277112 PrimXVecRel=0.277112 PrimYOff=0 PrimYOffRel=0 PrimYVec=-0.774618 PrimYVecRel=-0.774618 PrimZOff=0 PrimZOffRel=0 PrimZVec=-0.568485 PrimZVecRel=-0.568485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

Stack "StackGeom -", child of "HingeGeom - tip right outer"
  location (X Y Z) 21.0584 5.99915 4.51172, rotation 37.9232 -5.69647 -88.83; relative location 0.14 0.52 0, rotation 6.19565 0 -15
  bounding box size 1.727 1.69586 1.31276
  cross sections:
    n  XDelta  YDelta  ZDelta  shape
    0  0       0       0       CST airfoil Chord=1.1 ContLERad=1 LowDegree=7 ThickChord=0.119291 UpDegree=7 Au=[0.170988 0.157287 0.162312 0.143623 0.149218 0.137218 0.140721 0.141105] Al=[-0.170988 -0.157287 -0.162312 -0.143623 -0.149218 -0.137218 -0.140721 -0.141105]
    1  2       0.565   0       CST airfoil Chord=1.16 ContLERad=1 LowDegree=7 ThickChord=0.119946 UpDegree=7 Au=[0.180744 0.157287 0.162312 0.143623 0.149218 0.137218 0.140721 0.141105] Al=[-0.180744 -0.157287 -0.162312 -0.143623 -0.149218 -0.137218 -0.140721 -0.141105]

Hinge "HingeGeom tail right mid", child of "Tail"
  location (X Y Z) 21.09 4.4 3.31752, rotation 0 63.8072 -51.0052
  Hinge: JointRotMax=360 JointRotMaxFlag=0 JointRotMin=-360 JointRotMinFlag=0 JointRotate=71.4286 JointRotateFlag=1 JointTransMax=1000 JointTransMaxFlag=0 JointTransMin=-1000 JointTransMinFlag=0 JointTranslate=0 JointTranslateFlag=0 OrientRotFlag=1 PrimOffAbsRelFlag=1 PrimType=2 PrimULoc=0 PrimVecAbsRelFlag=1 PrimWLoc=0 PrimXOff=0 PrimXOffRel=0 PrimXVec=0.277746 PrimXVecRel=0.277746 PrimYOff=0 PrimYOffRel=0 PrimYVec=-0.777203 PrimYVecRel=-0.777203 PrimZOff=0 PrimZOffRel=0 PrimZVec=-0.564635 PrimZVecRel=-0.564635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

Stack "StackGeom tail right mid", child of "HingeGeom tail right mid"
  location (X Y Z) 21.6596 4.39364 3.34079, rotation 38.3884 -8.20791 -88.7027; relative location 0.15 0.55 0, rotation 6.19565 0 -15
  bounding box size 1.78651 1.72341 1.34631
  cross sections:
    n  XDelta  YDelta  ZDelta  shape
    0  0       0       0       CST airfoil Chord=1.16 ContLERad=1 LowDegree=7 ThickChord=0.119291 UpDegree=7 Au=[0.170988 0.157287 0.162312 0.143623 0.149218 0.137218 0.140721 0.141105] Al=[-0.170988 -0.157287 -0.162312 -0.143623 -0.149218 -0.137218 -0.140721 -0.141105]
    1  2       0.565   0       CST airfoil Chord=1.23 ContLERad=1 LowDegree=7 ThickChord=0.119946 UpDegree=7 Au=[0.180744 0.157287 0.162312 0.143623 0.149218 0.137218 0.140721 0.141105] Al=[-0.180744 -0.157287 -0.162312 -0.143623 -0.149218 -0.137218 -0.140721 -0.141105]

Hinge "HingeGeom tail right inner", child of "Tail"
  location (X Y Z) 21.66 2.8 2.15, rotation 0 63.6346 -51.0882
  Hinge: JointRotMax=360 JointRotMaxFlag=0 JointRotMin=-360 JointRotMinFlag=0 JointRotate=69.0476 JointRotateFlag=1 JointTransMax=1000 JointTransMaxFlag=0 JointTransMin=-1000 JointTransMinFlag=0 JointTranslate=0 JointTranslateFlag=0 OrientRotFlag=1 PrimOffAbsRelFlag=1 PrimType=2 PrimULoc=0 PrimVecAbsRelFlag=1 PrimWLoc=0 PrimXOff=0 PrimXOffRel=0 PrimXVec=0.278946 PrimXVecRel=0.278946 PrimYOff=0 PrimYOffRel=0 PrimYVec=-0.778113 PrimYVecRel=-0.778113 PrimZOff=0 PrimZOffRel=0 PrimZVec=-0.562786 PrimZVecRel=-0.562786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

Stack "StackGeom", child of "HingeGeom tail right inner"
  location (X Y Z) 22.2728 2.77465 2.13339, rotation 37.6505 -6.08121 -88.7085; relative location 0.2 0.58 0, rotation 6.19565 0 -15
  bounding box size 1.86306 1.67465 1.29338
  cross sections:
    n  XDelta  YDelta  ZDelta  shape
    0  0       0       0       CST airfoil Chord=1.23 ContLERad=1 LowDegree=7 ThickChord=0.119291 UpDegree=7 Au=[0.170988 0.157287 0.162312 0.143623 0.149218 0.137218 0.140721 0.141105] Al=[-0.170988 -0.157287 -0.162312 -0.143623 -0.149218 -0.137218 -0.140721 -0.141105]
    1  1.95    0.565   0       CST airfoil Chord=1.3 ContLERad=1 LowDegree=7 ThickChord=0.119946 UpDegree=7 Au=[0.180744 0.157287 0.162312 0.143623 0.149218 0.137218 0.140721 0.141105] Al=[-0.180744 -0.157287 -0.162312 -0.143623 -0.149218 -0.137218 -0.140721 -0.141105]

Hinge "HingeGeom tail left outer", child of "Tail"
  location (X Y Z) 20.52 -5.99 4.508, rotation 0 64.0843 50.711
  Hinge: JointRotMax=360 JointRotMaxFlag=0 JointRotMin=-360 JointRotMinFlag=0 JointRotate=109.524 JointRotateFlag=1 JointTransMax=1000 JointTransMaxFlag=0 JointTransMin=-1000 JointTransMinFlag=0 JointTranslate=0 JointTranslateFlag=0 OrientRotFlag=1 PrimOffAbsRelFlag=1 PrimType=2 PrimULoc=0 PrimVecAbsRelFlag=1 PrimWLoc=0 PrimXOff=-1.3381 PrimXOffRel=-1.3381 PrimXVec=0.276753 PrimXVecRel=0.276753 PrimYOff=0 PrimYOffRel=0 PrimYVec=0.773962 PrimYVecRel=0.773962 PrimZOff=0 PrimZOffRel=0 PrimZVec=-0.569553 PrimZVecRel=-0.569553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

Stack "StackGeom tail left outer", child of "HingeGeom tail left outer"
  location (X Y Z) 21.0583 -5.99169 4.52148, rotation 145.068 -4.90922 -88.8727; relative location 0.14 0.52 0, rotation 6.19565 0 -15
  bounding box size 1.72773 1.70046 1.30168
  cross sections:
    n  XDelta  YDelta  ZDelta  shape
    0  0       0       0       CST airfoil Chord=1.1 ContLERad=1 LowDegree=7 ThickChord=0.119291 UpDegree=7 Au=[0.170988 0.157287 0.162312 0.143623 0.149218 0.137218 0.140721 0.141105] Al=[-0.170988 -0.157287 -0.162312 -0.143623 -0.149218 -0.137218 -0.140721 -0.141105]
    1  2       0.565   0       CST airfoil Chord=1.16 ContLERad=1 LowDegree=7 ThickChord=0.119946 UpDegree=7 Au=[0.180744 0.157287 0.162312 0.143623 0.149218 0.137218 0.140721 0.141105] Al=[-0.180744 -0.157287 -0.162312 -0.143623 -0.149218 -0.137218 -0.140721 -0.141105]

Hinge "HingeGeom tail left min", child of "Tail"
  location (X Y Z) 21.09 -4.4 3.31752, rotation 0 63.961 50.859
  Hinge: JointRotMax=360 JointRotMaxFlag=0 JointRotMin=-360 JointRotMinFlag=0 JointRotate=109.524 JointRotateFlag=1 JointTransMax=1000 JointTransMaxFlag=0 JointTransMin=-1000 JointTransMinFlag=0 JointTranslate=0 JointTranslateFlag=0 OrientRotFlag=1 PrimOffAbsRelFlag=1 PrimType=2 PrimULoc=0 PrimVecAbsRelFlag=1 PrimWLoc=0 PrimXOff=-1.338 PrimXOffRel=-1.338 PrimXVec=0.277099 PrimXVecRel=0.277099 PrimYOff=0 PrimYOffRel=0 PrimYVec=0.775595 PrimYVecRel=0.775595 PrimZOff=0 PrimZOffRel=0 PrimZVec=-0.567158 PrimZVecRel=-0.567158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

Stack "StackGeom", child of "HingeGeom tail left min"
  location (X Y Z) 21.6599 -4.39969 3.33192, rotation 145.203 -4.77104 -88.8554; relative location 0.15 0.55 0, rotation 6.19565 0 -15
  bounding box size 1.79344 1.7085 1.30293
  cross sections:
    n  XDelta  YDelta  ZDelta  shape
    0  0       0       0       CST airfoil Chord=1.16 ContLERad=1 LowDegree=7 ThickChord=0.119291 UpDegree=7 Au=[0.170988 0.157287 0.162312 0.143623 0.149218 0.137218 0.140721 0.141105] Al=[-0.170988 -0.157287 -0.162312 -0.143623 -0.149218 -0.137218 -0.140721 -0.141105]
    1  2       0.565   0       CST airfoil Chord=1.23 ContLERad=1 LowDegree=7 ThickChord=0.119946 UpDegree=7 Au=[0.180744 0.157287 0.162312 0.143623 0.149218 0.137218 0.140721 0.141105] Al=[-0.180744 -0.157287 -0.162312 -0.143623 -0.149218 -0.137218 -0.140721 -0.141105]

Hinge "HingeGeom tail left inner", child of "Tail"
  location (X Y Z) 21.66 -2.8 2.15, rotation 0 63.9515 50.8227
  Hinge: JointRotMax=360 JointRotMaxFlag=0 JointRotMin=-360 JointRotMinFlag=0 JointRotate=111.905 JointRotateFlag=1 JointTransMax=1000 JointTransMaxFlag=0 JointTransMin=-1000 JointTransMinFlag=0 JointTranslate=0 JointTranslateFlag=0 OrientRotFlag=1 PrimOffAbsRelFlag=1 PrimType=2 PrimULoc=0 PrimVecAbsRelFlag=1 PrimWLoc=0 PrimXOff=-1.338 PrimXOffRel=-1.338 PrimXVec=0.277409 PrimXVecRel=0.277409 PrimYOff=0 PrimYOffRel=0 PrimYVec=0.775195 PrimYVecRel=0.775195 PrimZOff=0 PrimZOffRel=0 PrimZVec=-0.567553 PrimZVecRel=-0.567553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

Stack "StackGeom", child of "HingeGeom tail left inner"
  location (X Y Z) 22.2726 -2.78165 2.1221, rotation 145.84 -7.05879 -88.768; relative location 0.2 0.58 0, rotation 6.19565 0 -15
  bounding box size 1.85746 1.69458 1.3039
  cross sections:
    n  XDelta  YDelta  ZDelta  shape
    0  0       0       0       CST airfoil Chord=1.23 ContLERad=1 LowDegree=7 ThickChord=0.119291 UpDegree=7 Au=[0.170988 0.157287 0.162312 0.143623 0.149218 0.137218 0.140721 0.141105] Al=[-0.170988 -0.157287 -0.162312 -0.143623 -0.149218 -0.137218 -0.140721 -0.141105]
    1  1.95    0.565   0       CST airfoil Chord=1.3 ContLERad=1 LowDegree=7 ThickChord=0.119946 UpDegree=7 Au=[0.180744 0.157287 0.162312 0.143623 0.149218 0.137218 0.140721 0.141105] Al=[-0.180744 -0.157287 -0.162312 -0.143623 -0.149218 -0.137218 -0.140721 -0.141105]

Stack "StackGeom"
  location (X Y Z) 0.75 -0.158 -3, rotation 0 0 90
  bounding box size 1 0.315 1
  cross sections:
    n  XDelta  YDelta  ZDelta  shape
    0  0       0       0       circle Circle_Diameter=0.5
    1  0.105   0       0       circle Circle_Diameter=1
    2  0.105   0       0       as above
    3  0.105   0       0       circle Circle_Diameter=0.5

Custom "Duct", child of "StackGeom"
  location (X Y Z) 1 0 -2.75, rotation 0 39.0476 0
  bounding box size 0.599129 0.478915 0.628384
  Design: Camber=0.0166667 CamberLoc=0 Chord=0.340093 Height=0.518165 InvertFlag=0 Shape=0.583333 ThickChord=0.154167 Width=0.435764
  custom script Duct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

Stack "StackGeom", child of "StackGeom"
  location (X Y Z) 1.17739 0 -2.57261, rotation 0 -60 0
  bounding box size 1.02321 0.2 1.57224
  cross sections:
    n  XDelta  YDelta  ZDelta  shape
    0  0       0       0       circle Circle_Diameter=0.2
    1  1.7     0       0       as above

Stack "StackGeom"
  location (X Y Z) 11 3.54 -3.75, rotation 0 0 90
  symmetric about XZ
  bounding box size 1 7.71 1
  cross sections:
    n  XDelta  YDelta  ZDelta  shape
    0  0       0       0       circle Circle_Diameter=0.5
    1  0.105   0       0       circle Circle_Diameter=1
    2  0.105   0       0       as above
    3  0.105   0       0       circle Circle_Diameter=0.5

Stack "StackGeom", child of "StackGeom"
  location (X Y Z) 11 3.7 -3.75, rotation 0 0 -90
  symmetric about XZ
  bounding box size 1.64189 7.4 2.1067
  cross sections:
    n  XDelta    YDelta  YRotate   ZDelta  ZRotate  shape
    0  0         0       0         0       0        circle Circle_Diameter=0.2
    1  0.672131  0       -42.5455  0       27       as above
    2  3         0       0         0       0        as above

Stack "StackGeom", child of "StackGeom"
  location (X Y Z) 11 3 -3.75, rotation -45 0 -80.1087
  symmetric about XZ
  bounding box size 0.712366 6.14813 2.23791
  cross sections:
    n  XDelta  YDelta  ZDelta  shape
    0  0       0       0       circle Circle_Diameter=0.2
    1  3       0       0       as above

Hinge "HingeGeom - Wing tip"
  location (X Y Z) 10.2 17.4081 2.8, rotation 0 0 0
  Hinge: JointRotMax=360 JointRotMaxFlag=0 JointRotMin=-360 JointRotMinFlag=0 JointRotate=90 JointRotateFlag=1 JointTransMax=1000 JointTransMaxFlag=0 JointTransMin=-1000 JointTransMinFlag=0 JointTranslate=0 JointTranslateFlag=0 OrientRotFlag=0 PrimOffAbsRelFlag=1 PrimType=0 PrimULoc=0 PrimVecAbsRelFlag=1 PrimWLoc=0 PrimXOff=0 PrimXOffRel=0 PrimXVec=0 PrimXVecRel=0 PrimYOff=0 PrimYOffRel=0 PrimYVec=1 PrimYVecRel=1 PrimZOff=0 PrimZOffRel=0 PrimZVec=0 PrimZVecRel=0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

Fuselage "Motor wingtip", child of "HingeGeom - Wing tip"
  location (X Y Z) 10.2 17.4081 5.8, rotation 0 90 0; relative location -3 0 0, rotation 0 0 0
  symmetric about XZ
  bounding box size 1.78654 36.5841 4
  Design: Length=4
  cross sections:
    n  XLocPercent  YLocPercent  ZLocPercent  shape
    0  0            0            0            circle Circle_Diameter=1.4
    1  0.333333     0            0            ellipse Ellipse_Height=1.7 Ellipse_Width=1.6
    2  0.666667     0            0            ellipse Ellipse_Height=1.2 Ellipse_Width=1.5
    3  1            0            0            ellipse Ellipse_Height=0.1 Ellipse_Width=1.24

Fuselage "Motor Nose", child of "HingeGeom - Wing tip"
  location (X Y Z) 10.2 17.4081 7.3, rotation 0 90 0; relative location -4.5 0 0, rotation 0 0 0
  symmetric about XZ
  bounding box size 1.63401 36.4502 1.5
  Design: Length=1.5
  cross sections:
    n  XLocPercent  YLocPercent  ZLocPercent  shape
    0  0            0            0            point
    1  0.222222     0            0            circle Circle_Diameter=0.85
    2  0.444444     0            0            circle Circle_Diameter=1.18
    3  0.666667     0            0            circle Circle_Diameter=1.4
    4  1            0            0            circle Circle_Diameter=1

Propeller "PropGeom", child of "HingeGeom - Wing tip"
  location (X Y Z) 10.2 17.4081 6.3, rotation 0 90 0; relative location -3.5 0 0, rotation 0 0 0
  symmetric about XZ
  bounding box size 9.73996 45.0201 0.715858
  Design: Diameter=10.2 NumBlade=5 Beta34=20 UseBeta34Flag=1 Feather=0 Rotate=0 Precone=0 ReverseFlag=0 FoldAngle=0 PropMode=0 AF=78.1509 CLi=0.540251 Chord=0.160367 Solidity=0.255233 ConstructXoC=0.5 FeatherAxisXoC=0.5 FeatherOffsetXoC=0
  cross sections:
    n  RadiusFrac  shape
    0  0.0980392   ellipse Ellipse_Height=0.129861 Ellipse_Width=0.259722
    1  0.4         NACA 16-series Chord=1.22228 IdealCl=0.7 ThickChord=0.144074
    2  1           NACA 16-series Chord=0.129861 IdealCl=0.2 ThickChord=0.03
  Chord along r/R (cubic Bezier): 0.0980392: 0.0509259, 0.217714: 0.256111, 0.337389: 0.239352, 0.457064: 0.239352, 0.557618: 0.213889, 0.658172: 0.198611, 0.758726: 0.127315, 0.839151: 0.0763889, 0.919575: 0.025463, 1: 0.025463
  Twist along r/R (PCHIP): 0.0980392: 46.75, 0.75: 20, 1: 13
  Thick along r/R (cubic Bezier): 0.0980392: 0.5, 0.165359: 0.3, 0.23268: 0.225, 0.3: 0.2, 0.4: 0.125, 0.5: 0.115, 0.6: 0.1, 0.733333: 0.075, 0.866667: 0.055, 1: 0.03
  CLI along r/R (cubic Bezier): 0.0980392: 0, 0.198693: 0.7, 0.299346: 0.7, 0.4: 0.7, 0.466667: 0.7, 0.533333: 0.7, 0.6: 0.7, 0.733333: 0.7, 0.866667: 0.7, 1: 0.2

Hinge "HingeGeom - tail"
  location (X Y Z) 19.4995 7.4 5, rotation 0 0 0
  Hinge: JointRotMax=360 JointRotMaxFlag=0 JointRotMin=-360 JointRotMinFlag=0 JointRotate=90 JointRotateFlag=1 JointTransMax=1000 JointTransMaxFlag=0 JointTransMin=-1000 JointTransMinFlag=0 JointTranslate=0 JointTranslateFlag=0 OrientRotFlag=0 PrimOffAbsRelFlag=1 PrimType=0 PrimULoc=0 PrimVecAbsRelFlag=1 PrimWLoc=0 PrimXOff=0 PrimXOffRel=0 PrimXVec=0 PrimXVecRel=0 PrimYOff=0 PrimYOffRel=0 PrimYVec=1 PrimYVecRel=1 PrimZOff=0 PrimZOffRel=0 PrimZVec=0 PrimZVecRel=0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

Fuselage "Motor tailtip", child of "HingeGeom - tail"
  location (X Y Z) 19.4995 7.4 6.5, rotation 0 90 0; relative location -1.5 0 0, rotation 0 0 0
  symmetric about XZ
  bounding box size 1.78654 16.5679 4
  Design: Length=4
  cross sections:
    n  XLocPercent  YLocPercent  ZLocPercent  shape
    0  0            0            0            circle Circle_Diameter=1.4
    1  0.333333     0            0            ellipse Ellipse_Height=1.7 Ellipse_Width=1.6
    2  0.666667     0            0            ellipse Ellipse_Height=1.2 Ellipse_Width=1.5
    3  1            0            0            ellipse Ellipse_Height=0.1 Ellipse_Width=1.24

Fuselage "Motor Nose", child of "HingeGeom - tail"
  location (X Y Z) 19.4995 7.4 8, rotation 0 90 0; relative location -3 0 0, rotation 0 0 0
  symmetric about XZ
  bounding box size 1.63401 16.434 1.5
  Design: Length=1.5
  cross sections:
    n  XLocPercent  YLocPercent  ZLocPercent  shape
    0  0            0            0            point
    1  0.222222     0            0            circle Circle_Diameter=0.85
    2  0.444444     0            0            circle Circle_Diameter=1.18
    3  0.666667     0            0            circle Circle_Diameter=1.4
    4  1            0            0            circle Circle_Diameter=1

Propeller "PropGeom", child of "HingeGeom - tail"
  location (X Y Z) 19.4995 7.4 7, rotation 0 90 0; relative location -2 0 0, rotation 0 0 0
  symmetric about XZ
  bounding box size 9.73996 25.0039 0.715858
  Design: Diameter=10.2 NumBlade=5 Beta34=20 UseBeta34Flag=1 Feather=0 Rotate=0 Precone=0 ReverseFlag=0 FoldAngle=0 PropMode=0 AF=78.1509 CLi=0.540251 Chord=0.160367 Solidity=0.255233 ConstructXoC=0.5 FeatherAxisXoC=0.5 FeatherOffsetXoC=0
  cross sections:
    n  RadiusFrac  shape
    0  0.0980392   ellipse Ellipse_Height=0.129861 Ellipse_Width=0.259722
    1  0.4         NACA 16-series Chord=1.22228 IdealCl=0.7 ThickChord=0.144074
    2  1           NACA 16-series Chord=0.129861 IdealCl=0.2 ThickChord=0.03
  blade curves as in "PropGeom"

Fuselage "Motor wingmid"
  location (X Y Z) 2.71348 7.1 3.3, rotation 0 0 0
  symmetric about XZ
  bounding box size 9 16.4237 2.17863
  Design: Length=9
  cross sections:
    n  XLocPercent  YLocPercent  ZLocPercent  shape
    0  0            0            0            circle Circle_Diameter=1.4
    1  0.333333     0            0            ellipse Ellipse_Height=1.7 Ellipse_Width=1.6
    2  0.666667     0            0            ellipse Ellipse_Height=1.2 Ellipse_Width=1.5
    3  1            0            0            ellipse Ellipse_Height=0.1 Ellipse_Width=1.24

Hinge "HingeGeom -midwing"
  location (X Y Z) 2.7 -7.1 4.3333, rotation 0 0 0
  Hinge: JointRotMax=360 JointRotMaxFlag=0 JointRotMin=-360 JointRotMinFlag=0 JointRotate=90 JointRotateFlag=1 JointTransMax=0 JointTransMaxFlag=0 JointTransMin=0 JointTransMinFlag=0 JointTranslate=0 JointTranslateFlag=0 OrientRotFlag=0 PrimOffAbsRelFlag=1 PrimType=0 PrimULoc=0 PrimVecAbsRelFlag=1 PrimWLoc=0 PrimXOff=0 PrimXOffRel=0 PrimXVec=0 PrimXVecRel=0 PrimYOff=0 PrimYOffRel=0 PrimYVec=1 PrimYVecRel=1 PrimZOff=0 PrimZOffRel=0 PrimZVec=0 PrimZVecRel=0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

Propeller "PropGeom", child of "HingeGeom -midwing"
  location (X Y Z) 1.7 -7.1 4.8333, rotation 0 90 0; relative location -0.5 0 -1, rotation 0 0 0
  symmetric about XZ
  bounding box size 9.73996 22.5264 0.715858
  Design: Diameter=10.2 NumBlade=5 Beta34=20 UseBeta34Flag=1 Feather=0 Rotate=0 Precone=0 ReverseFlag=1 FoldAngle=0 PropMode=0 AF=78.1509 CLi=0.540251 Chord=0.160367 Solidity=0.255233 ConstructXoC=0.5 FeatherAxisXoC=0.5 FeatherOffsetXoC=0
  cross sections:
    n  RadiusFrac  shape
    0  0.0980392   ellipse Ellipse_Height=0.129861 Ellipse_Width=0.259722
    1  0.4         NACA 16-series Chord=1.22228 IdealCl=0.7 ThickChord=0.144074
    2  1           NACA 16-series Chord=0.129861 IdealCl=0.2 ThickChord=0.03
  blade curves as in "PropGeom"

Fuselage "Motor Nose", child of "HingeGeom -midwing"
  location (X Y Z) 1.7 -7.1 5.8333, rotation 0 90 0; relative location -1.5 0 -1, rotation 0 0 0
  symmetric about XZ
  bounding box size 1.63401 15.834 1.5
  Design: Length=1.5
  cross sections:
    n  XLocPercent  YLocPercent  ZLocPercent  shape
    0  0            0            0            point
    1  0.222222     0            0            circle Circle_Diameter=0.85
    2  0.444444     0            0            circle Circle_Diameter=1.18
    3  0.666667     0            0            circle Circle_Diameter=1.4
    4  1            0            0            circle Circle_Diameter=1

Hinge "HingeGeom-balljoint"
  location (X Y Z) 2.751 7.1 3.3, rotation 0 0 0
  Hinge: JointRotMax=360 JointRotMaxFlag=0 JointRotMin=-360 JointRotMinFlag=0 JointRotate=0 JointRotateFlag=1 JointTransMax=1000 JointTransMaxFlag=0 JointTransMin=-1000 JointTransMinFlag=0 JointTranslate=0 JointTranslateFlag=0 OrientRotFlag=0 PrimOffAbsRelFlag=1 PrimType=0 PrimULoc=0 PrimVecAbsRelFlag=1 PrimWLoc=0 PrimXOff=0 PrimXOffRel=0 PrimXVec=1 PrimXVecRel=1 PrimYOff=0 PrimYOffRel=0 PrimYVec=0 PrimYVecRel=0 PrimZOff=0 PrimZOffRel=0 PrimZVec=0 PrimZVecRel=0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

Stack "ball joint", child of "HingeGeom-balljoint"
  location (X Y Z) 2.751 7.1 3.3, rotation 0 0 0; relative location 0 0 0, rotation 0 0 0
  symmetric about XZ
  bounding box size 1.18919 14.7 0.5
  cross sections:
    n  XDelta    YDelta  ZDelta  shape
    0  0         0       0       circle Circle_Diameter=0.5
    1  -1.18919  0       0       as above

Hinge "HingeGeom", child of "ball joint"
  location (X Y Z) 1.752 7.1 3.3, rotation 0 0 0; relative location -0.999 0 0, rotation 0 0 0
  Hinge: JointRotMax=360 JointRotMaxFlag=0 JointRotMin=-360 JointRotMinFlag=0 JointRotate=0 JointRotateFlag=1 JointTransMax=0 JointTransMaxFlag=0 JointTransMin=0 JointTransMinFlag=0 JointTranslate=0 JointTranslateFlag=0 OrientRotFlag=0 PrimOffAbsRelFlag=1 PrimType=0 PrimULoc=0 PrimVecAbsRelFlag=1 PrimWLoc=0 PrimXOff=0 PrimXOffRel=0 PrimXVec=0 PrimXVecRel=0 PrimYOff=0 PrimYOffRel=0 PrimYVec=1 PrimYVecRel=1 PrimZOff=0 PrimZOffRel=0 PrimZVec=0 PrimZVecRel=0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

Stack "ball joint", child of "HingeGeom"
  location (X Y Z) 1.752 7.1 3.3, rotation 0 90 0; relative location 0 0 0, rotation 0 90 0
  symmetric about XZ
  bounding box size 0.5 14.7 1
  cross sections:
    n  XDelta  YDelta  ZDelta  shape
    0  0       0       0       circle Circle_Diameter=0.5
    1  -1      0       0       as above

BodyOfRevolution "Ball", child of "HingeGeom"
  location (X Y Z) 1.402 7.1 3.3, rotation 0 0 0; relative location -0.35 0 0, rotation 0 0 0
  symmetric about XZ
  bounding box size 0.7 14.9 0.7
  Design: A0=0 Ae=0 Amin=0 AminW=0 Angle=0 Diameter=2 Mode=1
  profile: circle Circle_Diameter=0.7

User parameters
  Default_Group:Articulate = 90  (articulates the propellers)
  Default_Group:Tail Flap left inner = 0  (Default_Desc)
  Default_Group:Tail Flap left mid = 0  (Default_Desc)
  Default_Group:Tail Flap left outer = 0  (Default_Desc)
  Default_Group:Tail Flap right inner = 0  (Default_Desc)
  Default_Group:Tail Flap right mid = 0  (Default_Desc)
  Default_Group:Tail Flap right outer = 0  (Default_Desc)
  Default_Group:Wing Flap left inner = 0  (Default_Desc)
  Default_Group:Wing Flap left mid = 0  (Default_Desc)
  Default_Group:Wing Flap left outer = 0  (Default_Desc)
  Default_Group:Wing Flap right inner = 0  (Default_Desc)
  Default_Group:Wing Flap right mid = 0  (Default_Desc)
  Default_Group:Wing Flap right outer = 0  (Default_Desc)

Parameter links (A drives B)
  UserParm:Default_Group:Articulate -> HingeGeom - Wing tip:Hinge:JointRotate Offset=0  LowerLimit=-360 UpperLimit=360
  UserParm:Default_Group:Articulate -> HingeGeom - tail:Hinge:JointRotate Offset=0  LowerLimit=-360 UpperLimit=360
  UserParm:Default_Group:Articulate -> HingeGeom -midwing:Hinge:JointRotate Offset=0  LowerLimit=-360 UpperLimit=360
  UserParm:Default_Group:Articulate -> HingeGeom-balljoint:XForm:X_Rel_Location Offset=3.75 Scale=-0.0111 LowerLimit=-1e+12 UpperLimit=1e+12
  UserParm:Default_Group:Articulate -> HingeGeom:XForm:X_Rel_Location Offset=0 Scale=-0.0111
  UserParm:Default_Group:Articulate -> HingeGeom:Hinge:JointRotate Offset=-90
  UserParm:Default_Group:Wing Flap right outer -> HingeGeom -right outer:Hinge:JointRotate Offset=-58
  UserParm:Default_Group:Wing Flap right mid -> HingeGeom -right mid:Hinge:JointRotate Offset=-53.3659
  UserParm:Default_Group:Wing Flap right inner -> HingeGeom -right  inner:Hinge:JointRotate Offset=12.604
  UserParm:Default_Group:Wing Flap left outer -> HingeGeom - left side outer:Hinge:JointRotate Offset=226.19 Scale=-1
  UserParm:Default_Group:Wing Flap left mid -> HingeGeom - left mid:Hinge:JointRotate Offset=-152.762 Scale=-1
  UserParm:Default_Group:Wing Flap left inner -> HingeGeom -left inner:Hinge:JointRotate Offset=-197.651 Scale=-1
  UserParm:Default_Group:Tail Flap right outer -> HingeGeom - tip right outer:Hinge:JointRotate Offset=69.0476
  UserParm:Default_Group:Tail Flap right mid -> HingeGeom tail right mid:Hinge:JointRotate Offset=71.4286
  UserParm:Default_Group:Tail Flap right inner -> HingeGeom tail right inner:Hinge:JointRotate Offset=69.0476
  UserParm:Default_Group:Tail Flap left outer -> HingeGeom tail left outer:Hinge:JointRotate Offset=109.524 Scale=-1
  UserParm:Default_Group:Tail Flap left mid -> HingeGeom tail left min:Hinge:JointRotate Offset=109.524 Scale=-1
  UserParm:Default_Group:Tail Flap left inner -> HingeGeom tail left inner:Hinge:JointRotate Offset=111.905 Scale=-1
  UserParm:Default_Group:Articulate -> ball joint:XSec_1:XDelta Offset=-0.189189 Scale=-0.0111111

Advanced link "Unnamed_Link"
