OpenVSP model (file version 5), 7 components.
Geometry view with OpenVSP parameter names; values to 6 digits, angles in degrees, lengths in the model's unit.
Overall bounding box: X_Min=-10 X_Len=37.25 Y_Min=-19.1318 Y_Len=38.2636 Z_Min=-3.448 Z_Len=8.30635

Fuselage "FuselageGeom"
  location (X Y Z) -10 0 0, rotation 0 0.108696 0.108696
  bounding box size 37.25 3.41067 3.43024
  Design: Length=37.2501
  cross sections:
    n  XLocPercent  YLocPercent  ZLocPercent  shape
    0  0            0            0            point
    1  0.25         0            0            ellipse Ellipse_Height=3.38313 Ellipse_Width=2.81927
    2  0.5          0            0            as above
    3  0.75         0            0            as above
    4  1            0            0            point

Wing "WingGeom", child of "FuselageGeom"
  location (X Y Z) 4.67391 0 0, rotation 0 0 0
  symmetric about XZ
  bounding box size 12.5962 38.2636 1.25152
  totals: TotalSpan=38.144 TotalProjectedSpan=38.1107 TotalChord=4.25258 TotalArea=162.21 TotalAR=8.95399
  root: chord 6.80412, twist 0, NACA 4-series Camber=0 CamberLoc=0.2 DeltaX=0.0181818 Invert=1 Scale=1 ThickChord=0.1
  sections:
    n  Span    Root_Chord  Tip_Chord  Area     Sweep  Sweep_Location  Dihedral  Twist    Twist_Location  tip airfoil
    1  19.072  6.80412     1.70103    81.1051  30     0               -2.3913   2.63636  0               NACA 4-series Camber=0 CamberLoc=0.2 ThickChord=0.1

Wing "WingGeom"
  location (X Y Z) 17.8261 0 0, rotation 0 0 0
  symmetric about XZ
  bounding box size 6.49605 17.7799 3.64812
  totals: TotalSpan=18.8313 TotalProjectedSpan=17.6956 TotalChord=2.5 TotalArea=47.0782 TotalAR=6.65138
  root: chord 4, twist 0, NACA 4-series Camber=0 CamberLoc=0.2 ThickChord=0.1
  sections:
    n  Span     Root_Chord  Tip_Chord  Area     Sweep    Sweep_Location  Dihedral  Twist     Twist_Location  tip airfoil
    1  9.41565  4           1          23.5391  30.2727  0               -20       -11.7273  1               as above

Stack "StackGeom"
  location (X Y Z) 4.85714 6.14357 1.13006, rotation 0 0 0
  bounding box size 4.5 3 2.5
  cross sections:
    n  XDelta  YDelta  ZDelta  shape
    0  0       0       0       point
    1  1       0       0       ellipse Ellipse_Height=2.5 Ellipse_Width=3
    2  2       0       0       as above
    3  1       0       0       as above
    4  0.5     0       0       point

Stack "StackGeom", child of "StackGeom"
  location (X Y Z) 4.77612 -5.99454 1.04478, rotation 0 0 0
  bounding box size 4.5 3 2.5
  cross sections:
    n  XDelta  YDelta  ZDelta  shape
    0  0       0       0       point
    1  1       0       0       ellipse Ellipse_Height=2.5 Ellipse_Width=3
    2  2       0       0       as above
    3  1       0       0       as above
    4  0.5     0       0       point

Propeller "PropGeom"
  location (X Y Z) 5.1087 -6.08717 1.19, rotation 0 0 0
  bounding box size 0.375645 6.99262 7.33671
  Design: Diameter=7.55872 NumBlade=5 Beta34=20 UseBeta34Flag=1 Feather=0 Rotate=0 Precone=0 ReverseFlag=0 FoldAngle=0 PropMode=0 AF=151.538 CLi=0.538798 Chord=0.177656 Solidity=0.282749 ConstructXoC=0.5 FeatherAxisXoC=0.5 FeatherOffsetXoC=0
  cross sections:
    n  RadiusFrac  shape
    0  0.2         ellipse Ellipse_Height=0.151174 Ellipse_Width=0.302349
    1  0.4         NACA 16-series Chord=0.628319 IdealCl=0.7 ThickChord=0.144074
    2  1           NACA 16-series Chord=0.491317 IdealCl=0.2 ThickChord=0.03
  Chord along r/R (cubic Bezier): 0.2: 0.08, 0.333333: 0.15, 0.466667: 0.2, 0.6: 0.2, 0.716667: 0.2, 0.833333: 0.2, 0.95: 0.2, 0.966667: 0.2, 0.983333: 0.2, 1: 0.13
  Twist along r/R (PCHIP): 0.2: 46.75, 0.75: 20, 1: 13
  Thick along r/R (cubic Bezier): 0.2: 0.5, 0.233333: 0.3, 0.266667: 0.225, 0.3: 0.2, 0.4: 0.125, 0.5: 0.115, 0.6: 0.1, 0.733333: 0.075, 0.866667: 0.055, 1: 0.03
  CLI along r/R (cubic Bezier): 0.2: 0, 0.266667: 0.7, 0.333333: 0.7, 0.4: 0.7, 0.466667: 0.7, 0.533333: 0.7, 0.6: 0.7, 0.733333: 0.7, 0.866667: 0.7, 1: 0.2

Propeller "PropGeom", child of "PropGeom"
  location (X Y Z) 5.1087 6.19543 1.19, rotation 0 0 0
  bounding box size 0.375645 6.99262 7.33671
  Design: Diameter=7.55872 NumBlade=5 Beta34=20 UseBeta34Flag=1 Feather=0 Rotate=0 Precone=0 ReverseFlag=0 FoldAngle=0 PropMode=0 AF=151.538 CLi=0.538798 Chord=0.177656 Solidity=0.282749 ConstructXoC=0.5 FeatherAxisXoC=0.5 FeatherOffsetXoC=0
  cross sections:
    n  RadiusFrac  shape
    0  0.2         ellipse Ellipse_Height=0.151174 Ellipse_Width=0.302349
    1  0.4         NACA 16-series Chord=0.628319 IdealCl=0.7 ThickChord=0.144074
    2  1           NACA 16-series Chord=0.491317 IdealCl=0.2 ThickChord=0.03
  blade curves as in "PropGeom"
