OpenVSP model (file version 5), 48 components.
Geometry view with OpenVSP parameter names; values to 6 digits, angles in degrees, lengths in the model's unit.
Overall bounding box: X_Min=-12.9075 X_Len=29.3813 Y_Min=-21.8326 Y_Len=43.6652 Z_Min=-4.65913 Z_Len=12.1364

Fuselage "FuselageGeom"
  location (X Y Z) -11.887 0 -1.15913, rotation 0 0 0
  bounding box size 27.3536 5.83621 5.55516
  Design: Length=27
  cross sections:
    n  XLocPercent  YLocPercent  ZLocPercent  shape
    0  0            0            0            circle Circle_Diameter=0.5
    1  0.0741408    0            0.0111111    rounded rectangle RoundRectXSec_Radius=1 RoundedRect_Height=2.8 RoundedRect_Width=3.25
    2  0.197709     0            0.0434783    rounded rectangle RoundRectXSec_Radius=1.5 RoundedRect_Height=5.5 RoundedRect_Width=5.5
    3  0.411455     0            0.0434783    rounded rectangle RoundRectXSec_Radius=1.5 RoundedRect_Height=5.55516 RoundedRect_Width=5.5
    4  0.644632     0            0.0833333    rounded rectangle RoundRectXSec_Radius=1.25 RoundedRect_Height=3 RoundedRect_Width=3.5
    5  1            0            0.111111     circle Circle_Diameter=0.5

Fuselage "EngineGroup_9_PWPT61200hp", child of "FuselageGeom"
  location (X Y Z) 2.56954 0 1.34087, rotation 0 0 0; relative location 14.4565 0 2.5, rotation 0 0 0
  bounding box size 3.23706 1.583 1.583
  Design: Length=3
  cross sections:
    n  XLocPercent  YLocPercent  ZLocPercent  shape
    0  0            0            0            point
    1  0.05         0            0            ellipse Ellipse_Height=1.583 Ellipse_Width=1.583
    2  0.5          0            0            as above
    3  0.95         0            0            as above
    4  1            0            0            point

Fuselage "FuelTank_1", child of "FuselageGeom"
  location (X Y Z) -10.6479 0 -1.06194, rotation 0 0 0; relative location 1.23913 0 0.0971929, rotation 0 0 0
  bounding box size 3.15 1 1
  Design: Length=3.15
  cross sections:
    n  XLocPercent  YLocPercent  ZLocPercent  shape
    0  0            0            0            point
    1  0.013587     0            0            rounded rectangle RoundRectXSec_Radius=0.1 RoundedRect_Height=1 RoundedRect_Width=1
    2  0.5          0            0            as above
    3  0.986413     0            0            as above
    4  1            0            0            point

Fuselage "FuelTank_2_full", child of "FuselageGeom"
  location (X Y Z) 2.55601 0 0.264148, rotation 0 90 0; relative location 14.443 0 1.42328, rotation 0 90 0
  bounding box size 2 2 1.25
  Design: Length=1.25
  cross sections:
    n  XLocPercent  YLocPercent  ZLocPercent  shape
    0  0            0            0            point
    1  0.013587     0            0            rounded rectangle RoundRectXSec_Radius=0.1 RoundedRect_Height=2 RoundedRect_Width=2
    2  0.5          0            0            as above
    3  0.986413     0            0            as above
    4  1            0            0            point

Wing "LandingGear_015.NoseStrutFairing", child of "FuselageGeom"
  location (X Y Z) -8.88698 0 -2.20913, rotation -90 0 0; relative location 3 0 -1.05, rotation -90 0 0
  symmetric about XZ
  bounding box size 1.40192 0.104472 1.98071
  totals: TotalSpan=3 TotalProjectedSpan=3 TotalChord=0.875 TotalArea=2.625 TotalAR=3.42857
  root: chord 0.75, twist 0, NACA 4-series Camber=0 CamberLoc=0.2 ThickChord=0.1
  sections:
    n  Span  Root_Chord  Tip_Chord  Area    Sweep  Sweep_Location  Dihedral  Twist  Twist_Location  tip airfoil
    1  1.5   0.75        1          1.3125  15     0               0         0      0.25            as above

Wing "LandingGear_070.MainGearFairing", child of "FuselageGeom"
  location (X Y Z) -1.97167 1.84783 -2.20913, rotation -59.7608 0 0; relative location 9.91531 1.84783 -1.05, rotation -59.7608 0 0
  symmetric about XZ
  bounding box size 2.91415 5.31344 2.48194
  totals: TotalSpan=4.31256 TotalProjectedSpan=4.07984 TotalChord=1.85898 TotalArea=8.25095 TotalAR=2.01736
  root: chord 2.21615, twist 0, NACA 4-series Camber=0 CamberLoc=0.2 ThickChord=0.18
  sections:
    n  Span      Root_Chord  Tip_Chord  Area     Sweep    Sweep_Location  Dihedral  Twist  Twist_Location  tip airfoil
    1  1.28776   2.21615     2.0599     2.75326  22.3636  0               0         0      0.25            as above
    2  0.868518  2.0599      1.1        1.37221  55.9318  0               -30       0      0.25            as above

Pod "LandingGear_005.fronttire", child of "FuselageGeom"
  location (X Y Z) -7.88698 -0.238095 -4.05913, rotation 0 0 90; relative location 4 -0.238095 -2.9, rotation 0 0 90
  bounding box size 1.2 0.6 1.2
  Design: FineRatio=1 Length=0.6

BodyOfRevolution "FrontTire", child of "FuselageGeom"
  location (X Y Z) -7.88698 0 -4.05913, rotation 0 0 90; relative location 4 0 -2.9, rotation 0 0 90
  bounding box size 1.2 0.333 1.2
  Design: A0=0 Ae=0 Amin=0 AminW=0 Angle=0 Diameter=2 Mode=1
  profile: rounded rectangle DeltaX=-0.5 RoundRectXSec_Radius=0.08325 RoundedRect_Height=1.2 RoundedRect_Width=0.333

Pod "LandingGear_010.maintires", child of "FuselageGeom"
  location (X Y Z) 0.752805 2.3 -4.05913, rotation 0 0 90; relative location 12.6398 2.3 -2.9, rotation 0 0 90
  symmetric about XZ
  bounding box size 1.2 5.8 1.2
  Design: FineRatio=1 Length=0.6

BodyOfRevolution "MainTires", child of "FuselageGeom"
  location (X Y Z) 0.753018 2.5 -4.05913, rotation 0 0 90; relative location 12.64 2.5 -2.9, rotation 0 0 90
  symmetric about XZ
  bounding box size 1.2 5.333 1.2
  Design: A0=0 Ae=0 Amin=0 AminW=0 Angle=0 Diameter=2 Mode=1
  profile: rounded rectangle DeltaX=-0.5 RoundRectXSec_Radius=0.08325 RoundedRect_Height=1.2 RoundedRect_Width=0.333

Human "HumanGeom", child of "FuselageGeom"
  location (X Y Z) -5.28698 -1.25 0.0834051, rotation 0 0 0; relative location 6.6 -1.25 1.24254, rotation 0 0 0
  mass: Density=67.9173 Shell_Flag=0 Mass_Area=1 Mass_Prior=0
  Anthropometric: Age=30 AutoDensity=1 BMI=21.8176 BMI_pct=0.0847851 GenderFlag=0 LenUnit=4 Mass=148.317 MassUnit=3 SitFrac=0.51 Stature=5.76115 Stature_pct=0.5 Volume=2.18379

Human "HumanGeom", child of "FuselageGeom"
  location (X Y Z) -5.28698 1.25 0.0834051, rotation 0 0 0; relative location 6.6 1.25 1.24254, rotation 0 0 0
  mass: Density=67.9173 Shell_Flag=0 Mass_Area=1 Mass_Prior=0
  Anthropometric: Age=30 AutoDensity=1 BMI=21.8176 BMI_pct=0.0847851 GenderFlag=0 LenUnit=4 Mass=148.317 MassUnit=3 SitFrac=0.51 Stature=5.76115 Stature_pct=0.5 Volume=2.18379

Human "HumanGeom", child of "FuselageGeom"
  location (X Y Z) -2.28698 -1.25 0.0834051, rotation 0 0 0; relative location 9.6 -1.25 1.24254, rotation 0 0 0
  mass: Density=67.9173 Shell_Flag=0 Mass_Area=1 Mass_Prior=0
  Anthropometric: Age=30 AutoDensity=1 BMI=21.8176 BMI_pct=0.0847851 GenderFlag=0 LenUnit=4 Mass=148.317 MassUnit=3 SitFrac=0.51 Stature=5.76115 Stature_pct=0.5 Volume=2.18379

Human "HumanGeom", child of "FuselageGeom"
  location (X Y Z) -2.28698 1.25 0.0834051, rotation 0 0 0; relative location 9.6 1.25 1.24254, rotation 0 0 0
  mass: Density=67.9173 Shell_Flag=0 Mass_Area=1 Mass_Prior=0
  Anthropometric: Age=30 AutoDensity=1 BMI=21.8176 BMI_pct=0.0847851 GenderFlag=0 LenUnit=4 Mass=148.317 MassUnit=3 SitFrac=0.51 Stature=5.76115 Stature_pct=0.5 Volume=2.18379

Human "HumanGeom", child of "FuselageGeom"
  location (X Y Z) 0.963018 -1.25 0.0834051, rotation 0 0 0; relative location 12.85 -1.25 1.24254, rotation 0 0 0
  mass: Density=67.9173 Shell_Flag=0 Mass_Area=1 Mass_Prior=0
  Anthropometric: Age=30 AutoDensity=1 BMI=21.8176 BMI_pct=0.0847851 GenderFlag=0 LenUnit=4 Mass=148.317 MassUnit=3 SitFrac=0.51 Stature=5.76115 Stature_pct=0.5 Volume=2.18379

Human "HumanGeom", child of "FuselageGeom"
  location (X Y Z) 0.963018 1.25 0.0834051, rotation 0 0 0; relative location 12.85 1.25 1.24254, rotation 0 0 0
  mass: Density=67.9173 Shell_Flag=0 Mass_Area=1 Mass_Prior=0
  Anthropometric: Age=30 AutoDensity=1 BMI=21.8176 BMI_pct=0.0847851 GenderFlag=0 LenUnit=4 Mass=148.317 MassUnit=3 SitFrac=0.51 Stature=5.76115 Stature_pct=0.5 Volume=2.18379

Wing "Tail_1", child of "FuselageGeom"
  location (X Y Z) 9.28846 0 1.7178, rotation 90 0 0; relative location 21.1754 0 2.87693, rotation 90 0 0
  bounding box size 7.18534 1.17494 4.9
  totals: TotalSpan=4.9 TotalProjectedSpan=4.9 TotalChord=3.62 TotalArea=15.9154 TotalAR=1.5086
  root: chord 5.87239, twist 0, NACA 4-series Camber=0 CamberLoc=0.2 ThickChord=0.2
  sections:
    n  Span      Root_Chord  Tip_Chord  Area     Sweep  Sweep_Location  Dihedral  Twist  Twist_Location  tip airfoil
    1  0.984878  5.87239     3.80882    4.7674   15     1               0         0      0.25            as above
    2  0.368613  3.80882     3.46256    1.34016  15     1               0         0      0.25            as above
    3  0.448719  3.46256     3.17401    1.48898  15     1               0         0      0.25            as above
    4  3.09779   3.17401     2.19683    8.31887  15     1               0         0      0.25            as above
  SS_Control "SS_CONT_0": UStart=0.33 UEnd=0.833333 Length_C_Start=0.3 Length_C_End=0.3 Length_Start=1.15503 Length_End=0.659049 LE_Flag=0 Surf_Type=2

Wing "Rear Wing", child of "FuselageGeom"
  location (X Y Z) 11.867 0 2.06128, rotation 0 0 0; relative location 23.754 0 3.22041, rotation 0 0 0
  symmetric about XZ
  bounding box size 3.27761 9.45883 0.754109
  totals: TotalSpan=9.45883 TotalProjectedSpan=9.45883 TotalChord=2.9469 TotalArea=27.8742 TotalAR=3.20976
  root: chord 3.27761, twist 0, NACA 4-series Camber=0 CamberLoc=0.2 ThickChord=0.23
  sections:
    n  Span     Root_Chord  Tip_Chord  Area     Sweep  Sweep_Location  Dihedral  Twist  Twist_Location  tip airfoil
    1  4.72942  3.27761     2.61618    13.9371  0      0.25            0         0      0.25            NACA 4-series Camber=0 CamberLoc=0.2 ThickChord=0.1

Wing "MainWing", child of "FuselageGeom"
  location (X Y Z) -4.68051 0 2.26128, rotation 0 0 0; relative location 7.20648 0 3.42041, rotation 0 0 0
  symmetric about XZ
  bounding box size 3.87006 34.4509 0.890419
  totals: TotalSpan=34.4509 TotalProjectedSpan=34.4509 TotalChord=3.87006 TotalArea=133.327 TotalAR=8.90189
  root: chord 3.87006, twist 0, NACA 4-series Camber=0 CamberLoc=0.2 ThickChord=0.23
  sections:
    n  Span     Root_Chord  Tip_Chord  Area     Sweep  Sweep_Location  Dihedral  Twist  Twist_Location  tip airfoil
    1  7.92371  3.87006     3.87006    30.6652  0      0.25            0         0      0.25            as above
    2  9.30174  3.87006     3.87006    35.9983  0      0.25            0         0      0.25            NACA 4-series Camber=0 CamberLoc=0.2 ThickChord=0.1

Blank "Pivot_1", child of "MainWing"
  location (X Y Z) -3.71299 -17.2254 2.26128, rotation 0 90 0; relative location 0.967516 -17.2254 0, rotation 0 90 0

Blank "Hub_1", child of "Pivot_1"
  location (X Y Z) -3.71299 -17.2254 5.70636, rotation 0 90 0; relative location -3.44509 0 0, rotation 0 0 0

Propeller "Prop_1", child of "Hub_1"
  location (X Y Z) -3.71299 -17.2254 5.70636, rotation 0 90 0; relative location 0 0 0, rotation 0 0 0
  bounding box size 9.21431 9.21431 0.39185
  Design: Diameter=9.1869 NumBlade=8 Beta34=20 UseBeta34Flag=1 Feather=3.30904 Rotate=0 Precone=0 ReverseFlag=1 FoldAngle=0 PropMode=0 AF=51.7341 CLi=0.539797 Chord=0.0849227 Solidity=0.216254 ConstructXoC=0.5 FeatherAxisXoC=0.5 FeatherOffsetXoC=0
  cross sections:
    n  RadiusFrac  shape
    0  0.15        ellipse Ellipse_Height=0.0660856 Ellipse_Width=0.550713
    1  0.4         NACA 16-series Chord=0.456228 IdealCl=0.7 ThickChord=0.12
    2  1           NACA 16-series Chord=0.229464 IdealCl=0.2 ThickChord=0.12
  Chord along r/R (linear): 0.15: 0.119891, 1: 0.0499545
  Twist along r/R (cubic Bezier): 0.15: 41.6271, 0.185417: 42.3167, 0.220833: 37.8335, 0.25625: 34.1794, 0.291667: 30.5254, 0.327083: 28.2484, 0.3625: 26.4162, 0.433333: 22.752, 0.504167: 20.9509, 0.575: 19.4972, 0.716667: 16.59, 0.858333: 15.4417, 1: 14.4812
  Thick along r/R (linear): 0.15: 0.12, 1: 0.12
  CLI along r/R (cubic Bezier): 0.15: 0, 0.233333: 0.7, 0.316667: 0.7, 0.4: 0.7, 0.466667: 0.7, 0.533333: 0.7, 0.6: 0.7, 0.733333: 0.7, 0.866667: 0.7, 1: 0.2

Fuselage "Nacelle_1", child of "Hub_1"
  location (X Y Z) -3.71299 -17.2254 7.40594, rotation 0 90 0; relative location -1.69958 0 0, rotation 0 0 0
  bounding box size 1.44694 1.44694 7.67135
  Design: Length=7.6
  cross sections:
    n  XLocPercent  YLocPercent  ZLocPercent  shape
    0  0            0            0            circle Circle_Diameter=0.344509
    1  0.3          0            0            ellipse Ellipse_Height=1.44694 Ellipse_Width=1.44694
    2  0.5          0            0            as above
    3  1            0            0            point

Blank "Pivot_2", child of "MainWing"
  location (X Y Z) -7.8471 -7.92371 2.26128, rotation -180 0 -180; relative location -3.16659 -7.92371 0, rotation -180 0 -180

Blank "Hub_2", child of "Pivot_2"
  location (X Y Z) -5.55037 -7.92371 3.63931, rotation -180 0 -180; relative location -2.29673 0 -1.37804, rotation 0 0 0

Propeller "Prop_2", child of "Hub_2"
  location (X Y Z) -8.30037 -7.92371 3.63931, rotation 0 -90 0; relative location 2.75 0 0, rotation 0 90 0
  bounding box size 9.21431 9.21431 0.39185
  Design: Diameter=9.1869 NumBlade=8 Beta34=20 UseBeta34Flag=1 Feather=3.30904 Rotate=0 Precone=0 ReverseFlag=1 FoldAngle=0 PropMode=0 AF=51.7341 CLi=0.539797 Chord=0.0849227 Solidity=0.216254 ConstructXoC=0.5 FeatherAxisXoC=0.5 FeatherOffsetXoC=0
  cross sections:
    n  RadiusFrac  shape
    0  0.15        ellipse Ellipse_Height=0.0660856 Ellipse_Width=0.550713
    1  0.4         NACA 16-series Chord=0.456228 IdealCl=0.7 ThickChord=0.12
    2  1           NACA 16-series Chord=0.229464 IdealCl=0.2 ThickChord=0.12
  blade curves as in "Prop_1"

Fuselage "Nacelle_2", child of "Hub_2"
  location (X Y Z) -8.35037 -7.92371 5.37844, rotation 0 90 0; relative location 2.8 0 -1.73913, rotation 0 -90 0
  bounding box size 1.44694 1.44694 4.1168
  Design: Length=4.04545
  cross sections:
    n  XLocPercent  YLocPercent  ZLocPercent  shape
    0  0            0            0            circle Circle_Diameter=0.344509
    1  0.3          0            0            ellipse Ellipse_Height=1.44694 Ellipse_Width=1.44694
    2  1            0            0            as above

Blank "Pivot_3", child of "MainWing"
  location (X Y Z) -7.8471 7.92371 2.26128, rotation -180 0 -180; relative location -3.16659 7.92371 0, rotation -180 0 -180

Blank "Hub_3", child of "Pivot_3"
  location (X Y Z) -5.55037 7.92371 3.63931, rotation -180 0 -180; relative location -2.29673 0 -1.37804, rotation 0 0 0

Propeller "Prop_3", child of "Hub_3"
  location (X Y Z) -8.30037 7.92371 3.63931, rotation 0 90 0; relative location 2.75 0 0, rotation 0 -90 0
  bounding box size 9.21431 9.21431 0.39185
  Design: Diameter=9.1869 NumBlade=8 Beta34=20 UseBeta34Flag=1 Feather=3.30904 Rotate=0 Precone=0 ReverseFlag=1 FoldAngle=0 PropMode=0 AF=51.7341 CLi=0.539797 Chord=0.0849227 Solidity=0.216254 ConstructXoC=0.5 FeatherAxisXoC=0.5 FeatherOffsetXoC=0
  cross sections:
    n  RadiusFrac  shape
    0  0.15        ellipse Ellipse_Height=0.0660856 Ellipse_Width=0.550713
    1  0.4         NACA 16-series Chord=0.456228 IdealCl=0.7 ThickChord=0.12
    2  1           NACA 16-series Chord=0.229464 IdealCl=0.2 ThickChord=0.12
  blade curves as in "Prop_1"

Fuselage "Nacelle_3", child of "Hub_3"
  location (X Y Z) -8.35037 7.92371 5.37831, rotation 0 90 0; relative location 2.8 0 -1.739, rotation 0 -90 0
  bounding box size 1.44694 1.44694 4.1168
  Design: Length=4.04545
  cross sections:
    n  XLocPercent  YLocPercent  ZLocPercent  shape
    0  0            0            0            circle Circle_Diameter=0.344509
    1  0.3          0            0            ellipse Ellipse_Height=1.44694 Ellipse_Width=1.44694
    2  1            0            0            as above

Blank "Pivot_4", child of "MainWing"
  location (X Y Z) -3.71299 17.2254 2.26128, rotation 0 90 0; relative location 0.967516 17.2254 0, rotation 0 90 0

Blank "Hub_4", child of "Pivot_4"
  location (X Y Z) -3.71299 17.2254 5.70636, rotation 0 90 0; relative location -3.44509 0 0, rotation 0 0 0

Propeller "Prop_4", child of "Hub_4"
  location (X Y Z) -3.71299 17.2254 5.70636, rotation 0 90 0; relative location 0 0 0, rotation 0 0 0
  bounding box size 9.21431 9.21431 0.39185
  Design: Diameter=9.1869 NumBlade=8 Beta34=20 UseBeta34Flag=1 Feather=3.30904 Rotate=0 Precone=0 ReverseFlag=0 FoldAngle=0 PropMode=0 AF=51.7341 CLi=0.539797 Chord=0.0849227 Solidity=0.216254 ConstructXoC=0.5 FeatherAxisXoC=0.5 FeatherOffsetXoC=0
  cross sections:
    n  RadiusFrac  shape
    0  0.15        ellipse Ellipse_Height=0.0660856 Ellipse_Width=0.550713
    1  0.4         NACA 16-series Chord=0.456228 IdealCl=0.7 ThickChord=0.12
    2  1           NACA 16-series Chord=0.229464 IdealCl=0.2 ThickChord=0.12
  blade curves as in "Prop_1"

Fuselage "Nacelle_4", child of "Hub_4"
  location (X Y Z) -3.71299 17.2254 7.40594, rotation 0 90 0; relative location -1.69958 0 0, rotation 0 0 0
  bounding box size 1.44694 1.44694 7.67135
  Design: Length=7.6
  cross sections:
    n  XLocPercent  YLocPercent  ZLocPercent  shape
    0  0            0            0            circle Circle_Diameter=0.344509
    1  0.3          0            0            ellipse Ellipse_Height=1.44694 Ellipse_Width=1.44694
    2  0.5          0            0            as above
    3  1            0            0            point

Blank "Hub_5", child of "MainWing"
  location (X Y Z) 2.71784 -7.92371 3.86898, rotation 0 90 0; relative location 7.39835 -7.92371 1.60771, rotation 0 90 0

Propeller "Prop_5_U", child of "Hub_5"
  location (X Y Z) 2.71784 -7.92371 3.86898, rotation 90 0 -90; relative location 0 0 0, rotation 90 0 0
  bounding box size 4.97189 8.17948 0.783699
  Design: Diameter=9.1869 NumBlade=2 Beta34=20 UseBeta34Flag=1 Feather=3.30904 Rotate=60 Precone=0 ReverseFlag=0 FoldAngle=0 PropMode=0 AF=103.468 CLi=0.539797 Chord=0.169845 Solidity=0.108127 ConstructXoC=0.5 FeatherAxisXoC=0.5 FeatherOffsetXoC=0
  cross sections:
    n  RadiusFrac  shape
    0  0.15        ellipse Ellipse_Height=0.132171 Ellipse_Width=1.10143
    1  0.4         NACA 16-series Chord=0.912456 IdealCl=0.7 ThickChord=0.12
    2  1           NACA 16-series Chord=0.458927 IdealCl=0.2 ThickChord=0.12
  Chord along r/R (linear): 0.15: 0.239782, 1: 0.0999091
  Twist along r/R (cubic Bezier): 0.15: 41.6271, 0.185417: 42.3167, 0.220833: 37.8335, 0.25625: 34.1794, 0.291667: 30.5254, 0.327083: 28.2484, 0.3625: 26.4162, 0.433333: 22.752, 0.504167: 20.9509, 0.575: 19.4972, 0.716667: 16.59, 0.858333: 15.4417, 1: 14.4812
  Thick along r/R (linear): 0.15: 0.12, 1: 0.12
  CLI along r/R (cubic Bezier): 0.15: 0, 0.233333: 0.7, 0.316667: 0.7, 0.4: 0.7, 0.466667: 0.7, 0.533333: 0.7, 0.6: 0.7, 0.733333: 0.7, 0.866667: 0.7, 1: 0.2

Fuselage "Nacelle_5", child of "Hub_5"
  location (X Y Z) 2.71784 -7.92371 5.56856, rotation 0 90 0; relative location -1.69958 0 0, rotation 0 0 0
  bounding box size 1.44694 1.44694 4.22146
  Design: Length=4.15011
  cross sections:
    n  XLocPercent  YLocPercent  ZLocPercent  shape
    0  0            0            0            circle Circle_Diameter=0.344509
    1  0.3          0            0            ellipse Ellipse_Height=1.44694 Ellipse_Width=1.44694
    2  1            0            0            as above

Propeller "Prop_5_B", child of "Hub_5"
  location (X Y Z) 2.71784 -7.92371 3.01898, rotation 90 0 -90; relative location 0.85 0 0, rotation 90 0 0
  bounding box size 8.17458 4.97294 0.783699
  Design: Diameter=9.1869 NumBlade=2 Beta34=20 UseBeta34Flag=1 Feather=3.30904 Rotate=30 Precone=0 ReverseFlag=0 FoldAngle=0 PropMode=0 AF=103.468 CLi=0.539797 Chord=0.169845 Solidity=0.108127 ConstructXoC=0.5 FeatherAxisXoC=0.5 FeatherOffsetXoC=0
  cross sections:
    n  RadiusFrac  shape
    0  0.15        ellipse Ellipse_Height=0.132171 Ellipse_Width=1.10143
    1  0.4         NACA 16-series Chord=0.912456 IdealCl=0.7 ThickChord=0.12
    2  1           NACA 16-series Chord=0.458927 IdealCl=0.2 ThickChord=0.12
  blade curves as in "Prop_5_U"

Blank "Hub_6", child of "MainWing"
  location (X Y Z) 2.71784 7.92371 3.86898, rotation 0 90 0; relative location 7.39835 7.92371 1.60771, rotation 0 90 0

Propeller "Prop_6_U", child of "Hub_6"
  location (X Y Z) 2.71784 7.92371 3.86898, rotation 90 0 -90; relative location 0 0 0, rotation 90 0 0
  bounding box size 4.97189 8.17948 0.783699
  Design: Diameter=9.1869 NumBlade=2 Beta34=20 UseBeta34Flag=1 Feather=3.30904 Rotate=60 Precone=0 ReverseFlag=1 FoldAngle=0 PropMode=0 AF=103.468 CLi=0.539797 Chord=0.169845 Solidity=0.108127 ConstructXoC=0.5 FeatherAxisXoC=0.5 FeatherOffsetXoC=0
  cross sections:
    n  RadiusFrac  shape
    0  0.15        ellipse Ellipse_Height=0.132171 Ellipse_Width=1.10143
    1  0.4         NACA 16-series Chord=0.912456 IdealCl=0.7 ThickChord=0.12
    2  1           NACA 16-series Chord=0.458927 IdealCl=0.2 ThickChord=0.12
  blade curves as in "Prop_5_U"

Fuselage "Nacelle_6", child of "Hub_6"
  location (X Y Z) 2.71784 7.92371 5.56856, rotation 0 90 0; relative location -1.69958 0 0, rotation 0 0 0
  bounding box size 1.44694 1.44694 4.22146
  Design: Length=4.15011
  cross sections:
    n  XLocPercent  YLocPercent  ZLocPercent  shape
    0  0            0            0            circle Circle_Diameter=0.344509
    1  0.3          0            0            ellipse Ellipse_Height=1.44694 Ellipse_Width=1.44694
    2  1            0            0            as above

Propeller "Prop_6_B", child of "Hub_6"
  location (X Y Z) 2.71784 7.92371 3.01898, rotation 90 0 -90; relative location 0.85 0 0, rotation 90 0 0
  bounding box size 8.17458 4.97294 0.783699
  Design: Diameter=9.1869 NumBlade=2 Beta34=20 UseBeta34Flag=1 Feather=3.30904 Rotate=30 Precone=0 ReverseFlag=1 FoldAngle=0 PropMode=0 AF=103.468 CLi=0.539797 Chord=0.169845 Solidity=0.108127 ConstructXoC=0.5 FeatherAxisXoC=0.5 FeatherOffsetXoC=0
  cross sections:
    n  RadiusFrac  shape
    0  0.15        ellipse Ellipse_Height=0.132171 Ellipse_Width=1.10143
    1  0.4         NACA 16-series Chord=0.912456 IdealCl=0.7 ThickChord=0.12
    2  1           NACA 16-series Chord=0.458927 IdealCl=0.2 ThickChord=0.12
  blade curves as in "Prop_5_U"

Fuselage "Pylons", child of "MainWing"
  location (X Y Z) -9.20617 -7.924 1.74388, rotation 0 0 0; relative location -4.52566 -7.924 -0.517391, rotation 0 0 0
  symmetric about XZ
  bounding box size 10.9545 17.2949 1.44694
  Design: Length=10.9545
  cross sections:
    n  XLocPercent  YLocPercent  ZLocPercent  shape
    0  0            0            0            circle Circle_Diameter=0.344509
    1  0            0            0            ellipse Ellipse_Height=1.44694 Ellipse_Width=1.44694
    2  1            0            0            as above
    3  1            0            0            point

Blank "NDARC_Origin", child of "FuselageGeom"
  location (X Y Z) -3.71299 0 2.26128, rotation 0 0 0; relative location 8.17399 0 3.42041, rotation 0 0 0

Blank "NDARC_CG", child of "NDARC_Origin"
  location (X Y Z) -3.41442 0 -0.95414, rotation 0 0 0; relative location 0.298574 0 -3.21542, rotation 0 0 0

Blank "Fuse_CG", child of "FuselageGeom"
  location (X Y Z) 0 0 0, rotation 0 0 0; relative location 11.887 0 1.15913, rotation 0 0 0

Blank "NDARC_Center", child of "FuselageGeom"
  location (X Y Z) 0 0 0, rotation 0 0 0; relative location 11.887 0 1.15913, rotation 0 0 0

User parameters
  NacelleRotation:Rot_0 = 90  (Nacelle 0 rotation in degrees)
  NacelleRotation:Rot_1 = 90  (Nacelle 1 rotation in degrees)
  NacelleRotation:Rot_4 = 90  (Nacelle 4 rotation in degrees)
  NacelleRotation:Rot_5 = 90  (Nacelle 5 rotation in degrees)
  NacelleRotation:Rot_All = 90  (All nacelle rotation in degrees)

Parameter links (A drives B)
  UserParm:NacelleRotation:Rot_0 -> Pivot_4:XForm:Y_Rel_Rotation
  UserParm:NacelleRotation:Rot_1 -> Pivot_1:XForm:Y_Rel_Rotation
  UserParm:NacelleRotation:Rot_4 -> Pivot_3:XForm:Y_Rel_Rotation Offset=90 Scale=-1
  UserParm:NacelleRotation:Rot_5 -> Pivot_2:XForm:Y_Rel_Rotation Offset=90 Scale=-1
  UserParm:NacelleRotation:Rot_All -> UserParm:NacelleRotation:Rot_0
  UserParm:NacelleRotation:Rot_All -> UserParm:NacelleRotation:Rot_1
  UserParm:NacelleRotation:Rot_All -> UserParm:NacelleRotation:Rot_4
  UserParm:NacelleRotation:Rot_All -> UserParm:NacelleRotation:Rot_5
