OpenVSP model (file version 5), 68 components.
Geometry view with OpenVSP parameter names; values to 6 digits, angles in degrees, lengths in the model's unit.
Overall bounding box: X_Min=-13.5466 X_Len=28.9192 Y_Min=-17.9309 Y_Len=35.8618 Z_Min=-6.92 Z_Len=15.2509

Blank "NDARC_Center"
  location (X Y Z) 0 0 0, rotation 0 0 0

Wing "MainWing", child of "NDARC_Center"
  location (X Y Z) -0.85 0 0, rotation 0 0 0
  symmetric about XZ
  bounding box size 3.4 20.42 0.612761
  totals: TotalSpan=20.42 TotalProjectedSpan=20.42 TotalChord=2.7625 TotalArea=69.0809 TotalAR=6.03606
  root: chord 3.4, twist 0, NACA 4-series Camber=0 CamberLoc=0.2 ThickChord=0.18
  sections:
    n  Span      Root_Chord  Tip_Chord  Area      Sweep  Sweep_Location  Dihedral  Twist  Twist_Location  tip airfoil
    1  10.0739   3.4         3.4        34.2512   0      0.25            0         0      0.25            as above
    2  0.136125  3.4         0.85       0.289265  0      0.25            0         0      0.25            as above
  SS_Control "SS_CONT_0": UStart=0.31 UEnd=0.49 Length_C_Start=0.25 Length_C_End=0.25 Length_Start=0.85 Length_End=0.85 LE_Flag=0 Surf_Type=2

Blank "Pivot_0", child of "MainWing"
  location (X Y Z) -0.025 13.79 0, rotation 0 0 0

Blank "Hub_0", child of "Pivot_0"
  location (X Y Z) -1.21548 13.79 0, rotation 0 0 0; relative location -1.19048 0 0, rotation 0 0 0

Propeller "Prop_0", child of "Hub_0"
  location (X Y Z) -1.21548 13.79 0, rotation 0 0 0; relative location 0 0 0, rotation 0 0 0
  bounding box size 0.467589 7.15338 7.15338
  Design: Diameter=7.08 NumBlade=8 Beta34=20 UseBeta34Flag=1 Feather=7.5 Rotate=0 Precone=0 ReverseFlag=0 FoldAngle=0 PropMode=0 AF=134.463 CLi=0.538654 Chord=0.172788 Solidity=0.44 ConstructXoC=0.5 FeatherAxisXoC=0.5 FeatherOffsetXoC=0
  cross sections:
    n  RadiusFrac  shape
    0  0.16        ellipse Ellipse_Height=0.0734002 Ellipse_Width=0.611668
    1  0.4         NACA 16-series Chord=0.611668 IdealCl=0.7 ThickChord=0.12
    2  1           NACA 16-series Chord=0.611668 IdealCl=0.2 ThickChord=0.12
  Chord along r/R (linear): 0.16: 0.172788, 1: 0.172788
  Twist along r/R (linear): 0.16: 42, 1: 0
  Thick along r/R (linear): 0.16: 0.12, 1: 0.12
  CLI along r/R (cubic Bezier): 0.16: 0, 0.24: 0.7, 0.32: 0.7, 0.4: 0.7, 0.466667: 0.7, 0.533333: 0.7, 0.6: 0.7, 0.733333: 0.7, 0.866667: 0.7, 1: 0.2

Fuselage "Nacelle_0", child of "Hub_0"
  location (X Y Z) -2.50736 13.79 0, rotation 0 0 0; relative location -1.29188 0 0, rotation 0 0 0
  bounding box size 4.36447 1.26 1.26
  Design: Length=4.36447
  cross sections:
    n  XLocPercent  YLocPercent  ZLocPercent  shape
    0  0            0            0            point
    1  0.3          0            0            circle Circle_Diameter=1.26
    2  0.6          0            0            as above
    3  1            0            0            point

BodyOfRevolution "Duct_0", child of "Hub_0"
  location (X Y Z) -2.61211 13.79 0, rotation 0 0 0; relative location -1.39663 0 0, rotation 0 0 0
  bounding box size 3.544 8.28183 8.28183
  Design: A0=47.173 Ae=47.173 Amin=40.9217 AminW=0.342403 Angle=0 Diameter=7.75 Mode=0
  profile: NACA 4-series Camber=0 CamberLoc=0.2 Chord=3.544 ThickChord=0.15

Wing "HVane_0", child of "Hub_0"
  location (X Y Z) -0.215476 13.79 0, rotation 0 0 0; relative location 1 0 0, rotation 0 0 0
  symmetric about XZ
  bounding box size 2 7.75 0.200116
  totals: TotalSpan=7.75 TotalProjectedSpan=7.75 TotalChord=2 TotalArea=15.5 TotalAR=3.875
  root: chord 2, twist 0, NACA 4-series Camber=0 CamberLoc=0.2 ThickChord=0.1
  sections:
    n  Span   Root_Chord  Tip_Chord  Area  Sweep  Sweep_Location  Dihedral  Twist  Twist_Location  tip airfoil
    1  3.875  2           2          7.75  0      0.25            0         0      0.25            as above
  SS_Control "SS_CONT_0": UStart=0.37 UEnd=0.628049 Length_C_Start=0.25 Length_C_End=0.25 Length_Start=0.5 Length_End=0.5 LE_Flag=0 Surf_Type=2

Wing "VVane_0", child of "Hub_0"
  location (X Y Z) 0.180061 13.79 0, rotation 90 0 0; relative location 1.39554 0 0, rotation 90 0 0
  bounding box size 0.75 0.135168 3.875
  totals: TotalSpan=3.875 TotalProjectedSpan=3.875 TotalChord=0.75 TotalArea=2.90625 TotalAR=5.16667
  root: chord 0.75, twist 0, NACA 4-series Camber=0 CamberLoc=0.2 ThickChord=0.18
  sections:
    n  Span   Root_Chord  Tip_Chord  Area     Sweep  Sweep_Location  Dihedral  Twist  Twist_Location  tip airfoil
    1  3.875  0.75        0.75       2.90625  0      0.25            0         0      0.25            as above

Wing "YVane_0", child of "Hub_0"
  location (X Y Z) 0.180061 13.79 0, rotation -55 0 0; relative location 1.39554 0 0, rotation -55 0 0
  symmetric about XZ
  bounding box size 0.75 4.55594 3.25174
  totals: TotalSpan=7.75 TotalProjectedSpan=7.75 TotalChord=0.75 TotalArea=5.8125 TotalAR=10.3333
  root: chord 0.75, twist 0, NACA 4-series Camber=0 CamberLoc=0.2 ThickChord=0.18
  sections:
    n  Span   Root_Chord  Tip_Chord  Area     Sweep  Sweep_Location  Dihedral  Twist  Twist_Location  tip airfoil
    1  3.875  0.75        0.75       2.90625  0      0.25            0         0      0.25            as above

Blank "Pivot_1", child of "MainWing"
  location (X Y Z) -0.025 -13.79 0, rotation 0 0 0

Blank "Hub_1", child of "Pivot_1"
  location (X Y Z) -1.215 -13.79 0, rotation 0 0 0; relative location -1.19 0 0, rotation 0 0 0

Propeller "Prop_1", child of "Hub_1"
  location (X Y Z) -1.215 -13.79 0, rotation 0 0 0; relative location 0 0 0, rotation 0 0 0
  bounding box size 0.467589 7.15338 7.15338
  Design: Diameter=7.08 NumBlade=8 Beta34=20 UseBeta34Flag=1 Feather=7.5 Rotate=0 Precone=0 ReverseFlag=0 FoldAngle=0 PropMode=0 AF=134.463 CLi=0.538654 Chord=0.172788 Solidity=0.44 ConstructXoC=0.5 FeatherAxisXoC=0.5 FeatherOffsetXoC=0
  cross sections:
    n  RadiusFrac  shape
    0  0.16        ellipse Ellipse_Height=0.0734002 Ellipse_Width=0.611668
    1  0.4         NACA 16-series Chord=0.611668 IdealCl=0.7 ThickChord=0.12
    2  1           NACA 16-series Chord=0.611668 IdealCl=0.2 ThickChord=0.12
  blade curves as in "Prop_0"

Fuselage "Nacelle_1", child of "Hub_1"
  location (X Y Z) -2.50688 -13.79 0, rotation 0 0 0; relative location -1.29188 0 0, rotation 0 0 0
  bounding box size 4.36447 1.26 1.26
  Design: Length=4.36447
  cross sections:
    n  XLocPercent  YLocPercent  ZLocPercent  shape
    0  0            0            0            point
    1  0.3          0            0            circle Circle_Diameter=1.26
    2  0.6          0            0            as above
    3  1            0            0            point

BodyOfRevolution "Duct_1", child of "Hub_1"
  location (X Y Z) -2.61163 -13.79 0, rotation 0 0 0; relative location -1.39663 0 0, rotation 0 0 0
  bounding box size 3.544 8.28183 8.28183
  Design: A0=47.173 Ae=47.173 Amin=40.9217 AminW=0.342403 Angle=0 Diameter=7.75 Mode=0
  profile: NACA 4-series Camber=0 CamberLoc=0.2 Chord=3.544 ThickChord=0.15

Wing "HVane_1", child of "Hub_1"
  location (X Y Z) -0.215 -13.79 0, rotation 0 0 0; relative location 1 0 0, rotation 0 0 0
  symmetric about XZ
  bounding box size 2 7.75 0.200116
  totals: TotalSpan=7.75 TotalProjectedSpan=7.75 TotalChord=2 TotalArea=15.5 TotalAR=3.875
  root: chord 2, twist 0, NACA 4-series Camber=0 CamberLoc=0.2 ThickChord=0.1
  sections:
    n  Span   Root_Chord  Tip_Chord  Area  Sweep  Sweep_Location  Dihedral  Twist  Twist_Location  tip airfoil
    1  3.875  2           2          7.75  0      0.25            0         0      0.25            as above
  SS_Control "SS_CONT_0": UStart=0.37 UEnd=0.628049 Length_C_Start=0.25 Length_C_End=0.25 Length_Start=0.5 Length_End=0.5 LE_Flag=0 Surf_Type=2

Wing "VVane_1", child of "Hub_1"
  location (X Y Z) 0.180537 -13.79 0, rotation 90 0 0; relative location 1.39554 0 0, rotation 90 0 0
  bounding box size 0.75 0.135168 3.875
  totals: TotalSpan=3.875 TotalProjectedSpan=3.875 TotalChord=0.75 TotalArea=2.90625 TotalAR=5.16667
  root: chord 0.75, twist 0, NACA 4-series Camber=0 CamberLoc=0.2 ThickChord=0.18
  sections:
    n  Span   Root_Chord  Tip_Chord  Area     Sweep  Sweep_Location  Dihedral  Twist  Twist_Location  tip airfoil
    1  3.875  0.75        0.75       2.90625  0      0.25            0         0      0.25            as above

Wing "YVane_1", child of "Hub_1"
  location (X Y Z) 0.180537 -13.79 0, rotation -55 0 0; relative location 1.39554 0 0, rotation -55 0 0
  symmetric about XZ
  bounding box size 0.75 4.55594 3.25174
  totals: TotalSpan=7.75 TotalProjectedSpan=7.75 TotalChord=0.75 TotalArea=5.8125 TotalAR=10.3333
  root: chord 0.75, twist 0, NACA 4-series Camber=0 CamberLoc=0.2 ThickChord=0.18
  sections:
    n  Span   Root_Chord  Tip_Chord  Area     Sweep  Sweep_Location  Dihedral  Twist  Twist_Location  tip airfoil
    1  3.875  0.75        0.75       2.90625  0      0.25            0         0      0.25            as above

Wing "HorzTail", child of "NDARC_Center"
  location (X Y Z) 12.767 0 4.18989, rotation 0 0 0
  symmetric about XZ
  bounding box size 2.1911 2.93354 0.394889
  totals: TotalSpan=2.59788 TotalProjectedSpan=2.59788 TotalChord=2.1911 TotalArea=5.69223 TotalAR=1.18565
  root: chord 2.1911, twist 0, NACA 4-series Camber=0 CamberLoc=0.2 ThickChord=0.18
  sections:
    n  Span     Root_Chord  Tip_Chord  Area     Sweep  Sweep_Location  Dihedral  Twist  Twist_Location  tip airfoil
    1  1.29894  2.1911      2.1911     2.84612  0      0.25            0         0      0.25            as above

Blank "Pivot_2", child of "HorzTail"
  location (X Y Z) 13.4 5.17 4.19, rotation 0 0 0

Blank "Hub_2", child of "Pivot_2"
  location (X Y Z) 12.3 5.17 4.19, rotation 0 0 0; relative location -1.1 0 0, rotation 0 0 0

Propeller "Prop_2", child of "Hub_2"
  location (X Y Z) 12.3 5.17 4.19, rotation 0 0 0; relative location 0 0 0, rotation 0 0 0
  bounding box size 0.467589 7.15338 7.15338
  Design: Diameter=7.08 NumBlade=8 Beta34=20 UseBeta34Flag=1 Feather=7.5 Rotate=0 Precone=0 ReverseFlag=0 FoldAngle=0 PropMode=0 AF=134.463 CLi=0.538654 Chord=0.172788 Solidity=0.44 ConstructXoC=0.5 FeatherAxisXoC=0.5 FeatherOffsetXoC=0
  cross sections:
    n  RadiusFrac  shape
    0  0.16        ellipse Ellipse_Height=0.0734002 Ellipse_Width=0.611668
    1  0.4         NACA 16-series Chord=0.611668 IdealCl=0.7 ThickChord=0.12
    2  1           NACA 16-series Chord=0.611668 IdealCl=0.2 ThickChord=0.12
  blade curves as in "Prop_0"

Fuselage "Nacelle_2", child of "Hub_2"
  location (X Y Z) 11.0081 5.17 4.19, rotation 0 0 0; relative location -1.29188 0 0, rotation 0 0 0
  bounding box size 4.36447 1.26 1.26
  Design: Length=4.36447
  cross sections:
    n  XLocPercent  YLocPercent  ZLocPercent  shape
    0  0            0            0            point
    1  0.3          0            0            circle Circle_Diameter=1.26
    2  0.6          0            0            as above
    3  1            0            0            point

BodyOfRevolution "Duct_2", child of "Hub_2"
  location (X Y Z) 10.9034 5.17 4.19, rotation 0 0 0; relative location -1.39663 0 0, rotation 0 0 0
  bounding box size 3.544 8.28183 8.28183
  Design: A0=47.173 Ae=47.173 Amin=40.9217 AminW=0.342403 Angle=0 Diameter=7.75 Mode=0
  profile: NACA 4-series Camber=0 CamberLoc=0.2 Chord=3.544 ThickChord=0.15

Wing "HVane_2", child of "Hub_2"
  location (X Y Z) 13.3 5.17 4.19, rotation 0 0 0; relative location 1 0 0, rotation 0 0 0
  symmetric about XZ
  bounding box size 2 7.75 0.200116
  totals: TotalSpan=7.75 TotalProjectedSpan=7.75 TotalChord=2 TotalArea=15.5 TotalAR=3.875
  root: chord 2, twist 0, NACA 4-series Camber=0 CamberLoc=0.2 ThickChord=0.1
  sections:
    n  Span   Root_Chord  Tip_Chord  Area  Sweep  Sweep_Location  Dihedral  Twist  Twist_Location  tip airfoil
    1  3.875  2           2          7.75  0      0.25            0         0      0.25            as above
  SS_Control "SS_CONT_0": UStart=0.37 UEnd=0.628049 Length_C_Start=0.25 Length_C_End=0.25 Length_Start=0.5 Length_End=0.5 LE_Flag=0 Surf_Type=2

Wing "VVane_2", child of "Hub_2"
  location (X Y Z) 13.6955 5.17 4.19, rotation 90 0 0; relative location 1.39554 0 0, rotation 90 0 0
  bounding box size 0.75 0.135168 3.875
  totals: TotalSpan=3.875 TotalProjectedSpan=3.875 TotalChord=0.75 TotalArea=2.90625 TotalAR=5.16667
  root: chord 0.75, twist 0, NACA 4-series Camber=0 CamberLoc=0.2 ThickChord=0.18
  sections:
    n  Span   Root_Chord  Tip_Chord  Area     Sweep  Sweep_Location  Dihedral  Twist  Twist_Location  tip airfoil
    1  3.875  0.75        0.75       2.90625  0      0.25            0         0      0.25            as above

Wing "YVane_2", child of "Hub_2"
  location (X Y Z) 13.6955 5.17 4.19, rotation -55 0 0; relative location 1.39554 0 0, rotation -55 0 0
  symmetric about XZ
  bounding box size 0.75 4.55594 3.25174
  totals: TotalSpan=7.75 TotalProjectedSpan=7.75 TotalChord=0.75 TotalArea=5.8125 TotalAR=10.3333
  root: chord 0.75, twist 0, NACA 4-series Camber=0 CamberLoc=0.2 ThickChord=0.18
  sections:
    n  Span   Root_Chord  Tip_Chord  Area     Sweep  Sweep_Location  Dihedral  Twist  Twist_Location  tip airfoil
    1  3.875  0.75        0.75       2.90625  0      0.25            0         0      0.25            as above

Blank "Pivot_3", child of "HorzTail"
  location (X Y Z) 13.4 -5.17 4.19, rotation 0 0 0

Blank "Hub_3", child of "Pivot_3"
  location (X Y Z) 12.3 -5.17 4.19, rotation 0 0 0; relative location -1.1 0 0, rotation 0 0 0

Propeller "Prop_3", child of "Hub_3"
  location (X Y Z) 12.3 -5.17 4.19, rotation 0 0 0; relative location 0 0 0, rotation 0 0 0
  bounding box size 0.467589 7.15338 7.15338
  Design: Diameter=7.08 NumBlade=8 Beta34=20 UseBeta34Flag=1 Feather=7.5 Rotate=0 Precone=0 ReverseFlag=0 FoldAngle=0 PropMode=0 AF=134.463 CLi=0.538654 Chord=0.172788 Solidity=0.44 ConstructXoC=0.5 FeatherAxisXoC=0.5 FeatherOffsetXoC=0
  cross sections:
    n  RadiusFrac  shape
    0  0.16        ellipse Ellipse_Height=0.0734002 Ellipse_Width=0.611668
    1  0.4         NACA 16-series Chord=0.611668 IdealCl=0.7 ThickChord=0.12
    2  1           NACA 16-series Chord=0.611668 IdealCl=0.2 ThickChord=0.12
  blade curves as in "Prop_0"

Fuselage "Nacelle_3", child of "Hub_3"
  location (X Y Z) 11.0081 -5.17 4.19, rotation 0 0 0; relative location -1.29188 0 0, rotation 0 0 0
  bounding box size 4.36447 1.26 1.26
  Design: Length=4.36447
  cross sections:
    n  XLocPercent  YLocPercent  ZLocPercent  shape
    0  0            0            0            point
    1  0.3          0            0            circle Circle_Diameter=1.26
    2  0.6          0            0            as above
    3  1            0            0            point

BodyOfRevolution "Duct_3", child of "Hub_3"
  location (X Y Z) 10.9034 -5.17 4.19, rotation 0 0 0; relative location -1.39663 0 0, rotation 0 0 0
  bounding box size 3.544 8.28183 8.28183
  Design: A0=47.173 Ae=47.173 Amin=40.9217 AminW=0.342403 Angle=0 Diameter=7.75 Mode=0
  profile: NACA 4-series Camber=0 CamberLoc=0.2 Chord=3.544 ThickChord=0.15

Wing "HVane_3", child of "Hub_3"
  location (X Y Z) 13.3 -5.17 4.19, rotation 0 0 0; relative location 1 0 0, rotation 0 0 0
  symmetric about XZ
  bounding box size 2 7.75 0.200116
  totals: TotalSpan=7.75 TotalProjectedSpan=7.75 TotalChord=2 TotalArea=15.5 TotalAR=3.875
  root: chord 2, twist 0, NACA 4-series Camber=0 CamberLoc=0.2 ThickChord=0.1
  sections:
    n  Span   Root_Chord  Tip_Chord  Area  Sweep  Sweep_Location  Dihedral  Twist  Twist_Location  tip airfoil
    1  3.875  2           2          7.75  0      0.25            0         0      0.25            as above
  SS_Control "SS_CONT_0": UStart=0.37 UEnd=0.628049 Length_C_Start=0.25 Length_C_End=0.25 Length_Start=0.5 Length_End=0.5 LE_Flag=0 Surf_Type=2

Wing "VVane_3", child of "Hub_3"
  location (X Y Z) 13.6955 -5.17 4.19, rotation 90 0 0; relative location 1.39554 0 0, rotation 90 0 0
  bounding box size 0.75 0.135168 3.875
  totals: TotalSpan=3.875 TotalProjectedSpan=3.875 TotalChord=0.75 TotalArea=2.90625 TotalAR=5.16667
  root: chord 0.75, twist 0, NACA 4-series Camber=0 CamberLoc=0.2 ThickChord=0.18
  sections:
    n  Span   Root_Chord  Tip_Chord  Area     Sweep  Sweep_Location  Dihedral  Twist  Twist_Location  tip airfoil
    1  3.875  0.75        0.75       2.90625  0      0.25            0         0      0.25            as above

Wing "YVane_3", child of "Hub_3"
  location (X Y Z) 13.6955 -5.17 4.19, rotation -55 0 0; relative location 1.39554 0 0, rotation -55 0 0
  symmetric about XZ
  bounding box size 0.75 4.55594 3.25174
  totals: TotalSpan=7.75 TotalProjectedSpan=7.75 TotalChord=0.75 TotalArea=5.8125 TotalAR=10.3333
  root: chord 0.75, twist 0, NACA 4-series Camber=0 CamberLoc=0.2 ThickChord=0.18
  sections:
    n  Span   Root_Chord  Tip_Chord  Area     Sweep  Sweep_Location  Dihedral  Twist  Twist_Location  tip airfoil
    1  3.875  0.75        0.75       2.90625  0      0.25            0         0      0.25            as above

Wing "Canard", child of "NDARC_Center"
  location (X Y Z) -11.871 0 -2.26953, rotation 0 0 0
  symmetric about XZ
  bounding box size 2.07 6.08176 0.373063
  totals: TotalSpan=6.08176 TotalProjectedSpan=6.08176 TotalChord=2.07 TotalArea=12.5893 TotalAR=2.93805
  root: chord 2.07, twist 0, NACA 4-series Camber=0 CamberLoc=0.2 ThickChord=0.18
  sections:
    n  Span     Root_Chord  Tip_Chord  Area     Sweep  Sweep_Location  Dihedral  Twist  Twist_Location  tip airfoil
    1  1.59735  2.07        2.07       3.3065   0      0.25            0         0      0.25            as above
    2  1.44354  2.07        2.07       2.98812  0      0.25            0         0      0.25            as above

Blank "Pivot_4", child of "Canard"
  location (X Y Z) -11.2 6.9 -2.26953, rotation 0 0 0

Blank "Hub_4", child of "Pivot_4"
  location (X Y Z) -12.15 6.9 -2.26953, rotation 0 0 0; relative location -0.95 0 0, rotation 0 0 0

Propeller "Prop_4", child of "Hub_4"
  location (X Y Z) -12.15 6.9 -2.26953, rotation 0 0 0; relative location 0 0 0, rotation 0 0 0
  bounding box size 0.467589 7.15338 7.15338
  Design: Diameter=7.08 NumBlade=8 Beta34=20 UseBeta34Flag=1 Feather=7.5 Rotate=0 Precone=0 ReverseFlag=0 FoldAngle=0 PropMode=0 AF=134.463 CLi=0.538654 Chord=0.172788 Solidity=0.44 ConstructXoC=0.5 FeatherAxisXoC=0.5 FeatherOffsetXoC=0
  cross sections:
    n  RadiusFrac  shape
    0  0.16        ellipse Ellipse_Height=0.0734002 Ellipse_Width=0.611668
    1  0.4         NACA 16-series Chord=0.611668 IdealCl=0.7 ThickChord=0.12
    2  1           NACA 16-series Chord=0.611668 IdealCl=0.2 ThickChord=0.12
  blade curves as in "Prop_0"

Fuselage "Nacelle_4", child of "Hub_4"
  location (X Y Z) -13.4419 6.9 -2.26953, rotation 0 0 0; relative location -1.29188 0 0, rotation 0 0 0
  bounding box size 4.36447 1.26 1.26
  Design: Length=4.36447
  cross sections:
    n  XLocPercent  YLocPercent  ZLocPercent  shape
    0  0            0            0            point
    1  0.3          0            0            circle Circle_Diameter=1.26
    2  0.6          0            0            as above
    3  1            0            0            point

BodyOfRevolution "Duct_4", child of "Hub_4"
  location (X Y Z) -13.5466 6.9 -2.26953, rotation 0 0 0; relative location -1.39663 0 0, rotation 0 0 0
  bounding box size 3.544 8.28183 8.28183
  Design: A0=47.173 Ae=47.173 Amin=40.9217 AminW=0.342403 Angle=0 Diameter=7.75 Mode=0
  profile: NACA 4-series Camber=0 CamberLoc=0.2 Chord=3.544 ThickChord=0.15

Wing "HVane_4", child of "Hub_4"
  location (X Y Z) -11.15 6.9 -2.26953, rotation 0 0 0; relative location 1 0 0, rotation 0 0 0
  symmetric about XZ
  bounding box size 2 7.75 0.200116
  totals: TotalSpan=7.75 TotalProjectedSpan=7.75 TotalChord=2 TotalArea=15.5 TotalAR=3.875
  root: chord 2, twist 0, NACA 4-series Camber=0 CamberLoc=0.2 ThickChord=0.1
  sections:
    n  Span   Root_Chord  Tip_Chord  Area  Sweep  Sweep_Location  Dihedral  Twist  Twist_Location  tip airfoil
    1  3.875  2           2          7.75  0      0.25            0         0      0.25            as above
  SS_Control "SS_CONT_0": UStart=0.37 UEnd=0.628049 Length_C_Start=0.25 Length_C_End=0.25 Length_Start=0.5 Length_End=0.5 LE_Flag=0 Surf_Type=2

Wing "VVane_4", child of "Hub_4"
  location (X Y Z) -10.7545 6.9 -2.26953, rotation 90 0 0; relative location 1.39554 0 0, rotation 90 0 0
  bounding box size 0.75 0.135168 3.875
  totals: TotalSpan=3.875 TotalProjectedSpan=3.875 TotalChord=0.75 TotalArea=2.90625 TotalAR=5.16667
  root: chord 0.75, twist 0, NACA 4-series Camber=0 CamberLoc=0.2 ThickChord=0.18
  sections:
    n  Span   Root_Chord  Tip_Chord  Area     Sweep  Sweep_Location  Dihedral  Twist  Twist_Location  tip airfoil
    1  3.875  0.75        0.75       2.90625  0      0.25            0         0      0.25            as above

Wing "YVane_4", child of "Hub_4"
  location (X Y Z) -10.7545 6.9 -2.26953, rotation -55 0 0; relative location 1.39554 0 0, rotation -55 0 0
  symmetric about XZ
  bounding box size 0.75 4.55594 3.25174
  totals: TotalSpan=7.75 TotalProjectedSpan=7.75 TotalChord=0.75 TotalArea=5.8125 TotalAR=10.3333
  root: chord 0.75, twist 0, NACA 4-series Camber=0 CamberLoc=0.2 ThickChord=0.18
  sections:
    n  Span   Root_Chord  Tip_Chord  Area     Sweep  Sweep_Location  Dihedral  Twist  Twist_Location  tip airfoil
    1  3.875  0.75        0.75       2.90625  0      0.25            0         0      0.25            as above

Blank "Pivot_5", child of "Canard"
  location (X Y Z) -11.2 -6.9 -2.26953, rotation 0 0 0

Blank "Hub_5", child of "Pivot_5"
  location (X Y Z) -12.15 -6.9 -2.26953, rotation 0 0 0; relative location -0.95 0 0, rotation 0 0 0

Propeller "Prop_5", child of "Hub_5"
  location (X Y Z) -12.15 -6.9 -2.26953, rotation 0 0 0; relative location 0 0 0, rotation 0 0 0
  bounding box size 0.467589 7.15338 7.15338
  Design: Diameter=7.08 NumBlade=8 Beta34=20 UseBeta34Flag=1 Feather=7.5 Rotate=0 Precone=0 ReverseFlag=0 FoldAngle=0 PropMode=0 AF=134.463 CLi=0.538654 Chord=0.172788 Solidity=0.44 ConstructXoC=0.5 FeatherAxisXoC=0.5 FeatherOffsetXoC=0
  cross sections:
    n  RadiusFrac  shape
    0  0.16        ellipse Ellipse_Height=0.0734002 Ellipse_Width=0.611668
    1  0.4         NACA 16-series Chord=0.611668 IdealCl=0.7 ThickChord=0.12
    2  1           NACA 16-series Chord=0.611668 IdealCl=0.2 ThickChord=0.12
  blade curves as in "Prop_0"

Fuselage "Nacelle_5", child of "Hub_5"
  location (X Y Z) -13.4419 -6.9 -2.26953, rotation 0 0 0; relative location -1.29188 0 0, rotation 0 0 0
  bounding box size 4.36447 1.26 1.26
  Design: Length=4.36447
  cross sections:
    n  XLocPercent  YLocPercent  ZLocPercent  shape
    0  0            0            0            point
    1  0.3          0            0            circle Circle_Diameter=1.26
    2  0.6          0            0            as above
    3  1            0            0            point

BodyOfRevolution "Duct_5", child of "Hub_5"
  location (X Y Z) -13.5466 -6.9 -2.26953, rotation 0 0 0; relative location -1.39663 0 0, rotation 0 0 0
  bounding box size 3.544 8.28183 8.28183
  Design: A0=47.173 Ae=47.173 Amin=40.9217 AminW=0.342403 Angle=0 Diameter=7.75 Mode=0
  profile: NACA 4-series Camber=0 CamberLoc=0.2 Chord=3.544 ThickChord=0.15

Wing "HVane_5", child of "Hub_5"
  location (X Y Z) -11.15 -6.9 -2.26953, rotation 0 0 0; relative location 1 0 0, rotation 0 0 0
  symmetric about XZ
  bounding box size 2 7.75 0.200116
  totals: TotalSpan=7.75 TotalProjectedSpan=7.75 TotalChord=2 TotalArea=15.5 TotalAR=3.875
  root: chord 2, twist 0, NACA 4-series Camber=0 CamberLoc=0.2 ThickChord=0.1
  sections:
    n  Span   Root_Chord  Tip_Chord  Area  Sweep  Sweep_Location  Dihedral  Twist  Twist_Location  tip airfoil
    1  3.875  2           2          7.75  0      0.25            0         0      0.25            as above
  SS_Control "SS_CONT_0": UStart=0.37 UEnd=0.628049 Length_C_Start=0.25 Length_C_End=0.25 Length_Start=0.5 Length_End=0.5 LE_Flag=0 Surf_Type=2

Wing "VVane_5", child of "Hub_5"
  location (X Y Z) -10.7545 -6.9 -2.26953, rotation 90 0 0; relative location 1.39554 0 0, rotation 90 0 0
  bounding box size 0.75 0.135168 3.875
  totals: TotalSpan=3.875 TotalProjectedSpan=3.875 TotalChord=0.75 TotalArea=2.90625 TotalAR=5.16667
  root: chord 0.75, twist 0, NACA 4-series Camber=0 CamberLoc=0.2 ThickChord=0.18
  sections:
    n  Span   Root_Chord  Tip_Chord  Area     Sweep  Sweep_Location  Dihedral  Twist  Twist_Location  tip airfoil
    1  3.875  0.75        0.75       2.90625  0      0.25            0         0      0.25            as above

Wing "YVane_5", child of "Hub_5"
  location (X Y Z) -10.7545 -6.9 -2.26953, rotation -55 0 0; relative location 1.39554 0 0, rotation -55 0 0
  symmetric about XZ
  bounding box size 0.75 4.55594 3.25174
  totals: TotalSpan=7.75 TotalProjectedSpan=7.75 TotalChord=0.75 TotalArea=5.8125 TotalAR=10.3333
  root: chord 0.75, twist 0, NACA 4-series Camber=0 CamberLoc=0.2 ThickChord=0.18
  sections:
    n  Span   Root_Chord  Tip_Chord  Area     Sweep  Sweep_Location  Dihedral  Twist  Twist_Location  tip airfoil
    1  3.875  0.75        0.75       2.90625  0      0.25            0         0      0.25            as above

Blank "Fuse_CG", child of "NDARC_Center"
  location (X Y Z) -1.45368 0 -2.26128, rotation 0 0 0

Fuselage "Fuselage", child of "Fuse_CG"
  location (X Y Z) -13.3407 0 -3.42041, rotation 0 0 0; relative location -11.887 0 -1.15913, rotation 0 0 0
  bounding box size 27.75 5.83621 5.55516
  Design: Length=27.75
  cross sections:
    n  XLocPercent  YLocPercent  ZLocPercent  shape
    0  0            0            0            point
    1  0.0721371    0            0.0108107    rounded rectangle RoundRectXSec_Radius=1 RoundedRect_Height=2.8 RoundedRect_Width=3.25
    2  0.192365     0            0.0423031    rounded rectangle RoundRectXSec_Radius=1.5 RoundedRect_Height=5.5 RoundedRect_Width=5.5
    3  0.400334     0            0.0423031    rounded rectangle RoundRectXSec_Radius=1.5 RoundedRect_Height=5.55516 RoundedRect_Width=5.5
    4  0.627209     0            0.0810811    rounded rectangle RoundRectXSec_Radius=1.25 RoundedRect_Height=3 RoundedRect_Width=3.5
    5  0.972973     0            0.108108     circle Circle_Diameter=1.5
    6  1            0            0.108108     point

Fuselage "EngineGroup_9_PWPT61200hp", child of "Fuselage"
  location (X Y Z) 1.11586 0 -0.920408, rotation 0 0 0; relative location 14.4565 0 2.5, rotation 0 0 0
  bounding box size 3.23706 1.583 1.583
  Design: Length=3
  cross sections:
    n  XLocPercent  YLocPercent  ZLocPercent  shape
    0  0            0            0            point
    1  0.05         0            0            ellipse Ellipse_Height=1.583 Ellipse_Width=1.583
    2  0.5          0            0            as above
    3  0.95         0            0            as above
    4  1            0            0            point

Fuselage "FuelTank_1", child of "Fuselage"
  location (X Y Z) -12.1015 0 -3.32322, rotation 0 0 0; relative location 1.23913 0 0.0971929, rotation 0 0 0
  bounding box size 3.15 1 1
  Design: Length=3.15
  cross sections:
    n  XLocPercent  YLocPercent  ZLocPercent  shape
    0  0            0            0            point
    1  0.013587     0            0            rounded rectangle RoundRectXSec_Radius=0.1 RoundedRect_Height=1 RoundedRect_Width=1
    2  0.5          0            0            as above
    3  0.986413     0            0            as above
    4  1            0            0            point

Fuselage "FuelTank_2_full", child of "Fuselage"
  location (X Y Z) 1.10233 0 -1.99713, rotation 0 90 0; relative location 14.443 0 1.42328, rotation 0 90 0
  bounding box size 2 2 1.25
  Design: Length=1.25
  cross sections:
    n  XLocPercent  YLocPercent  ZLocPercent  shape
    0  0            0            0            point
    1  0.013587     0            0            rounded rectangle RoundRectXSec_Radius=0.1 RoundedRect_Height=2 RoundedRect_Width=2
    2  0.5          0            0            as above
    3  0.986413     0            0            as above
    4  1            0            0            point

Wing "LandingGear_015.NoseStrutFairing", child of "Fuselage"
  location (X Y Z) -10.3407 0 -4.47041, rotation -90 0 0; relative location 3 0 -1.05, rotation -90 0 0
  bounding box size 1.48147 0.180224 1.79688
  totals: TotalSpan=1.79688 TotalProjectedSpan=1.79688 TotalChord=0.875 TotalArea=1.57227 TotalAR=2.05357
  root: chord 0.75, twist 0, NACA 4-series Camber=0 CamberLoc=0.2 ThickChord=0.18
  sections:
    n  Span     Root_Chord  Tip_Chord  Area     Sweep  Sweep_Location  Dihedral  Twist  Twist_Location  tip airfoil
    1  1.79688  0.75        1          1.57227  15     0               0         0      0.25            as above

BodyOfRevolution "LandingGear_005.fronttire", child of "LandingGear_015.NoseStrutFairing"
  location (X Y Z) -9.35532 -2.41222e-07 -6.32, rotation 0 0 90; relative location 0.0164877 0 -0.052716, rotation 0 0 90
  bounding box size 1.2 0.4 1.2
  Design: A0=0 Ae=0 Amin=0 AminW=0 Angle=0 Diameter=2 Mode=1
  profile: rounded rectangle DeltaX=-0.5 RoundRectXSec_Radius=0.1 RoundedRect_Height=1.2 RoundedRect_Width=0.4

Wing "LandingGear_070.MainGearFairing", child of "Fuselage"
  location (X Y Z) -2.84066 1.84783 -4.47041, rotation -59.7608 0 0; relative location 10.5 1.84783 -1.05, rotation -59.7608 0 0
  symmetric about XZ
  bounding box size 3.46107 5.31344 2.13154
  totals: TotalSpan=4.31256 TotalProjectedSpan=4.07984 TotalChord=1.85898 TotalArea=8.25095 TotalAR=2.01736
  root: chord 2.21615, twist 0, NACA 4-series Camber=0 CamberLoc=0.2 ThickChord=0.18
  sections:
    n  Span      Root_Chord  Tip_Chord  Area     Sweep  Sweep_Location  Dihedral  Twist  Twist_Location  tip airfoil
    1  1.28776   2.21615     2.0599     2.75326  30     1               0         0      0.25            as above
    2  0.868518  2.0599      1.1        1.37221  30     1               -30       0      0.25            as above

BodyOfRevolution "LandingGear_010.maintires", child of "LandingGear_070.MainGearFairing"
  location (X Y Z) 0.085 2.49998 -6.32, rotation 0 0 90; relative location 0.0284633 0 0.131455, rotation 0 0 90
  symmetric about XZ
  bounding box size 1.2 5.39996 1.2
  Design: A0=0 Ae=0 Amin=0 AminW=0 Angle=0 Diameter=2 Mode=1
  profile: rounded rectangle DeltaX=-0.5 RoundRectXSec_Radius=0.1 RoundedRect_Height=1.2 RoundedRect_Width=0.4

Human "HumanGeom", child of "Fuselage"
  location (X Y Z) -7.34066 -1.25 -2.17787, rotation 0 0 0; relative location 6 -1.25 1.24254, rotation 0 0 0
  mass: Density=67.9173 Shell_Flag=0 Mass_Area=1 Mass_Prior=0
  Anthropometric: Age=30 AutoDensity=1 BMI=21.8176 BMI_pct=0.0847851 GenderFlag=0 LenUnit=4 Mass=148.317 MassUnit=3 SitFrac=0.51 Stature=5.76115 Stature_pct=0.5 Volume=2.18379

Human "HumanGeom", child of "Fuselage"
  location (X Y Z) -7.34066 1.25 -2.17787, rotation 0 0 0; relative location 6 1.25 1.24254, rotation 0 0 0
  mass: Density=67.9173 Shell_Flag=0 Mass_Area=1 Mass_Prior=0
  Anthropometric: Age=30 AutoDensity=1 BMI=21.8176 BMI_pct=0.0847851 GenderFlag=0 LenUnit=4 Mass=148.317 MassUnit=3 SitFrac=0.51 Stature=5.76115 Stature_pct=0.5 Volume=2.18379

Human "HumanGeom", child of "Fuselage"
  location (X Y Z) -4.34066 -1.25 -2.17787, rotation 0 0 0; relative location 9 -1.25 1.24254, rotation 0 0 0
  mass: Density=67.9173 Shell_Flag=0 Mass_Area=1 Mass_Prior=0
  Anthropometric: Age=30 AutoDensity=1 BMI=21.8176 BMI_pct=0.0847851 GenderFlag=0 LenUnit=4 Mass=148.317 MassUnit=3 SitFrac=0.51 Stature=5.76115 Stature_pct=0.5 Volume=2.18379

Human "HumanGeom", child of "Fuselage"
  location (X Y Z) -4.34066 1.25 -2.17787, rotation 0 0 0; relative location 9 1.25 1.24254, rotation 0 0 0
  mass: Density=67.9173 Shell_Flag=0 Mass_Area=1 Mass_Prior=0
  Anthropometric: Age=30 AutoDensity=1 BMI=21.8176 BMI_pct=0.0847851 GenderFlag=0 LenUnit=4 Mass=148.317 MassUnit=3 SitFrac=0.51 Stature=5.76115 Stature_pct=0.5 Volume=2.18379

Human "HumanGeom", child of "Fuselage"
  location (X Y Z) -1.34066 -1.25 -2.17787, rotation 0 0 0; relative location 12 -1.25 1.24254, rotation 0 0 0
  mass: Density=67.9173 Shell_Flag=0 Mass_Area=1 Mass_Prior=0
  Anthropometric: Age=30 AutoDensity=1 BMI=21.8176 BMI_pct=0.0847851 GenderFlag=0 LenUnit=4 Mass=148.317 MassUnit=3 SitFrac=0.51 Stature=5.76115 Stature_pct=0.5 Volume=2.18379

Human "HumanGeom", child of "Fuselage"
  location (X Y Z) -1.34066 1.25 -2.17787, rotation 0 0 0; relative location 12 1.25 1.24254, rotation 0 0 0
  mass: Density=67.9173 Shell_Flag=0 Mass_Area=1 Mass_Prior=0
  Anthropometric: Age=30 AutoDensity=1 BMI=21.8176 BMI_pct=0.0847851 GenderFlag=0 LenUnit=4 Mass=148.317 MassUnit=3 SitFrac=0.51 Stature=5.76115 Stature_pct=0.5 Volume=2.18379

Wing "Tail_1", child of "NDARC_Center"
  location (X Y Z) 7.83478 0 -0.543478, rotation 90 0 0
  bounding box size 7.11926 1.17494 4.73358
  totals: TotalSpan=4.73358 TotalProjectedSpan=4.73358 TotalChord=3.62 TotalArea=15.4685 TotalAR=1.44854
  root: chord 5.87239, twist 0, NACA 4-series Camber=0 CamberLoc=0.2 ThickChord=0.2
  sections:
    n  Span      Root_Chord  Tip_Chord  Area     Sweep  Sweep_Location  Dihedral  Twist  Twist_Location  tip airfoil
    1  0.984878  5.87239     3.80882    4.7674   15     1               0         0      0.25            as above
    2  0.368613  3.80882     3.46256    1.34016  15     1               0         0      0.25            as above
    3  0.448719  3.46256     3.17401    1.48898  15     1               0         0      0.25            as above
    4  2.93137   3.17401     2.19683    7.87196  15     1               0         0      0.25            as above
  SS_Control "SS_CONT_0": UStart=0.333 UEnd=0.833 Length_C_Start=0.302939 Length_C_End=0.527533 Length_Start=1.14859 Length_End=1.14859 LE_Flag=0 Surf_Type=2

Parameter links (A drives B)
  Pivot_0:XForm:Y_Rotation -> Pivot_2:XForm:Y_Rotation Offset=0
  Pivot_0:XForm:Y_Rotation -> Pivot_3:XForm:Y_Rotation Offset=0
  Pivot_0:XForm:Y_Rotation -> Pivot_4:XForm:Y_Rotation Offset=0
  Pivot_0:XForm:Y_Rotation -> Pivot_5:XForm:Y_Rotation Offset=0
  Pivot_0:XForm:Y_Rotation -> Pivot_1:XForm:Y_Rotation Offset=0
  Nacelle_0:XSec_1:Circle_Diameter -> Nacelle_1:XSec_1:Circle_Diameter
  Nacelle_0:XSec_1:Circle_Diameter -> Nacelle_2:XSec_1:Circle_Diameter
  Nacelle_0:XSec_1:Circle_Diameter -> Nacelle_3:XSec_1:Circle_Diameter
  Nacelle_0:XSec_1:Circle_Diameter -> Nacelle_4:XSec_1:Circle_Diameter
  Nacelle_0:XSec_1:Circle_Diameter -> Nacelle_5:XSec_1:Circle_Diameter
  Nacelle_0:XSec_1:Circle_Diameter -> Nacelle_5:XSec_2:Circle_Diameter
  Nacelle_0:XSec_1:Circle_Diameter -> Nacelle_4:XSec_2:Circle_Diameter
  Nacelle_0:XSec_1:Circle_Diameter -> Nacelle_3:XSec_2:Circle_Diameter
  Nacelle_0:XSec_1:Circle_Diameter -> Nacelle_2:XSec_2:Circle_Diameter
  Nacelle_0:XSec_1:Circle_Diameter -> Nacelle_1:XSec_2:Circle_Diameter
  Nacelle_0:XSec_1:Circle_Diameter -> Nacelle_0:XSec_2:Circle_Diameter
  Nacelle_0:XSec_2:DeltaX -> Nacelle_1:XSec_2:DeltaX
  Nacelle_0:XSec_2:DeltaX -> Nacelle_2:XSec_2:DeltaX
  Nacelle_0:XSec_2:DeltaX -> Nacelle_3:XSec_2:DeltaX
  Nacelle_0:XSec_2:DeltaX -> Nacelle_4:XSec_2:DeltaX
  Nacelle_0:XSec_2:DeltaX -> Nacelle_5:XSec_2:DeltaX
  Prop_0:XSec_0:RadiusFrac -> Prop_1:XSec_0:RadiusFrac
  Prop_0:XSec_0:RadiusFrac -> Prop_2:XSec_0:RadiusFrac
  Prop_0:XSec_0:RadiusFrac -> Prop_3:XSec_0:RadiusFrac
  Prop_0:XSec_0:RadiusFrac -> Prop_4:XSec_0:RadiusFrac
  Prop_0:XSec_0:RadiusFrac -> Prop_5:XSec_0:RadiusFrac
  Prop_0:Design:Diameter -> Prop_1:Design:Diameter Offset=0
  Prop_0:Design:Diameter -> Prop_2:Design:Diameter Offset=0
  Prop_0:Design:Diameter -> Prop_3:Design:Diameter Offset=0
  Prop_0:Design:Diameter -> Prop_4:Design:Diameter Offset=0
  Prop_0:Design:Diameter -> Prop_5:Design:Diameter Offset=0
  Duct_0:Design:Diameter -> Duct_1:Design:Diameter Offset=0
  Duct_0:Design:Diameter -> Duct_2:Design:Diameter Offset=0
  Duct_0:Design:Diameter -> Duct_3:Design:Diameter Offset=0
  Duct_0:Design:Diameter -> Duct_4:Design:Diameter Offset=0
  Duct_0:Design:Diameter -> Duct_5:Design:Diameter Offset=0
  Duct_0:XSecCurve:Chord -> Duct_5:XSecCurve:Chord Offset=0
  Duct_0:XSecCurve:Chord -> Duct_4:XSecCurve:Chord Offset=0
  Duct_0:XSecCurve:Chord -> Duct_3:XSecCurve:Chord Offset=0
  Duct_0:XSecCurve:Chord -> Duct_2:XSecCurve:Chord Offset=0
  Duct_0:XSecCurve:Chord -> Duct_1:XSecCurve:Chord Offset=0
  LandingGear_010.maintires:XSecCurve:RoundedRect_Width -> LandingGear_010.maintires:XSecCurve:RoundRectXSec_Radius Scale=0.25
  LandingGear_005.fronttire:XSecCurve:RoundedRect_Width -> LandingGear_005.fronttire:XSecCurve:RoundRectXSec_Radius Scale=0.25
