OpenVSP model (file version 5), 6 components.
Geometry view with OpenVSP parameter names; values to 6 digits, angles in degrees, lengths in the model's unit.
Overall bounding box: X_Min=0 X_Len=191.193 Y_Min=-97.6099 Y_Len=195.22 Z_Min=-10 Z_Len=52.14

Wing "wing"
  location (X Y Z) 54 0 -5, rotation 0 0 0
  symmetric about XZ
  bounding box size 74.0421 195.22 14.4494
  totals: TotalSpan=196.686 TotalProjectedSpan=195.22 TotalChord=24.2655 TotalArea=4239.54 TotalAR=8.98937
  root: chord 46.8825, twist 0, NACA 4-series Camber=0.04 CamberLoc=0.4 ThickChord=0.15
  sections:
    n  Span     Root_Chord  Tip_Chord  Area     Sweep  Sweep_Location  Dihedral  Twist  Twist_Location  tip airfoil
    1  36.389   46.8825     22.5028    1262.43  35     0               7         0      0.25            as above
    2  61.9539  22.5028     5.17384    857.339  35     0               7         -5     0.25            NACA 4-series Camber=0.04 CamberLoc=0.4 ThickChord=0.08

Fuselage "fuse"
  location (X Y Z) 0 0 0, rotation 0 0 0
  bounding box size 187.401 20.0001 20
  Design: Length=187
  cross sections:
    n  XLocPercent  YLocPercent  ZLocPercent  shape
    0  0            0            -0.0106952   point
    1  0.149733     0            0            super ellipse Super_Height=20 Super_M=3 Super_MaxWidthLoc=0 Super_N=3 Super_Width=20
    2  0.764706     0            0            as above
    3  0.999465     0            0.0454545    super ellipse Super_Height=3 Super_M=2 Super_MaxWidthLoc=0 Super_N=2 Super_Width=1
    4  1            0            0.0454545    point

Wing "htail"
  location (X Y Z) 145 0 5, rotation 0 0 0
  symmetric about XZ
  bounding box size 39.8527 69.9358 9.02342
  totals: TotalSpan=71.4983 TotalProjectedSpan=69.9358 TotalChord=19.8606 TotalArea=1420 TotalAR=3.44438
  root: chord 29.8656, twist 0, NACA 4-series Camber=0 CamberLoc=0.2 ThickChord=0.08
  sections:
    n  Span     Root_Chord  Tip_Chord  Area  Sweep  Sweep_Location  Dihedral  Twist  Twist_Location  tip airfoil
    1  35.7491  29.8656     9.85565    710   40     0               12        0      0.25            as above

Wing "vtail"
  location (X Y Z) 150 0 9, rotation 90 0 0
  bounding box size 41.193 2.30361 33.14
  totals: TotalSpan=33.14 TotalProjectedSpan=33.14 TotalChord=18.4068 TotalArea=610 TotalAR=1.80043
  root: chord 28.7606, twist 0, NACA 4-series Camber=0 CamberLoc=0.2 ThickChord=0.08
  sections:
    n  Span   Root_Chord  Tip_Chord  Area  Sweep  Sweep_Location  Dihedral  Twist  Twist_Location  tip airfoil
    1  33.14  28.7606     8.05296    610   45     0               0         0      0.25            as above

Stack "pod"
  location (X Y Z) 76.3207 48.8365 -4.00364, rotation 0 0 0
  symmetric about XZ
  bounding box size 25 103.923 6.25
  cross sections:
    n  XDelta  YDelta  ZDelta  shape
    0  0       0       0       circle Circle_Diameter=6.25
    1  9.375   0       0       as above
    2  12.5    0       0       point

Wing "pylon"
  location (X Y Z) 74.1957 48.8365 -4.00364, rotation 90 0 0
  symmetric about XZ
  bounding box size 24.5 98.6235 5
  totals: TotalSpan=10 TotalProjectedSpan=10 TotalChord=9.5 TotalArea=95 TotalAR=1.05263
  root: chord 9.5, twist 0, NACA 4-series Camber=0 CamberLoc=0.2 ThickChord=0.1
  sections:
    n  Span  Root_Chord  Tip_Chord  Area  Sweep   Sweep_Location  Dihedral  Twist  Twist_Location  tip airfoil
    1  5     9.5         9.5        47.5  71.565  0               0         0      0.25            as above

User parameters
  Default_Group:wing..chordb = 22.6598  (chord at break)
  Default_Group:wing..chordr = 47.208  (chord at root)
  Default_Group:wing..chordt = 5.21176  (chord at tip)
  Default_Group:wing..spano = 61.5339  (span of outboard section)
  Default_Group:wing..ybreak = 36.139  (yloc at break)
  Default_Group:wing..ytip = 97.6729  (yloc at tip)
  ESP_Group:fuse.aftHeight = 3  (height at end of fuselage)
  ESP_Group:fuse.aftLength = 44  (length of aft section)
  ESP_Group:fuse.aftWidth = 1  (width at end of fuselage)
  ESP_Group:fuse.aftZloc = 8.5  (Z loc at end of fuselage)
  ESP_Group:fuse.fwdLength = 28  (length of forward section)
  ESP_Group:fuse.midHeight = 20  (height of mid section)
  ESP_Group:fuse.midLength = 115  (length of mid section)
  ESP_Group:fuse.midWidth = 20  (width of mid section)
  ESP_Group:fuse.noseRad = 2.5  (nose radius)
  ESP_Group:fuse.noseZloc = -2  (Z loc at nose (relative to mid section))
  ESP_Group:fuse.power = 3  (superellipse power of  of mid section)
  ESP_Group:htail.area = 1420  (horizontal tail area)
  ESP_Group:htail.aspect = 3.6  (horizontal tail aspect ratio)
  ESP_Group:htail.dihedral = 12  (horizontal tail dihedral (deg))
  ESP_Group:htail.sweep = 40  (horizontal tail LE sweep (deg))
  ESP_Group:htail.thick = 0.08  (htail thickness ratio)
  ESP_Group:htail.xloc = 145  (xloc of htail root LE)
  ESP_Group:htail.zloc = 5  (zloc of htail root LE)
  ESP_Group:pod.dxnose = -15  (x offset of nose from wing leading edge)
  ESP_Group:pod.dznose = -5  (z offset of nose from wing leading edge)
  ESP_Group:pod.length = 25  (length of pod)
  ESP_Group:pod.thick = 0.25  (pod thickness ratio)
  ESP_Group:pod.yb = 0.5  (semispan location of pod)
  ESP_Group:pylon.dxpod = 1  (x offset from le of pod)
  ESP_Group:pylon.dxwing = 1  (x offset from le of wing)
  ESP_Group:pylon.length = 9.5  (length of pylon)
  ESP_Group:pylon.thick = 0.1  (thickness ratio of pylon)
  ESP_Group:vtail.area = 610  (vertical tal area)
  ESP_Group:vtail.aspect = 1.8  (vertical tail aspect ratio)
  ESP_Group:vtail.sweep = 45  (vertical tail sweep (deg))
  ESP_Group:vtail.taper = 0.28  (vertical tail taper ratio)
  ESP_Group:vtail.thick = 0.08  (vertical tail thickness ratio)
  ESP_Group:vtail.xloc = 150  (xloc of vtail LE root)
  ESP_Group:vtail.zloc = 9  (zloc of vtail LE root)
  ESP_Group:wing.alphab = -3  (break setting angle (deg))
  ESP_Group:wing.alphar = -3  (root setting angle (deg))
  ESP_Group:wing.alphat = -8  (tip setting angle (deg))
  ESP_Group:wing.area = 4240  (wing area)
  ESP_Group:wing.aspect = 9  (wing aspect ratio)
  ESP_Group:wing.break = 0.37  (fraction inboard)
  ESP_Group:wing.camberb = 0.04  (break camber ratio)
  ESP_Group:wing.camberr = 0.04  (root camber ratio)
  ESP_Group:wing.cambert = 0.04  (tip camber ratio)
  ESP_Group:wing.dihedral = 7  (dihedral (deg))
  ESP_Group:wing.sweep = 35  (leading edge sweep (deg))
  ESP_Group:wing.taperi = 0.48  (inboard taper ratio)
  ESP_Group:wing.tapero = 0.23  (outboard taper ratio)
  ESP_Group:wing.thickb = 0.15  (break thickness ratio)
  ESP_Group:wing.thickr = 0.15  (root thickness ratio)
  ESP_Group:wing.thickt = 0.08  (tip thickness ratio)
  ESP_Group:wing.xroot = 54  (xloc at root LE)
  ESP_Group:wing.zroot = -5  (zloc at wing LE)

Parameter links (A drives B)
  UserParm:ESP_Group:fuse.midHeight -> fuse:XSec_1:Super_Height Offset=0
  UserParm:ESP_Group:fuse.midHeight -> fuse:XSec_2:Super_Height Offset=0
  UserParm:ESP_Group:fuse.midWidth -> fuse:XSec_1:Super_Width Offset=0
  UserParm:ESP_Group:fuse.midWidth -> fuse:XSec_2:Super_Width Offset=0
  UserParm:ESP_Group:fuse.power -> fuse:XSec_3:Super_M Offset=-1
  UserParm:ESP_Group:fuse.power -> fuse:XSec_3:Super_N Offset=-1
  UserParm:ESP_Group:fuse.power -> fuse:XSec_1:Super_M Offset=0
  UserParm:ESP_Group:fuse.power -> fuse:XSec_1:Super_N Offset=0
  UserParm:ESP_Group:fuse.power -> fuse:XSec_2:Super_M Offset=0
  UserParm:ESP_Group:fuse.power -> fuse:XSec_2:Super_N Offset=0
  UserParm:ESP_Group:htail.area -> htail:XSec_1:Area Offset=0 Scale=0.5
  UserParm:ESP_Group:htail.aspect -> htail:XSec_1:Aspect Offset=-1.8
  UserParm:ESP_Group:htail.dihedral -> htail:XSec_1:Dihedral Offset=0
  UserParm:ESP_Group:htail.sweep -> htail:XSec_1:Sweep Offset=0
  UserParm:ESP_Group:htail.thick -> htail:XSec_0:ThickChord Offset=0
  UserParm:ESP_Group:htail.xloc -> htail:XForm:X_Location Offset=0
  UserParm:ESP_Group:htail.zloc -> htail:XForm:Z_Location Offset=0
  UserParm:ESP_Group:vtail.area -> vtail:XSec_1:Area Offset=0
  UserParm:ESP_Group:vtail.aspect -> vtail:XSec_1:Aspect Offset=0.000425574 Scale=1.00024
  UserParm:ESP_Group:vtail.sweep -> vtail:XSec_1:Sweep Offset=0
  UserParm:ESP_Group:vtail.taper -> vtail:XSec_1:Taper Offset=0
  UserParm:ESP_Group:vtail.thick -> vtail:XSec_0:ThickChord Offset=0
  UserParm:ESP_Group:vtail.xloc -> vtail:XForm:X_Location Offset=0
  UserParm:ESP_Group:vtail.zloc -> vtail:XForm:Z_Location Offset=0
  UserParm:Default_Group:wing..chordb -> wing:XSec_1:Tip_Chord Offset=-0.157028
  UserParm:Default_Group:wing..chordb -> wing:XSec_2:Root_Chord Offset=-0.157028
  UserParm:Default_Group:wing..chordr -> wing:XSec_1:Root_Chord Offset=-0.325474
  UserParm:Default_Group:wing..chordt -> wing:XSec_2:Tip_Chord Offset=-0.0379163
  UserParm:Default_Group:wing..spano -> wing:XSec_2:Span Offset=0.42
  UserParm:Default_Group:wing..ybreak -> wing:XSec_1:Span Offset=0.25
  UserParm:ESP_Group:wing.alphar -> wing:XForm:Y_Rotation Offset=3
  UserParm:ESP_Group:wing.camberb -> wing:XSec_1:Camber Offset=0
  UserParm:ESP_Group:wing.camberr -> wing:XSec_0:Camber Offset=0
  UserParm:ESP_Group:wing.cambert -> wing:XSec_2:Camber Offset=0
  UserParm:ESP_Group:wing.dihedral -> wing:XSec_1:Dihedral Offset=0
  UserParm:ESP_Group:wing.dihedral -> wing:XSec_2:Dihedral Offset=0
  UserParm:ESP_Group:wing.sweep -> wing:XSec_1:Sweep Offset=0
  UserParm:ESP_Group:wing.sweep -> wing:XSec_2:Sweep Offset=0
  UserParm:ESP_Group:wing.thickb -> wing:XSec_1:ThickChord Offset=0
  UserParm:ESP_Group:wing.thickr -> wing:XSec_0:ThickChord Offset=0
  UserParm:ESP_Group:wing.thickt -> wing:XSec_2:ThickChord Offset=0
  UserParm:ESP_Group:wing.xroot -> wing:XForm:X_Location Offset=0
  UserParm:ESP_Group:wing.zroot -> wing:XForm:Z_Location Offset=0
  UserParm:ESP_Group:fuse.aftHeight -> fuse:XSec_3:Super_Height Offset=0
  UserParm:ESP_Group:fuse.aftWidth -> fuse:XSec_3:Super_Width Offset=0

Advanced link "wing sizing"
  input area = UserParm:ESP_Group:wing.area
  input aspect = UserParm:ESP_Group:wing.aspect
  input taperi = UserParm:ESP_Group:wing.taperi
  input tapero = UserParm:ESP_Group:wing.tapero
  input break_loc = UserParm:ESP_Group:wing.break
  input alphab = UserParm:ESP_Group:wing.alphab
  input alphar = UserParm:ESP_Group:wing.alphar
  input alphat = UserParm:ESP_Group:wing.alphat
  output chordb = UserParm:Default_Group:wing..chordb
  output chordr = UserParm:Default_Group:wing..chordr
  output chordt = UserParm:Default_Group:wing..chordt
  output ybreak = UserParm:Default_Group:wing..ybreak
  output ytip = UserParm:Default_Group:wing..ytip
  output spano = UserParm:Default_Group:wing..spano
  output twisti = wing:XSec_1:Twist
  output twisto = wing:XSec_2:Twist
    double span = sqrt(aspect * area);

    ytip   = span / 2;
    ybreak = break_loc * ytip;
    spano  = ytip - ybreak;

    chordr = area/(ybreak*(taperi+1)+(ytip-ybreak)*taperi*(tapero+1));
    chordb = taperi * chordr;
    chordt = tapero * chordb;

    twisti = alphab - alphar;
    twisto = alphat - alphab;

Advanced link "fuse sizing"
  input fwdLength = UserParm:ESP_Group:fuse.fwdLength
  input midLength = UserParm:ESP_Group:fuse.midLength
  input noseZloc = UserParm:ESP_Group:fuse.noseZloc
  input aftLength = UserParm:ESP_Group:fuse.aftLength
  input aftZloc = UserParm:ESP_Group:fuse.aftZloc
  output aftZLocPercent = fuse:XSec_3:ZLocPercent
  output mid1XLocPercent = fuse:XSec_1:XLocPercent
  output mid2XLocPercent = fuse:XSec_2:XLocPercent
  output noseZLocPercent = fuse:XSec_0:ZLocPercent
  output aftZLocPercent2 = fuse:XSec_4:ZLocPercent
  output totalLength = fuse:Design:Length
    totalLength = fwdLength + midLength + aftLength;

    noseZLocPercent = noseZloc / totalLength;

    mid1XLocPercent = fwdLength / totalLength;
    mid2XLocPercent = (fwdLength + midLength) / totalLength;

    aftZLocPercent  = aftZloc / totalLength;
    aftZLocPercent2 = aftZLocPercent;

Advanced link "pod sizing"
  input area = UserParm:ESP_Group:wing.area
  input aspect = UserParm:ESP_Group:wing.aspect
  input dihedral = UserParm:ESP_Group:wing.dihedral
  input sweep = UserParm:ESP_Group:wing.sweep
  input dxnose = UserParm:ESP_Group:pod.dxnose
  input dznose = UserParm:ESP_Group:pod.dznose
  input length = UserParm:ESP_Group:pod.length
  input thick = UserParm:ESP_Group:pod.thick
  input yb = UserParm:ESP_Group:pod.yb
  input xroot = UserParm:ESP_Group:wing.xroot
  input zroot = UserParm:ESP_Group:wing.zroot
  input dxpod = UserParm:ESP_Group:pylon.dxpod
  input dxwing = UserParm:ESP_Group:pylon.dxwing
  input pylength = UserParm:ESP_Group:pylon.length
  input pythick = UserParm:ESP_Group:pylon.thick
  output xpod = pod:XForm:X_Location
  output ypod = pod:XForm:Y_Location
  output zpod = pod:XForm:Z_Location
  output diam0 = pod:XSec_0:Circle_Diameter
  output diam1 = pod:XSec_1:Circle_Diameter
  output xdelta1 = pod:XSec_1:XDelta
  output xdelta2 = pod:XSec_2:XDelta
  output pyxloc = pylon:XForm:X_Location
  output pyyloc = pylon:XForm:Y_Location
  output pyzloc = pylon:XForm:Z_Location
  output pyspan = pylon:XSec_1:Span
  output pyrootchord = pylon:XSec_1:Root_Chord
  output pysweep = pylon:XSec_1:Sweep
  output pythick0 = pylon:XSec_0:ThickChord
  output pythick1 = pylon:XSec_1:ThickChord
    double span = sqrt(area * aspect);

    diam0 = length * thick;
    diam1 = diam0;

    double yle = yb * span/2;
    double xle = xroot + yle * tan(Deg2Rad(sweep));
    double zle = zroot + yle * tan(Deg2Rad(dihedral));

    ypod = yle;
    xpod = xle + dxnose + diam0/2;
    zpod = zle + dznose;

    xdelta1 = 3 * diam0 / 2;
    xdelta2 = 4 * diam1 / 2;

    pyxloc = xpod + dxpod - diam0/2;
    pyyloc = ypod;
    pyzloc = zpod;

    pythick0 = pythick;
    pythick1 = pythick;

    pyrootchord = pylength;
    pyspan      = zle - zpod;
    pysweep     = Rad2Deg(atan2((xle+dxwing)-(xpod-diam0/2+dxpod), zle-zpod));
