OpenVSP model (file version 5), 1 components.
Geometry view with OpenVSP parameter names; values to 6 digits, angles in degrees, lengths in the model's unit.
Overall bounding box: X_Min=0 X_Len=187.401 Y_Min=-10 Y_Len=20.0001 Z_Min=-10 Z_Len=20

Fuselage "fuse"
  location (X Y Z) 0 0 0, rotation 0 0 0
  bounding box size 187.401 20.0001 20
  Design: Length=187
  cross sections:
    n  XLocPercent  YLocPercent  ZLocPercent  shape
    0  0            0            -0.0106952   point
    1  0.149733     0            0            super ellipse Super_Height=20 Super_M=3 Super_MaxWidthLoc=0 Super_N=3 Super_Width=20
    2  0.764706     0            0            as above
    3  0.999465     0            0.0454545    super ellipse Super_Height=3 Super_M=2 Super_MaxWidthLoc=0 Super_N=2 Super_Width=1
    4  1            0            0.0454545    point

User parameters
  ESP_Group:fuse.aftHeight = 3  (height at end of fuselage)
  ESP_Group:fuse.aftLength = 44  (length of aft section)
  ESP_Group:fuse.aftWidth = 1  (width at end of fuselage)
  ESP_Group:fuse.aftZloc = 8.5  (Z loc at end of fuselage)
  ESP_Group:fuse.fwdLength = 28  (length of forward section)
  ESP_Group:fuse.midHeight = 20  (height of mid section)
  ESP_Group:fuse.midLength = 115  (length of mid section)
  ESP_Group:fuse.midWidth = 20  (width of mid section)
  ESP_Group:fuse.noseRad = 2.5  (nose radius)
  ESP_Group:fuse.noseZloc = -2  (Z loc at nose (relative to mid section))
  ESP_Group:fuse.power = 3  (superellipse power of  of mid section)

Parameter links (A drives B)
  UserParm:ESP_Group:fuse.midHeight -> fuse:XSec_1:Super_Height Offset=0
  UserParm:ESP_Group:fuse.midHeight -> fuse:XSec_2:Super_Height Offset=0
  UserParm:ESP_Group:fuse.midWidth -> fuse:XSec_1:Super_Width Offset=0
  UserParm:ESP_Group:fuse.midWidth -> fuse:XSec_2:Super_Width Offset=0
  UserParm:ESP_Group:fuse.power -> fuse:XSec_3:Super_M Offset=-1
  UserParm:ESP_Group:fuse.power -> fuse:XSec_3:Super_N Offset=-1
  UserParm:ESP_Group:fuse.power -> fuse:XSec_1:Super_M Offset=0
  UserParm:ESP_Group:fuse.power -> fuse:XSec_1:Super_N Offset=0
  UserParm:ESP_Group:fuse.power -> fuse:XSec_2:Super_M Offset=0
  UserParm:ESP_Group:fuse.power -> fuse:XSec_2:Super_N Offset=0
  UserParm:ESP_Group:fuse.aftHeight -> fuse:XSec_3:Super_Height Offset=0
  UserParm:ESP_Group:fuse.aftWidth -> fuse:XSec_3:Super_Width Offset=0

Advanced link "fuse sizing"
  input fwdLength = UserParm:ESP_Group:fuse.fwdLength
  input midLength = UserParm:ESP_Group:fuse.midLength
  input noseZloc = UserParm:ESP_Group:fuse.noseZloc
  input aftLength = UserParm:ESP_Group:fuse.aftLength
  input aftZloc = UserParm:ESP_Group:fuse.aftZloc
  output aftZLocPercent = fuse:XSec_3:ZLocPercent
  output mid1XLocPercent = fuse:XSec_1:XLocPercent
  output mid2XLocPercent = fuse:XSec_2:XLocPercent
  output noseZLocPercent = fuse:XSec_0:ZLocPercent
  output aftZLocPercent2 = fuse:XSec_4:ZLocPercent
  output totalLength = fuse:Design:Length
    totalLength = fwdLength + midLength + aftLength;

    noseZLocPercent = noseZloc / totalLength;

    mid1XLocPercent = fwdLength / totalLength;
    mid2XLocPercent = (fwdLength + midLength) / totalLength;

    aftZLocPercent  = aftZloc / totalLength;
    aftZLocPercent2 = aftZLocPercent;
