OpenVSP model (file version 5), 1 components.
Geometry view with OpenVSP parameter names; values to 6 digits, angles in degrees, lengths in the model's unit.
Overall bounding box: X_Min=53.9775 X_Len=74.0421 Y_Min=-97.6099 Y_Len=195.22 Z_Min=-6.96571 Z_Len=14.4494

Wing "wing"
  location (X Y Z) 54 0 -5, rotation 0 0 0
  symmetric about XZ
  bounding box size 74.0421 195.22 14.4494
  totals: TotalSpan=196.686 TotalProjectedSpan=195.22 TotalChord=24.2655 TotalArea=4239.54 TotalAR=8.98937
  root: chord 46.8825, twist 0, NACA 4-series Camber=0.04 CamberLoc=0.4 ThickChord=0.15
  sections:
    n  Span     Root_Chord  Tip_Chord  Area     Sweep  Sweep_Location  Dihedral  Twist  Twist_Location  tip airfoil
    1  36.389   46.8825     22.5028    1262.43  35     0               7         0      0.25            as above
    2  61.9539  22.5028     5.17384    857.339  35     0               7         -5     0.25            NACA 4-series Camber=0.04 CamberLoc=0.4 ThickChord=0.08

User parameters
  Default_Group:wing..chordb = 22.6598  (chord at break)
  Default_Group:wing..chordr = 47.208  (chord at root)
  Default_Group:wing..chordt = 5.21176  (chord at tip)
  Default_Group:wing..spano = 61.5339  (span of outboard section)
  Default_Group:wing..ybreak = 36.139  (yloc at break)
  Default_Group:wing..ytip = 97.6729  (yloc at tip)
  ESP_Group:wing.alphab = -3  (break setting angle (deg))
  ESP_Group:wing.alphar = -3  (root setting angle (deg))
  ESP_Group:wing.alphat = -8  (tip setting angle (deg))
  ESP_Group:wing.area = 4240  (wing area)
  ESP_Group:wing.aspect = 9  (wing aspect ratio)
  ESP_Group:wing.break = 0.37  (fraction inboard)
  ESP_Group:wing.camberb = 0.04  (break camber ratio)
  ESP_Group:wing.camberr = 0.04  (root camber ratio)
  ESP_Group:wing.cambert = 0.04  (tip camber ratio)
  ESP_Group:wing.dihedral = 7  (dihedral (deg))
  ESP_Group:wing.sweep = 35  (leading edge sweep (deg))
  ESP_Group:wing.taperi = 0.48  (inboard taper ratio)
  ESP_Group:wing.tapero = 0.23  (outboard taper ratio)
  ESP_Group:wing.thickb = 0.15  (break thickness ratio)
  ESP_Group:wing.thickr = 0.15  (root thickness ratio)
  ESP_Group:wing.thickt = 0.08  (tip thickness ratio)
  ESP_Group:wing.xroot = 54  (xloc at root LE)
  ESP_Group:wing.zroot = -5  (zloc at wing LE)

Parameter links (A drives B)
  UserParm:Default_Group:wing..chordb -> wing:XSec_1:Tip_Chord Offset=-0.157028
  UserParm:Default_Group:wing..chordb -> wing:XSec_2:Root_Chord Offset=-0.157028
  UserParm:Default_Group:wing..chordr -> wing:XSec_1:Root_Chord Offset=-0.325474
  UserParm:Default_Group:wing..chordt -> wing:XSec_2:Tip_Chord Offset=-0.0379163
  UserParm:Default_Group:wing..spano -> wing:XSec_2:Span Offset=0.42
  UserParm:Default_Group:wing..ybreak -> wing:XSec_1:Span Offset=0.25
  UserParm:ESP_Group:wing.alphar -> wing:XForm:Y_Rotation Offset=3
  UserParm:ESP_Group:wing.camberb -> wing:XSec_1:Camber Offset=0
  UserParm:ESP_Group:wing.camberr -> wing:XSec_0:Camber Offset=0
  UserParm:ESP_Group:wing.cambert -> wing:XSec_2:Camber Offset=0
  UserParm:ESP_Group:wing.dihedral -> wing:XSec_1:Dihedral Offset=0
  UserParm:ESP_Group:wing.dihedral -> wing:XSec_2:Dihedral Offset=0
  UserParm:ESP_Group:wing.sweep -> wing:XSec_1:Sweep Offset=0
  UserParm:ESP_Group:wing.sweep -> wing:XSec_2:Sweep Offset=0
  UserParm:ESP_Group:wing.thickb -> wing:XSec_1:ThickChord Offset=0
  UserParm:ESP_Group:wing.thickr -> wing:XSec_0:ThickChord Offset=0
  UserParm:ESP_Group:wing.thickt -> wing:XSec_2:ThickChord Offset=0
  UserParm:ESP_Group:wing.xroot -> wing:XForm:X_Location Offset=0
  UserParm:ESP_Group:wing.zroot -> wing:XForm:Z_Location Offset=0

Advanced link "wing sizing"
  input area = UserParm:ESP_Group:wing.area
  input aspect = UserParm:ESP_Group:wing.aspect
  input taperi = UserParm:ESP_Group:wing.taperi
  input tapero = UserParm:ESP_Group:wing.tapero
  input break_loc = UserParm:ESP_Group:wing.break
  input alphab = UserParm:ESP_Group:wing.alphab
  input alphar = UserParm:ESP_Group:wing.alphar
  input alphat = UserParm:ESP_Group:wing.alphat
  output chordb = UserParm:Default_Group:wing..chordb
  output chordr = UserParm:Default_Group:wing..chordr
  output chordt = UserParm:Default_Group:wing..chordt
  output ybreak = UserParm:Default_Group:wing..ybreak
  output ytip = UserParm:Default_Group:wing..ytip
  output spano = UserParm:Default_Group:wing..spano
  output twisti = wing:XSec_1:Twist
  output twisto = wing:XSec_2:Twist
    double span = sqrt(aspect * area);

    ytip   = span / 2;
    ybreak = break_loc * ytip;
    spano  = ytip - ybreak;

    chordr = area/(ybreak*(taperi+1)+(ytip-ybreak)*taperi*(tapero+1));
    chordb = taperi * chordr;
    chordt = tapero * chordb;

    twisti = alphab - alphar;
    twisto = alphat - alphab;
