OpenVSP model (file version 5), 22 components.
Geometry view with OpenVSP parameter names; values to 6 digits, angles in degrees, lengths in the model's unit.
Overall bounding box: X_Min=-17.6197 X_Len=42.2338 Y_Min=-17.6439 Y_Len=35.2878 Z_Min=-9.875 Z_Len=10.8188

Propeller "Rotor_1_blades"
  location (X Y Z) 0 0 0, rotation 0 87 0
  bounding box size 35.2421 30.8489 2.27203
  Design: Diameter=35.2878 NumBlade=6 Beta34=3.4433 UseBeta34Flag=1 Feather=3.4433 Rotate=30 Precone=0 ReverseFlag=0 FoldAngle=0 PropMode=0 AF=40.2157 CLi=0.614704 Chord=0.0532389 Solidity=0.101679 ConstructXoC=0.5 FeatherAxisXoC=0.5 FeatherOffsetXoC=0
  cross sections:
    n  RadiusFrac  shape
    0  0.15        airfoil file "BOEING-VERTOL VR-12 AIRFOIL"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 BaseThickChord=0.106373 Chord=0.95277 ThickChord=0.1064
    1  0.94        as above
    2  0.9401      airfoil file "SIKORSKY SSC-A09  AIRFOIL"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 BaseThickChord=0.0901604 Chord=0.95277 ThickChord=0.0902
    3  1           airfoil file "SIKORSKY SSC-A09  AIRFOIL"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 BaseThickChord=0.0901604 Chord=0.571662 DeltaY=-0.675 ThickChord=0.0902
  Chord along r/R (linear): 0.15: 0.054, 0.94: 0.054, 0.9401: 0.054, 1: 0.0324
  Twist along r/R (linear): 0.15: 7.2, 1: -3
  Thick along r/R (linear): 0.15: 0.1064, 0.94: 0.1064, 0.9401: 0.0902, 1: 0.0902
  CLI along r/R (linear): 0.15: 0.615689, 0.45: 0.615689, 0.7: 0.615689, 0.941067: 0.615689, 1: 0.615689

Fuselage "Rotor_1_hub", child of "Rotor_1_blades"
  location (X Y Z) -0.039252 0 0.748972, rotation 0 87 0; relative location -0.75 0 0, rotation 0 0 0
  bounding box size 3.04822 3 1.5384
  Design: Length=1.5
  cross sections:
    n  XLocPercent  YLocPercent  ZLocPercent  shape
    0  0            0            0            point
    1  0.25         0            0            ellipse Ellipse_Height=3 Ellipse_Width=3
    2  0.5          0            0            as above
    3  0.75         0            0            as above
    4  1            0            0            point

Custom "Rotor_1_disk", child of "Rotor_1_blades"
  location (X Y Z) 0 0 0, rotation 0 87 0; relative location 0 0 0, rotation 0 0 0
  bounding box size 35.2394 35.2878 1.84682
  Design: Diameter=35.2878
  custom script Disk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

Fuselage "Rotor_1_pylon"
  location (X Y Z) -6.47826 0 -2.6, rotation 0 0 0
  bounding box size 13.7384 4.86893 2.94392
  Design: Length=13.4545
  cross sections:
    n  XLocPercent  YLocPercent  ZLocPercent  shape
    0  0            0            -0.0217391   point
    1  0.339495     0            0.0189039    general fuselage BotStr=0.861518 BotTanAngle=90 CornerRad=0 Height=2.5 LowStr=0.83 MaxWidthLoc=-0.445455 TopStr=0.636364 TopTanAngle=65.4545 UpStr=2 Width=4
    2  0.577566     0            0.0189039    general fuselage BotStr=0.861518 BotTanAngle=90 CornerRad=0 Height=2.5 LowStr=0.83 MaxWidthLoc=-0.445455 TopStr=1 TopTanAngle=65.4545 UpStr=2 Width=4.51818
    3  0.741376     0            -0.0106333   general fuselage BotStr=1.08338 BotTanAngle=90 CornerRad=0.0227273 Height=2.50196 LowStr=1.51692 MaxWidthLoc=0.672727 TopStr=0.524566 TopTanAngle=90 UpStr=1.79623 Width=4.86893
    4  0.881183     0            0.00549514   general fuselage BotStr=1.23109 BotTanAngle=90 CornerRad=0.0227273 Height=1.34102 LowStr=1.56382 MaxWidthLoc=0.627273 TopStr=0.815992 TopTanAngle=90 UpStr=2 Width=4.66605
    5  0.97417      0            0.00549514   general fuselage BotStr=1.23109 BotTanAngle=90 CornerRad=0.0227273 Height=0.99784 LowStr=1.56382 MaxWidthLoc=0.627273 TopStr=0.815992 TopTanAngle=90 UpStr=2 Width=4.66605
    6  1            0            -0.0434783   point
  SS_Ellipse "SS_ELLIP_0": Center_U=0.902174 Center_W=0.516304 U_Length=0.076087 W_Length=0.2
  SS_Ellipse "SS_ELLIP_1": Center_U=0.646739 Center_W=0.75 U_Length=0.298913 W_Length=0.233696

Fuselage "Fuselage"
  location (X Y Z) -10.5 0 -5.25, rotation 0 0 0
  bounding box size 35.282 6.6375 7.13021
  Design: Length=35
  cross sections:
    n  XLocPercent  YLocPercent  ZLocPercent  shape
    0  0            0            -0.0434783   point
    1  0.1834       0            0.001        general fuselage BotStr=1.25605 BotTanAngle=90 CornerRad=0 Height=6.6 LowStr=1.03977 MaxWidthLoc=-0.118182 TopStr=0.813641 TopTanAngle=90 UpStr=0.814269 Width=6
    2  0.37222      0            0.009        general fuselage BotStr=1.25605 BotTanAngle=90 CornerRad=0 Height=7 LowStr=1.03977 MaxWidthLoc=0.0818182 TopStr=0.598224 TopTanAngle=90 UpStr=0.804293 Width=6
    3  0.56545      0            0.0563098    circle Circle_Diameter=2
    4  0.927472     0            0.0594022    ellipse Ellipse_Height=2 Ellipse_Width=2
    5  0.984402     0            0.0594       as above
    6  1            0            0.08         point
  SS_Rectangle "NOTAR_jet": Center_U=0.743902 Center_W=0.481707 U_Length=0.121951 W_Length=0.134146
  SS_Rectangle "NOTAR_slot": Center_U=0.54878 Center_W=0.0243902 U_Length=0.097561 W_Length=0.0121951

Custom "Payload_033.fpax", child of "Fuselage"
  location (X Y Z) -3.762 1.25 -3.49524, rotation -180 80 -180; relative location -3.762 1.25 -3.49524, rotation 0 100 0
  symmetric about XZ
  bounding box size 3.31322 4.62571 4.59941
  Design: ElbowAngle=45 Height=6 HipAngle=90 KneeAngle=-70 PresetTrigger=0 Presets=4 ShoulderAngle=35
  custom script PodMan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

Custom "Payload_033.rpax", child of "Fuselage"
  location (X Y Z) 3 1.25 -3.49524, rotation -180 80 -180; relative location 3 1.25 -3.49524, rotation 0 100 0
  symmetric about XZ
  bounding box size 2.92077 4.62571 4.67753
  Design: ElbowAngle=10 Height=6 HipAngle=90 KneeAngle=-90 PresetTrigger=0 Presets=1 ShoulderAngle=0
  custom script PodMan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

Custom "Payload_033.mpax", child of "Fuselage"
  location (X Y Z) -2.333 1.25 -3.49524, rotation -180 -80 0; relative location -2.333 1.25 -3.49524, rotation 0 -100 180
  symmetric about XZ
  bounding box size 2.92077 4.62571 4.67753
  Design: ElbowAngle=10 Height=6 HipAngle=90 KneeAngle=-90 PresetTrigger=0 Presets=1 ShoulderAngle=0
  custom script PodMan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

Custom "Seat", child of "Fuselage"
  location (X Y Z) -4.714 1.25 -7.54286, rotation 0 -90 0
  symmetric about XZ
  bounding box size 2.27956 4.2 2.91202
  Design: BackAngle=10 BackHeight=2.5 BackThick=0.3 SeatHeight=0.3 SeatLength=1.7 Width=1.7
  custom script Seat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

Custom "Seat", child of "Fuselage"
  location (X Y Z) 2.1 1.25 -7.54286, rotation 0 -90 0
  symmetric about XZ
  bounding box size 2.27956 4.2 2.91202
  Design: BackAngle=10 BackHeight=2.5 BackThick=0.3 SeatHeight=0.3 SeatLength=1.7 Width=1.7
  custom script Seat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

Custom "Seat", child of "Fuselage"
  location (X Y Z) -1.471 1.25 -7.54286, rotation 180 90 0; relative location -1.471 1.25 -7.54286, rotation 0 90 180
  symmetric about XZ
  bounding box size 2.27956 4.2 2.91202
  Design: BackAngle=10 BackHeight=2.5 BackThick=0.3 SeatHeight=0.3 SeatLength=1.7 Width=1.7
  custom script Seat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

Fuselage "NOTAR-Inlet", child of "Fuselage"
  location (X Y Z) 2.63043 0 -2.35, rotation 0 0 0; relative location 13.1304 0 2.9, rotation 0 0 0
  bounding box size 6 3 1.18253
  Design: Length=6
  cross sections:
    n  XLocPercent  YLocPercent  ZLocPercent  shape
    0  0            0            -0.0217391   point
    1  0.25         0            0            ellipse Ellipse_Height=1 Ellipse_Width=3
    2  0.5          0            0            as above
    3  0.75         0            0            ellipse Ellipse_Height=1 Ellipse_Width=2.5
    4  1            0            -0.0543478   point

Wing "Tail_1"
  location (X Y Z) 18.769 0 -2.5, rotation 0 0 0
  symmetric about XZ
  bounding box size 2.557 8.693 0.255848
  totals: TotalSpan=8.693 TotalProjectedSpan=8.693 TotalChord=2.557 TotalArea=22.228 TotalAR=3.39969
  root: chord 2.557, twist 0, NACA 4-series Camber=0 CamberLoc=0.2 ThickChord=0.1
  sections:
    n  Span    Root_Chord  Tip_Chord  Area    Sweep  Sweep_Location  Dihedral  Twist  Twist_Location  tip airfoil
    1  4.3465  2.557       2.557      11.114  0      0.25            0         0      0.25            as above

Fuselage "EngineGroup_1"
  location (X Y Z) 1.56522 -0.652174 -2.22609, rotation 0 0 -25
  symmetric about XZ
  bounding box size 3.39891 5.00833 1.4385
  Design: Length=2.6
  cross sections:
    n  XLocPercent  YLocPercent  ZLocPercent  shape
    0  0            0            0            point
    1  0            0            0            circle Circle_Diameter=1.4385
    2  0.527174     0            0            as above
    3  1            0            0            as above
    4  1            0            0            point

Custom "FuelTank_1"
  location (X Y Z) 4.40476 -0.47619 -4.59524, rotation 0 0 0
  bounding box size 1.905 1.905 1
  Design: Height=1 Length=1.905 SquareFlag=0 Width=1.905
  custom script Box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

Fuselage "Rotor_1_shaft"
  location (X Y Z) 0 0 -0.434783, rotation 0 87 0
  bounding box size 0.860188 0.75 2.16137
  Design: Length=2
  cross sections:
    n  XLocPercent  YLocPercent  ZLocPercent  shape
    0  0            0            0            point
    1  0            0            0            circle Circle_Diameter=0.75
    2  1            0            0            as above
    3  1            0            0            as above
    4  1            0            0            point

Fuselage "Propulsion_1"
  location (X Y Z) 0.0434783 0 -1.35652, rotation 0 87 0
  bounding box size 1.60191 1.5 2.06219
  Design: Length=1.5
  cross sections:
    n  XLocPercent  YLocPercent  ZLocPercent  shape
    0  0            0            0            point
    1  0            0            0            circle Circle_Diameter=1.5
    2  0.527174     0            0            as above
    3  1            0            0            as above
    4  1            0            0            point

Fuselage "LandingGear_010.front"
  location (X Y Z) -6.69565 -0.2 -9.25, rotation 0 0 90
  bounding box size 1.25 0.6 1.25
  Design: Length=0.4
  cross sections:
    n  XLocPercent  YLocPercent  ZLocPercent  shape
    0  0            0            0            point
    1  0            0            0            circle Circle_Diameter=1.25
    2  1            0            0            as above
    3  1            0            0            point

Fuselage "LandingGear_040.main"
  location (X Y Z) 4.5 2.82609 -9.25, rotation 0 0 90
  symmetric about XZ
  bounding box size 1.25 6.71884 1.25
  Design: Length=0.4
  cross sections:
    n  XLocPercent  YLocPercent  ZLocPercent  shape
    0  0            0            0            point
    1  0            0            0            circle Circle_Diameter=1.25
    2  1            0            0            as above
    3  1            0            0            point

Wing "LandingGear_010.frontstrut"
  location (X Y Z) -6.63757 0 -7.53915, rotation -90 0 0
  bounding box size 1.67393 0.305513 2.11111
  totals: TotalSpan=2.11111 TotalProjectedSpan=2.11111 TotalChord=0.979924 TotalArea=2.06873 TotalAR=2.15436
  root: chord 1.10826, twist 0, NACA 4-series Camber=0 CamberLoc=0.2 ThickChord=0.275556
  sections:
    n  Span     Root_Chord  Tip_Chord  Area     Sweep  Sweep_Location  Dihedral  Twist  Twist_Location  tip airfoil
    1  2.11111  1.10826     0.851588   2.06873  -15    0               0         0      0.25            NACA 4-series Camber=0 CamberLoc=0.2 ThickChord=0.16

Wing "LandingGear_040.mainstrut"
  location (X Y Z) 2.83333 2.16931 -7.2746, rotation -15 0 -0.582011
  symmetric about XZ
  bounding box size 2.13982 5.76895 2.86284
  totals: TotalSpan=5.16741 TotalProjectedSpan=2.64989 TotalChord=0.929845 TotalArea=4.80489 TotalAR=1.46141
  root: chord 1.22492, twist 0, NACA 4-series Camber=0 CamberLoc=0.2 ThickChord=0.48
  sections:
    n  Span    Root_Chord  Tip_Chord  Area     Sweep  Sweep_Location  Dihedral  Twist  Twist_Location  tip airfoil
    1  2.5837  1.22492     0.63477    2.40244  30     0               -59.1489  0      0.25            NACA 4-series Camber=0 CamberLoc=0.2 ThickChord=0.315556

Wing "Tail_2"
  location (X Y Z) 18.727 4.594 -4.125, rotation 90 0 0
  symmetric about XZ
  bounding box size 2.74379 9.46046 4.083
  totals: TotalSpan=8.166 TotalProjectedSpan=8.166 TotalChord=2.723 TotalArea=22.236 TotalAR=2.9989
  root: chord 2.723, twist 0, NACA 4-series Camber=0 CamberLoc=0.2 DeltaX=0.00909091 Theta=3.09091 ThickChord=0.1
  sections:
    n  Span   Root_Chord  Tip_Chord  Area    Sweep  Sweep_Location  Dihedral  Twist  Twist_Location  tip airfoil
    1  4.083  2.723       2.723      11.118  0      0.9             0         0      0.25            NACA 4-series Camber=0 CamberLoc=0.2 ThickChord=0.1

VSPAERO settings: Sref=49.5 bref=22 cref=2.25 Xcg=9.04452 Ycg=-0.0104482 Zcg=2.09208 AlphaStart=1 AlphaEnd=10 AlphaNpts=3 BetaStart=0 BetaEnd=0 BetaNpts=1 MachStart=0 MachEnd=0 MachNpts=1 ReCref=1e+07 Vinf=100 Rho=0.002377
