OpenVSP model (file version 5), 6 components.
Geometry view with OpenVSP parameter names; values to 6 digits, angles in degrees, lengths in the model's unit.
Overall bounding box: X_Min=0 X_Len=33.9091 Y_Min=-12.8363 Y_Len=25.6726 Z_Min=-1.70609 Z_Len=6.38093

Fuselage "FuselageGeom"
  location (X Y Z) 0 0 0, rotation 0 0 0
  bounding box size 33.9091 3.97953 2.90823
  Design: Length=33.9091
  cross sections:
    n  XLocPercent  YLocPercent  ZLocPercent  shape
    0  0            0            0            point
    1  0.166667     0            0            circle Circle_Diameter=2
    2  0.299819     0            0            edit curve Width=3.92045 Height=2.28099 AbsoluteFlag=0 SymType=1 cubic Bezier points (X Y): 0.507534 0, 0.507534 -0.0964683, 0.27451 -0.5, 0 -0.5, -0.27451 -0.5, -0.507534 -0.0964683, -0.507534 0, -0.313014 0.0306721, -0.276142 0.774984, 0 0.774984, 0.276142 0.774984, 0.313014 0.0306721, 0.507534 0
    3  0.75         0            0            edit curve Width=3.70773 Height=2.11553 AbsoluteFlag=0 SymType=1 cubic Bezier points (X Y): 0.5 0, 0.5 0, 0.5 0, 0.5 0, 0.30459 -0.159188, 0.27451 -0.427711, 0 -0.427711, -0.27451 -0.427711, -0.30459 -0.159188, -0.5 0, -0.5 0, -0.5 0, -0.5 0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
    4  1            0            0            point

Fuselage "Cockpit"
  location (X Y Z) 5.76087 0 0.869565, rotation 0 0 0
  bounding box size 8.16044 1.93839 2.85143
  Design: Length=8.16044
  cross sections:
    n  XLocPercent  YLocPercent  ZLocPercent  shape
    0  0            0            0            point
    1  0.407609     0            -0.0217391   ellipse Ellipse_Height=2.85143 Ellipse_Width=1.93839
    2  1            0            0.0326087    point

Wing "WingGeom"
  location (X Y Z) 8.31643 0.81168 0, rotation 0 0 0
  symmetric about XZ
  bounding box size 18.5833 25.6726 0.695137
  totals: TotalSpan=24.0493 TotalProjectedSpan=24.0493 TotalChord=12.5156 TotalArea=239.308 TotalAR=2.41683
  root: chord 18.5833, twist 0, biconvex ThickChord=0.0374065
  sections:
    n  Span     Root_Chord  Tip_Chord  Area     Sweep  Sweep_Location  Dihedral  Twist  Twist_Location  tip airfoil
    1  2.53904  18.5833     16         43.9043  -10    0.999           0         0      0.25            biconvex ThickChord=0.0299252
    2  1.52699  16          10.5725    20.288   -10    0.999           0         0      0.25            biconvex ThickChord=0.042394
    3  7.95859  10.5725     3.36506    55.4618  -10    0.999           0         0      0.25            biconvex ThickChord=0.05

Fuselage "Inlet"
  location (X Y Z) 10.7609 -1.95652 -0.326087, rotation 8.04348 0 0
  symmetric about XZ
  bounding box size 16.6087 6.55054 2.45392
  Design: Length=20.8182
  cross sections:
    n  XLocPercent  YLocPercent  YRotate   ZLocPercent  shape
    0  1            0            0         0            circle Circle_Diameter=1.22803
    1  1            0            0         0            circle Circle_Diameter=0.919369
    2  0.83152      0            0         0            circle Circle_Diameter=1.79877
    3  0.25         0            -47.4545  -0.02        edit curve Width=2.26332 Height=2.21283 AbsoluteFlag=0 SymType=1 linear points (X Y): 0.295918 -0.5, 0 -0.5, -0.295918 -0.5, -0.5 0.5, 0 0.5, 0.5 0.5, 0.295918 -0.5
    4  0.25         0            -47.4545  -0.02        edit curve Width=2.53511 Height=2.47855 AbsoluteFlag=0 SymType=1 linear points (X Y): 0.295918 -0.5, 0 -0.5, -0.295918 -0.5, -0.5 0.5, 0 0.5, 0.5 0.5, 0.295918 -0.5
    5  0.831522     0            0         0            circle Circle_Diameter=2.12769
    6  0.929348     0            0         0            circle Circle_Diameter=2.12768
    7  1            0            0         0            circle Circle_Diameter=1.22803

Wing "WingGeom"
  location (X Y Z) 27.6407 2.88065 0, rotation 0 0 0
  symmetric about XZ
  bounding box size 4.85503 13.4867 0.280755
  totals: TotalSpan=7.72537 TotalProjectedSpan=7.72537 TotalChord=2.84163 TotalArea=28.5493 TotalAR=2.09046
  root: chord 4.85503, twist 0, biconvex ThickChord=0.0374065
  sections:
    n  Span      Root_Chord  Tip_Chord  Area      Sweep  Sweep_Location  Dihedral  Twist  Twist_Location  tip airfoil
    1  3.39074   4.85503     3.0883     13.4669   0      0.999           0         0      0.25            biconvex ThickChord=0.0909091
    2  0.471945  3.0883      0.334887   0.807778  0      0.5             0         0      0.25            biconvex ThickChord=0.349091

Wing "WingGeom"
  location (X Y Z) 24.8268 2.10478 0.47619, rotation 90 0 0
  symmetric about XZ
  bounding box size 5.23721 4.56754 4.19865
  totals: TotalSpan=8.39731 TotalProjectedSpan=8.39731 TotalChord=2.80383 TotalArea=29.6285 TotalAR=2.37996
  root: chord 5.18115, twist 0, biconvex ThickChord=0.0690909
  sections:
    n  Span     Root_Chord  Tip_Chord  Area      Sweep  Sweep_Location  Dihedral  Twist  Twist_Location  tip airfoil
    1  4.06775  5.18115     1.97188    14.5484   0      0.999           0         0      0.25            biconvex ThickChord=0.105455
    2  0.1309   1.97188     2.09041    0.265877  0      0.5             0         0      0.25            biconvex ThickChord=0.0472727
