OpenVSP model (file version 5), 4 components.
Geometry view with OpenVSP parameter names; values to 6 digits, angles in degrees, lengths in the model's unit.
Overall bounding box: X_Min=-4.89294 X_Len=4.16078 Y_Min=-6.75903 Y_Len=13.5181 Z_Min=-0.50284 Z_Len=1.00568

Wing "WingGeom"
  location (X Y Z) -4.56522 0.326087 0, rotation 0 0 0
  symmetric about XZ
  bounding box size 3.83305 13.5181 0.325189
  totals: TotalSpan=12.8659 TotalProjectedSpan=12.8659 TotalChord=1.81803 TotalArea=19.8038 TotalAR=8.35858
  root: chord 3.25, twist 0, NACA 4-series Camber=0 CamberLoc=0.2 ThickChord=0.1
  sections:
    n  Span      Root_Chord  Tip_Chord  Area      Sweep  Sweep_Location  Dihedral  Twist  Twist_Location  tip airfoil
    1  0.319011  3.25        2.875      0.976972  30     0               0         0      0.25            as above
    2  2.37565   2.875       1.23698    4.88432   30     0               0         0      0.25            as above
    3  1.96354   1.23698     1.07682    2.27162   20     0               0         0      0.25            as above
    4  1.77474   1.07682     0.916667   1.76896   20     0               0         0      0.25            as above
  SS_Rectangle "SS_RECT_0": Center_U=0.390244 Center_W=0.256098 U_Length=0.0426829 W_Length=0.152439
  SS_Control "SS_CONT_1": UStart=0.378049 UEnd=0.469512 Length_C_Start=0.25 Length_C_End=0.25 Length_Start=0.608883 Length_End=0.384154 LE_Flag=0 Surf_Type=2
  SS_Control "SS_CONT_2": UStart=0.506098 UEnd=0.756098 Length_C_Start=0.25 Length_C_End=0.25 Length_Start=0.30778 Length_End=0.247721 LE_Flag=0 Surf_Type=2

Fuselage "FuselageGeom"
  location (X Y Z) -4.8913 0 0, rotation 0 0 0
  bounding box size 3.7672 1.43644 0.693092
  Design: Length=3.76556
  cross sections:
    n  Spin         XLocPercent  XRotate    YLocPercent  YRotate    ZLocPercent  shape
    0  -0.00909091  0            -0.818182  0            -0.818182  0            general fuselage BotStr=0.781909 BotTanAngle=90 CornerRad=0.00909091 Height=0.229784 LowStr=0.856773 MaxWidthLoc=-0.0545455 TopStr=1.06473 TopTanAngle=90 UpStr=0.881727 Width=0.567556
    1  0            0.25         0          0            0          0            file fuselage section Height=0.680469 Width=0.74287
    2  0            0.5          0          0            0          0            ellipse Ellipse_Height=0.693092 Ellipse_Width=0.74287
    3  0            0.75         0          0            0          0            ellipse Ellipse_Height=0.643585 Ellipse_Width=0.74287
    4  0            1            0          0            0          0            biconvex Chord=1.09298 ThickChord=0.15
  SS_Rectangle "SS_RECT_0": Center_U=0.109756 Center_W=0.237805 U_Length=0.0731707 W_Length=0.152439

Pod "PodGeom"
  location (X Y Z) -4.28571 0 0.33, rotation 0 0 0
  bounding box size 2.33333 0.345679 0.345679
  Design: FineRatio=13.5 Length=2.33333

Pod "PodGeom", child of "PodGeom"
  location (X Y Z) -4.28571 0 -0.33, rotation 0 0 0
  bounding box size 2.33333 0.345679 0.345679
  Design: FineRatio=13.5 Length=2.33333
