OpenVSP model (file version 5), 8 components.
Geometry view with OpenVSP parameter names; values to 6 digits, angles in degrees, lengths in the model's unit.
Overall bounding box: X_Min=0 X_Len=7.58333 Y_Min=-3.47811 Y_Len=6.95623 Z_Min=-0.533333 Z_Len=2.42806

TransportFuse "TransportFuse"
  location (X Y Z) 0 0 0, rotation 0 0 0
  bounding box size 7.58333 1 1.03333
  Design: AftCenter=0.3 AftHeight=0.26575 AftMult=2.4925 AftWidth=0.16675 Diameter=1 Length=7.58333 NoseCenter=-0.2 NoseMult=1.5
  custom script TransportFuse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

Wing "WingGeom"
  location (X Y Z) 6.30435 0 0.217391, rotation 0 0 0
  symmetric about XZ
  bounding box size 1.10152 3.0891 0.0839582
  totals: TotalSpan=3.0891 TotalProjectedSpan=3.0891 TotalChord=0.524434 TotalArea=1.62003 TotalAR=5.89035
  root: chord 0.839095, twist 0, NACA 4-series Camber=0 CamberLoc=0.2 ThickChord=0.1
  sections:
    n  Span     Root_Chord  Tip_Chord  Area      Sweep  Sweep_Location  Dihedral  Twist  Twist_Location  tip airfoil
    1  1.54455  0.839095    0.209774   0.810016  30     0               0         0      0.25            as above

Wing "WingGeom", child of "WingGeom"
  location (X Y Z) 6.19565 0 0.434783, rotation 90 0 0
  bounding box size 1.11954 0.11072 1.45995
  totals: TotalSpan=1.45995 TotalProjectedSpan=1.45995 TotalChord=0.6916 TotalArea=1.0097 TotalAR=2.11097
  root: chord 1.10656, twist 0, NACA 4-series Camber=0 CamberLoc=0.2 ThickChord=0.1
  sections:
    n  Span     Root_Chord  Tip_Chord  Area    Sweep  Sweep_Location  Dihedral  Twist  Twist_Location  tip airfoil
    1  1.45995  1.10656     0.27664    1.0097  30     0               0         0      0.25            as above

Wing "WingGeom"
  location (X Y Z) 1.95652 0 0.314465, rotation 0 0 0
  symmetric about XZ
  bounding box size 3.14062 6.95623 0.314245
  totals: TotalSpan=6.95623 TotalProjectedSpan=6.95623 TotalChord=1.42804 TotalArea=8.48228 TotalAR=5.70473
  root: chord 3.14062, twist 0, NACA 4-series Camber=0 CamberLoc=0.2 ThickChord=0.1
  sections:
    n  Span     Root_Chord  Tip_Chord  Area     Sweep  Sweep_Location  Dihedral  Twist  Twist_Location  tip airfoil
    1  1.1875   3.14062     1.03125    2.47705  30     0               0         0      0.25            as above
    2  2.29061  1.03125     0.509025   1.76409  30     0               0         0      0.25            as above

Duct "Duct"
  location (X Y Z) 3.09524 1.42857 0, rotation 0 0 0
  bounding box size 0.775803 0.602342 0.606124
  Design: Camber=0 CamberLoc=0.2 Chord=0.775803 Height=0.445222 InvertFlag=0 Shape=-0.266667 ThickChord=0.2 Width=0.445222
  custom script Duct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

Custom "Duct", child of "Duct"
  location (X Y Z) 3.09524 -1.19048 0, rotation 0 0 0
  bounding box size 0.775803 0.602342 0.606124
  Design: Camber=0 CamberLoc=0.2 Chord=0.775803 Height=0.445222 InvertFlag=0 Shape=-0.266667 ThickChord=0.2 Width=0.445222
  custom script Duct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

Pod "PodGeom"
  location (X Y Z) 1.42857 -0.48 -0.238095, rotation 0 0 0
  bounding box size 3.5 0.466667 0.466667
  Design: FineRatio=15 Length=3.5

Pod "PodGeom", child of "PodGeom"
  location (X Y Z) 1.42857 0.47619 -0.238095, rotation 0 0 0
  bounding box size 3.5 0.466667 0.466667
  Design: FineRatio=15 Length=3.5
