OpenVSP model (file version 5), 12 components.
Geometry view with OpenVSP parameter names; values to 6 digits, angles in degrees, lengths in the model's unit.
Overall bounding box: X_Min=-118.5 X_Len=375.893 Y_Min=-221.247 Y_Len=442.495 Z_Min=-36.8839 Z_Len=96.8839

Fuselage "Fuselage"
  location (X Y Z) -100 0 0, rotation 0 0 0
  bounding box size 350 55.8805 52.3096
  Design: Length=350
  cross sections:
    n  XLocPercent  YLocPercent  ZLocPercent  shape
    0  0            0            0            circle Circle_Diameter=16.5
    1  0.125        0            0            general fuselage BotStr=1.25 BotTanAngle=90 CornerRad=0 Height=22.5 LowStr=0.83 MaxWidthLoc=0 TopStr=1.1 TopTanAngle=90 UpStr=0.5 Width=35
    2  0.2          0            0.005        general fuselage BotStr=1.25 BotTanAngle=90 CornerRad=0 Height=35 LowStr=1 MaxWidthLoc=-0.05 TopStr=1.1 TopTanAngle=90 UpStr=0.5 Width=45
    3  0.3          0            0.025        general fuselage BotStr=1.25 BotTanAngle=90 CornerRad=0 Height=50 LowStr=1 MaxWidthLoc=-0.15 TopStr=1 TopTanAngle=90 UpStr=0.65 Width=55
    4  0.5          0            0.0107143    general fuselage BotStr=1.25 BotTanAngle=90 CornerRad=0 Height=42.5 LowStr=1 MaxWidthLoc=-0.05 TopStr=1.25 TopTanAngle=90 UpStr=1 Width=55
    5  0.6          0            0            general fuselage BotStr=1 BotTanAngle=90 CornerRad=0 Height=30 LowStr=1 MaxWidthLoc=0 TopStr=1 TopTanAngle=90 UpStr=1 Width=45
    6  0.725        0            0            general fuselage BotStr=1 BotTanAngle=90 CornerRad=0 Height=15 LowStr=1 MaxWidthLoc=0 TopStr=1 TopTanAngle=90 UpStr=1 Width=30
    7  1            0            0            general fuselage BotStr=1 BotTanAngle=90 CornerRad=0 Height=10 LowStr=1 MaxWidthLoc=0 TopStr=1 TopTanAngle=90 UpStr=1 Width=5
  SS_Ellipse "Wind Screen": Center_U=0.36 Center_W=0.75 U_Length=0.165 W_Length=0.35
  SS_Ellipse "Rear Window": Center_U=0.61 Center_W=0.75 U_Length=0.1 W_Length=0.425
  SS_Rectangle "CAPS": Center_U=0.485 Center_W=0.75 U_Length=0.055 W_Length=0.1

Fuselage "PT6"
  location (X Y Z) -100 0 0, rotation 0 0 0
  bounding box size 47.5 14 14
  Design: Length=47.5
  cross sections:
    n  XLocPercent  YLocPercent  ZLocPercent  shape
    0  0            0            0            circle Circle_Diameter=7.5
    1  0.0776256    0            0            as above
    2  0.182919     0            0            circle Circle_Diameter=14
    3  1            0            0            as above

Fuselage "Exhaust", child of "PT6"
  location (X Y Z) -84.5 -6.16438 0, rotation 0 0 -90
  symmetric about XZ
  bounding box size 19.2184 48.1908 8.68554
  Design: Length=17.931
  cross sections:
    n  XLocPercent  YLocPercent  ZLocPercent  shape
    0  0            0            0            circle Circle_Diameter=7.68487
    1  1            0.43379      0            ellipse Ellipse_Height=5.00286 Ellipse_Width=11.6317

Fuselage "Spinner", child of "PT6"
  location (X Y Z) -118.5 0 0, rotation 0 0 0
  bounding box size 18.5 16.5 16.5
  Design: Length=18.5
  cross sections:
    n  XLocPercent  YLocPercent  ZLocPercent  shape
    0  0            0            0            point
    1  1            0            0            circle Circle_Diameter=16.5

Propeller "PropGeom", child of "PT6"
  location (X Y Z) -105.5 0 0, rotation 0 0 0
  bounding box size 3.77697 70.3081 73.7678
  Design: Diameter=76 NumBlade=5 Beta34=20 UseBeta34Flag=1 Feather=0 Rotate=0 Precone=0 ReverseFlag=0 FoldAngle=0 PropMode=0 AF=151.538 CLi=0.538798 Chord=0.177656 Solidity=0.282749 ConstructXoC=0.5 FeatherAxisXoC=0.5 FeatherOffsetXoC=0
  cross sections:
    n  RadiusFrac  shape
    0  0.2         ellipse Ellipse_Height=1.52 Ellipse_Width=3.04
    1  0.4         NACA 16-series Chord=6.3175 IdealCl=0.7 ThickChord=0.144074
    2  1           NACA 16-series Chord=4.94 IdealCl=0.2 ThickChord=0.03
  Chord along r/R (cubic Bezier): 0.2: 0.08, 0.333333: 0.15, 0.466667: 0.2, 0.6: 0.2, 0.716667: 0.2, 0.833333: 0.2, 0.95: 0.2, 0.966667: 0.2, 0.983333: 0.2, 1: 0.13
  Twist along r/R (PCHIP): 0.2: 46.75, 0.75: 20, 1: 13
  Thick along r/R (cubic Bezier): 0.2: 0.5, 0.233333: 0.3, 0.266667: 0.225, 0.3: 0.2, 0.4: 0.125, 0.5: 0.115, 0.6: 0.1, 0.733333: 0.075, 0.866667: 0.055, 1: 0.03
  CLI along r/R (cubic Bezier): 0.2: 0, 0.266667: 0.7, 0.333333: 0.7, 0.4: 0.7, 0.466667: 0.7, 0.533333: 0.7, 0.6: 0.7, 0.733333: 0.7, 0.866667: 0.7, 1: 0.2

Wing "Wing"
  location (X Y Z) 0 0 -12.5, rotation 0 0 0
  symmetric about XZ
  bounding box size 75 442.495 21.959
  totals: TotalSpan=440 TotalProjectedSpan=438.554 TotalChord=52.5 TotalArea=19100 TotalAR=10.0696
  root: chord 75, twist 0, NACA 4-series Camber=0 CamberLoc=0.2 ThickChord=0.1
  sections:
    n  Span  Root_Chord  Tip_Chord  Area  Sweep  Sweep_Location  Dihedral  Twist  Twist_Location  tip airfoil
    1  30    75          55         1950  20     0               0         0      0.25            NACA 4-series Camber=0.025 CamberLoc=0.2 ThickChord=0.1
    2  190   55          25         7600  7      0               5         0      0.25            NACA 4-series Camber=0.025 CamberLoc=0.5 ThickChord=0.08
  SS_Control "Flaps": UStart=0.5 UEnd=0.625 Length_C_Start=0.25 Length_C_End=0.25 Length_Start=13.75 Length_End=10 LE_Flag=0 Surf_Type=2
  SS_Control "Ailerons": UStart=0.625 UEnd=0.725 Length_C_Start=0.3 Length_C_End=0.3 Length_Start=12 Length_End=8.4 LE_Flag=0 Surf_Type=2

Wing "VT"
  location (X Y Z) 125 0 0, rotation 90 0 0
  bounding box size 132.393 10.012 60
  totals: TotalSpan=60 TotalProjectedSpan=60 TotalChord=57.5 TotalArea=3200 TotalAR=1.125
  root: chord 125, twist 0, NACA 4-series Camber=0 CamberLoc=0.2 ThickChord=0.08
  sections:
    n  Span  Root_Chord  Tip_Chord  Area    Sweep  Sweep_Location  Dihedral  Twist  Twist_Location  tip airfoil
    1  25    125         40         2062.5  74     0               0         0      0.25            as above
    2  35    40          25         1137.5  30     0               0         0      0.25            NACA 4-series Camber=0 CamberLoc=0.2 ThickChord=0.06
  SS_Control "Rudder_L": UStart=0.35 UEnd=0.5 Length_C_Start=0.14 Length_C_End=0.25 Length_Start=12.74 Length_End=10 LE_Flag=0 Surf_Type=2
  SS_Control "Rudder_U": UStart=0.5 UEnd=0.735 Length_C_Start=0.25 Length_C_End=0.215 Length_Start=10 Length_End=5.5685 LE_Flag=0 Surf_Type=2

Wing "HT"
  location (X Y Z) 200 0 0, rotation 0 0 0
  symmetric about XZ
  bounding box size 39.9167 130 3.50203
  totals: TotalSpan=130 TotalProjectedSpan=130 TotalChord=28.75 TotalArea=3737.5 TotalAR=4.52174
  root: chord 35, twist 0, NACA 4-series Camber=0 CamberLoc=0.2 ThickChord=0.1
  sections:
    n  Span  Root_Chord  Tip_Chord  Area     Sweep  Sweep_Location  Dihedral  Twist  Twist_Location  tip airfoil
    1  65    35          22.5       1868.75  15     0               0         0      0.25            as above
  SS_Control "Elevator": UStart=0.35 UEnd=0.65 Length_C_Start=0.275 Length_C_End=0.275 Length_Start=9.45313 Length_End=6.35937 LE_Flag=0 Surf_Type=2

Blank "Occupants"
  location (X Y Z) 0 0 0, rotation 0 0 0

Human "Sitting", child of "Occupants"
  location (X Y Z) 5 12.5 2, rotation 0 30 0
  symmetric about XZ
  mass: Density=0.0400881 Shell_Flag=0 Mass_Area=1 Mass_Prior=0
  Anthropometric: Age=30 AutoDensity=1 BMI=24.4121 BMI_pct=0.237649 GenderFlag=0 LenUnit=3 Mass=180 MassUnit=3 SitFrac=0.51 Stature=72 Stature_pct=0.823775 Volume=4490.11

Human "Sitting", child of "Occupants"
  location (X Y Z) 61.5 10 0, rotation 0 -30 180
  symmetric about XZ
  mass: Density=0.0400881 Shell_Flag=0 Mass_Area=1 Mass_Prior=0
  Anthropometric: Age=30 AutoDensity=1 BMI=24.4121 BMI_pct=0.237649 GenderFlag=0 LenUnit=3 Mass=180 MassUnit=3 SitFrac=0.51 Stature=72 Stature_pct=0.823775 Volume=4490.11

Human "Laying", child of "Occupants"
  location (X Y Z) 60 12.5 6.5, rotation 0 -80 180
  symmetric about XZ
  mass: Density=0.0383883 Shell_Flag=0 Mass_Area=1 Mass_Prior=0
  Anthropometric: Age=30 AutoDensity=1 BMI=24.4121 BMI_pct=0.237649 GenderFlag=0 LenUnit=3 Mass=180 MassUnit=3 SitFrac=0.51 Stature=72 Stature_pct=0.823775 Volume=4688.93

VSPAERO settings: Sref=19100 bref=440 cref=52.5 Xcg=5 Ycg=0 Zcg=0 AlphaStart=-10 AlphaEnd=10 AlphaNpts=21 BetaStart=0 BetaEnd=0 BetaNpts=1 MachStart=0.5 MachEnd=0 MachNpts=1 ReCref=1e+07 Vinf=100 Rho=0.002377
