OpenVSP model (file version 5), 95 components.
Geometry view with OpenVSP parameter names; values to 6 digits, angles in degrees, lengths in the model's unit.
Overall bounding box: X_Min=-0.463414 X_Len=33.0884 Y_Min=-25.2496 Y_Len=50.4992 Z_Min=-0.125 Z_Len=14.0359

Fuselage "Fuselage_***.main"
  location (X Y Z) 1.88864 0 4.24937, rotation 0 0 0
  bounding box size 30 6.17591 6.41246
  mass: Density=2 Shell_Flag=0 Mass_Area=1 Mass_Prior=5
  Design: Length=30
  cross sections:
    n  XLocPercent  YLocPercent  ZLocPercent  shape
    0  0            0            0            point
    1  0.024145     0            -0.002082    general fuselage BotStr=0.827589 BotTanAngle=90 CornerRad=0 Height=2.14 LowStr=0.81429 MaxWidthLoc=0.024812 TopStr=1.10925 TopTanAngle=90 UpStr=0.692274 Width=2.29485
    2  0.121627     0            0.025612     general fuselage BotStr=1.19151 BotTanAngle=90 CornerRad=0 Height=5 LowStr=1.27 MaxWidthLoc=-0.117303 TopStr=0.342421 TopTanAngle=90 UpStr=1.7302 Width=4.93996
    3  0.211428     0            0.04395      general fuselage BotStr=1.1383 BotTanAngle=90 CornerRad=0 Height=6.12707 LowStr=1.42286 MaxWidthLoc=-0.190324 TopStr=0.651397 TopTanAngle=90 UpStr=1.74091 Width=5.76983
    4  0.418359     0            0.04395      general fuselage BotStr=1.27659 BotTanAngle=90 CornerRad=0 Height=6.12707 LowStr=1.42286 MaxWidthLoc=-0.190324 TopStr=1.00146 TopTanAngle=90 UpStr=2 Width=6.15026
    5  0.479564     0            0.0531551    general fuselage BotStr=0.781013 BotTanAngle=90 CornerRad=0 Height=5.62169 LowStr=1.5 MaxWidthLoc=-0.125562 TopStr=1.25 TopTanAngle=90 UpStr=1.50472 Width=5.11011
    6  0.614653     0            0.098281     general fuselage BotStr=0.337871 BotTanAngle=90 CornerRad=0 Height=2.69202 LowStr=1.0683 MaxWidthLoc=-0.310309 TopStr=1.54262 TopTanAngle=90 UpStr=0.818164 Width=3.17945
    7  0.923427     0            0.116377     general fuselage BotStr=0.952476 BotTanAngle=90 CornerRad=0 Height=1.18739 LowStr=0.67819 MaxWidthLoc=-0.500607 TopStr=2 TopTanAngle=90 UpStr=1.27804 Width=0.874706
    8  1            0            0.118292     point

Fuselage "Rotor_2_Support"
  location (X Y Z) 12 -18.75 7.6125, rotation 0 0 0
  bounding box size 8 1 1
  Design: Length=8
  cross sections:
    n  XLocPercent  YLocPercent  ZLocPercent  shape
    0  0            0            0            point
    1  0.25         0            0            circle Circle_Diameter=1
    2  0.5          0            0            as above
    3  0.75         0            0            as above
    4  1            0            0            point

Fuselage "Rotor_3_Support"
  location (X Y Z) 3.741 -8.25 7.9, rotation -8 0 0
  bounding box size 8 1.02867 1.02867
  Design: Length=8
  cross sections:
    n  XLocPercent  YLocPercent  ZLocPercent  shape
    0  0            0            0            point
    1  0.25         0            0            circle Circle_Diameter=1
    2  0.5          0            0            as above
    3  0.75         0            0            as above
    4  1            0            0            point

Fuselage "Rotor_4_Support"
  location (X Y Z) 11.5 -8.25 7.898, rotation -8 0 1.5
  bounding box size 7.99726 1.16659 1.04809
  Design: Length=8
  cross sections:
    n  XLocPercent  YLocPercent  ZLocPercent  shape
    0  0            0            0            point
    1  0.25         0            0            circle Circle_Diameter=1
    2  0.5          0            0            as above
    3  0.75         0            0            as above
    4  1            0            0            point

Fuselage "Rotor_5_Support"
  location (X Y Z) 3.741 8.25 7.9, rotation -8 0 0
  bounding box size 8 1.02867 1.02867
  Design: Length=8
  cross sections:
    n  XLocPercent  YLocPercent  ZLocPercent  shape
    0  0            0            0            point
    1  0.25         0            0            circle Circle_Diameter=1
    2  0.5          0            0            as above
    3  0.75         0            0            as above
    4  1            0            0            point

Fuselage "Rotor_6_Support"
  location (X Y Z) 11.5 8.25 8, rotation -8 0 1.5
  bounding box size 7.99726 1.16659 1.04809
  Design: Length=8
  cross sections:
    n  XLocPercent  YLocPercent  ZLocPercent  shape
    0  0            0            0            point
    1  0.25         0            0            circle Circle_Diameter=1
    2  0.5          0            0            as above
    3  0.75         0            0            as above
    4  1            0            0            point

Fuselage "Rotor_7_Support"
  location (X Y Z) 4.2 18.75 7.6125, rotation 0 0 0
  bounding box size 8 1 1
  Design: Length=8
  cross sections:
    n  XLocPercent  YLocPercent  ZLocPercent  shape
    0  0            0            0            point
    1  0.25         0            0            circle Circle_Diameter=1
    2  0.5          0            0            as above
    3  0.75         0            0            as above
    4  1            0            0            point

Fuselage "Rotor_8_Support"
  location (X Y Z) 12 18.75 7.6125, rotation 0 0 0
  bounding box size 8 1 1
  Design: Length=8
  cross sections:
    n  XLocPercent  YLocPercent  ZLocPercent  shape
    0  0            0            0            point
    1  0.25         0            0            circle Circle_Diameter=1
    2  0.5          0            0            as above
    3  0.75         0            0            as above
    4  1            0            0            point

Fuselage "EngineGroup_10"
  location (X Y Z) 2.25 0 4.15, rotation 0 0 0
  bounding box size 0.930938 1.5 1.5
  Design: Length=0.75
  cross sections:
    n  XLocPercent  YLocPercent  ZLocPercent  shape
    0  0            0            0            point
    1  0.109195     0            0            circle Circle_Diameter=1
    2  0.375        0            0            circle Circle_Diameter=1.5
    3  1            0            0            as above
    4  1            0            0            point

Fuselage "FuelTank_1_050.left"
  location (X Y Z) 10.2056 -2.659 3.3462, rotation 0 0 0
  bounding box size 6.28488 3.03048 1.50488
  Design: Length=6
  cross sections:
    n  XLocPercent  YLocPercent  ZLocPercent  shape
    0  0            0            0.020378     point
    1  0.188638     0            -0.032472    general fuselage BotStr=0.042923 BotTanAngle=90 CornerRad=0 Height=1.5 LowStr=1.3145 MaxWidthLoc=0.100759 TopStr=1.5606 TopTanAngle=90 UpStr=0.379586 Width=3
    2  0.580165     0            -0.033286    general fuselage BotStr=0.048982 BotTanAngle=90 CornerRad=0 Height=1.5 LowStr=1.315 MaxWidthLoc=0.100759 TopStr=1.56097 TopTanAngle=90 UpStr=0.38227 Width=3
    3  0.765852     0            -0.03        general fuselage BotStr=0.684282 BotTanAngle=90 CornerRad=0 Height=1.1 LowStr=0.393477 MaxWidthLoc=0.257254 TopStr=1.45842 TopTanAngle=90 UpStr=0 Width=2.2808
    4  1            0            0            point

Fuselage "FuelTank_1_050.right"
  location (X Y Z) 10.2056 2.65906 3.3462, rotation 0 0 0
  bounding box size 6.28488 3.03048 1.50488
  Design: Length=6
  cross sections:
    n  XLocPercent  YLocPercent  ZLocPercent  shape
    0  0            0            0.020378     point
    1  0.188638     0            -0.032472    general fuselage BotStr=0.042923 BotTanAngle=90 CornerRad=0 Height=1.5 LowStr=1.3145 MaxWidthLoc=0.100759 TopStr=1.5606 TopTanAngle=90 UpStr=0.379586 Width=3
    2  0.580165     0            -0.033286    general fuselage BotStr=0.048982 BotTanAngle=90 CornerRad=0 Height=1.5 LowStr=1.315 MaxWidthLoc=0.100759 TopStr=1.56097 TopTanAngle=90 UpStr=0.38227 Width=3
    3  0.765852     0            -0.03        general fuselage BotStr=0.684282 BotTanAngle=90 CornerRad=0 Height=1.1 LowStr=0.393477 MaxWidthLoc=0.257254 TopStr=1.45842 TopTanAngle=90 UpStr=0 Width=2.2808
    4  1            0            0            point

Propeller "Rotor_1_blades"
  location (X Y Z) 5.07 -18.75 6.73, rotation 0 90 0
  bounding box size 10.1868 4.137 0.535717
  Design: Diameter=10 NumBlade=2 Beta34=0 UseBeta34Flag=1 Feather=0 Rotate=90 Precone=0 ReverseFlag=0 FoldAngle=0 PropMode=0 AF=352.964 CLi=0 Chord=0.4873 Solidity=0.310225 ConstructXoC=0.25 FeatherAxisXoC=0.25 FeatherOffsetXoC=0
  cross sections:
    n  RadiusFrac  shape
    0  0.21        airfoil file "BOEING-VERTOL VR-12 AIRFOIL"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 BaseThickChord=0.106373 Chord=2.785 ThickChord=0.106373
    1  0.85        airfoil file "BOEING-VERTOL VR-12 AIRFOIL"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 BaseThickChord=0.106373 Chord=2.22034 ThickChord=0.106373
    2  0.95        airfoil file "SIKORSKY SSC-A09  AIRFOIL"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 BaseThickChord=0.0901604 Chord=2.13211 ThickChord=0.0902
    3  1           airfoil file "SIKORSKY SSC-A09  AIRFOIL"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 BaseThickChord=0.0901604 Chord=2.088 ThickChord=0.0902
  Chord along r/R (linear): 0.21: 0.557, 1: 0.4176
  Twist along r/R (PCHIP): 0.21: 8.1, 1: -3.75
  Thick along r/R (linear): 0.21: 0.106373, 0.85: 0.106373, 0.95: 0.0902, 1: 0.0902

Fuselage "Rotor_1_Hub", child of "Rotor_1_blades"
  location (X Y Z) 5.07 -18.75 7.355, rotation 0 90 0; relative location -0.625 0 0, rotation 0 0 0
  bounding box size 2.25 2.25 1.04
  Design: Length=1
  cross sections:
    n  XLocPercent  YLocPercent  ZLocPercent  shape
    0  0            0            0            point
    1  0.11         0            0            circle Circle_Diameter=2.25
    2  0.5          0            0            as above
    3  0.89         0            0            as above
    4  1            0            0            point

Custom "Rotor_1_disk", child of "Rotor_1_blades"
  location (X Y Z) 5.07 -18.75 6.73, rotation 0 90 0; relative location 0 0 0, rotation 0 0 0
  bounding box size 10 10 0
  Design: Diameter=10
  custom script Disk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

Blank "Rotor_1_mass", child of "Rotor_1_blades"
  location (X Y Z) 5.07 -18.75 6.73, rotation 0 0 0; relative location 0 0 0, rotation 0 -90 0

Blank "Propulsion_1", child of "Rotor_1_blades"
  location (X Y Z) 5 -18.75 6.75, rotation 0 0 0; relative location -0.02 0 -0.07, rotation 0 -90 0

Blank "EngineGroup_1_mass", child of "Rotor_1_blades"
  location (X Y Z) 5 -18.75 6.75, rotation 0 0 0; relative location -0.02 0 -0.07, rotation 0 -90 0

Blank "Wing_Parent"
  location (X Y Z) 9 0 8.5, rotation 0 0 0

Wing "Wing_1"
  location (X Y Z) 8.89 0 8.5, rotation 0 0 0
  symmetric about XZ
  bounding box size 5.43998 50.4992 1.63146
  totals: TotalSpan=50.53 TotalProjectedSpan=50.4992 TotalChord=3.38 TotalArea=210.278 TotalAR=12.1276 RelativeTwistFlag=1
  root: chord 5.44328, twist 2, airfoil file "NASA/LANGLEY LS(1)-0417 (GA(W)-1) AIRFOIL"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 BaseThickChord=0.16998 ThickChord=0.16998
  sections:
    n  Span     Root_Chord  Tip_Chord  Area     Sweep    Sweep_Location  Dihedral  Twist  Twist_Location  tip airfoil
    1  14.745   5.44328     4.13083    70.5852  0        0.7             -2        -0.5   0.7             as above
    2  6.62693  4.13083     3.30466    24.6373  0        0.7             -2        -0.5   0.7             as above
    3  2.08309  3.30466     2.84088    6.40087  3.63636  0.7             -2        -0.5   0.7             as above
    4  1.80996  2.84088     1.04396    3.5157   8        0.7             -2        -0.5   0.7             as above

Wing "Tail_2"
  location (X Y Z) 20.843 0 8.23086, rotation 90 0 0
  bounding box size 11.2217 1.12017 5.68
  totals: TotalSpan=5.68 TotalProjectedSpan=5.68 TotalChord=5.55 TotalArea=27.3432 TotalAR=1.1799
  root: chord 9.73719, twist 0, NACA 4-series Camber=0 CamberLoc=0.2 ThickChord=0.115
  sections:
    n  Span      Root_Chord  Tip_Chord  Area     Sweep  Sweep_Location  Dihedral  Twist  Twist_Location  tip airfoil
    1  1.14165   9.73719     5.94823    8.95367  15     1               0         0      0.25            NACA 4-series Camber=0 CamberLoc=0.2 ThickChord=0.14
    2  0.42729   5.94823     5.26478    2.39561  15     1               0         0      0.25            NACA 4-series Camber=0 CamberLoc=0.2 ThickChord=0.15
    3  0.520148  5.26478     4.78439    2.61353  15     1               0         0      0.25            as above
    4  3.59091   4.78439     2.66802    13.3804  15     1               0         0      0.25            NACA 4-series Camber=0 CamberLoc=0.2 ThickChord=0.115

Wing "Tail_1"
  location (X Y Z) 27.4277 0 8.00806, rotation 0 0 0
  symmetric about XZ
  bounding box size 3.75888 13.04 0.568655
  totals: TotalSpan=13.04 TotalProjectedSpan=13.04 TotalChord=3.03 TotalArea=39.5112 TotalAR=4.30363
  root: chord 3.7875, twist 0, NACA 4-series Camber=0 CamberLoc=0.2 ThickChord=0.15
  sections:
    n  Span  Root_Chord  Tip_Chord  Area     Sweep  Sweep_Location  Dihedral  Twist  Twist_Location  tip airfoil
    1  6.52  3.7875      2.2725     19.7556  0      0.25            0         0      0.25            as above

Wing "LandingGear_010.NoseStr"
  location (X Y Z) 5 0 1.55, rotation 90 0 0
  bounding box size 1.11397 0.375156 1
  totals: TotalSpan=1 TotalProjectedSpan=1 TotalChord=0.75 TotalArea=0.75 TotalAR=1.33333
  root: chord 0.75, twist 0, NACA 4-series Camber=0 CamberLoc=0.2 ThickChord=0.5
  sections:
    n  Span  Root_Chord  Tip_Chord  Area  Sweep  Sweep_Location  Dihedral  Twist  Twist_Location  tip airfoil
    1  1     0.75        0.75       0.75  20     0               0         0      0               as above

Wing "LandingGear_020.LeftStr"
  location (X Y Z) 15.75 -3 1.55, rotation -105 0 -180
  bounding box size 1.11397 0.621192 1.06302
  totals: TotalSpan=1 TotalProjectedSpan=1 TotalChord=0.75 TotalArea=0.75 TotalAR=1.33333
  root: chord 0.75, twist 0, NACA 4-series Camber=0 CamberLoc=0.2 ThickChord=0.5
  sections:
    n  Span  Root_Chord  Tip_Chord  Area  Sweep  Sweep_Location  Dihedral  Twist  Twist_Location  tip airfoil
    1  1     0.75        0.75       0.75  20     0               0         0      0               as above

Wing "LandingGear-020_RightStr"
  location (X Y Z) 15.75 3 1.55, rotation -75 0 -180
  bounding box size 1.11397 0.621192 1.06302
  totals: TotalSpan=1 TotalProjectedSpan=1 TotalChord=0.75 TotalArea=0.75 TotalAR=1.33333
  root: chord 0.75, twist 0, NACA 4-series Camber=0 CamberLoc=0.2 ThickChord=0.5
  sections:
    n  Span  Root_Chord  Tip_Chord  Area  Sweep  Sweep_Location  Dihedral  Twist  Twist_Location  tip airfoil
    1  1     0.75        0.75       0.75  20     0               0         0      0               as above

Blank "Systems"
  location (X Y Z) 16 0 6, rotation 0 0 0

Blank "FuelTank_2_Full"
  location (X Y Z) 15.5 0 4.15, rotation 0 0 0

Blank "FuelTank_2_Empty"
  location (X Y Z) 15.5 0 4.15, rotation 0 0 0

Blank "Rotor_9_mass"
  location (X Y Z) 0 0 0, rotation 0 0 0

Blank "Propulsion-3"
  location (X Y Z) 4.65 -8.37 7, rotation 0 0 0

Blank "Propulsion-4"
  location (X Y Z) 18.77 -8.1 9.25, rotation 0 0 0

Blank "Propulsion-5"
  location (X Y Z) 4.625 8.2 7, rotation 0 0 0

Blank "Propulsion-6"
  location (X Y Z) 18.75 8.4 9.25, rotation 0 0 0

Blank "Propulsion-7"
  location (X Y Z) 5 18.75 6.75, rotation 0 0 0

Blank "Propulsion-8"
  location (X Y Z) 19.22 18.75 9, rotation 0 0 0

Blank "Propulsion-9"
  location (X Y Z) 32 0 7.79, rotation 0 0 0

Blank "Propulsion-10"
  location (X Y Z) 2.75 0 4.15, rotation 0 0 0

Blank "EngineGroup-3-mass"
  location (X Y Z) 4.65 -8.37 7, rotation 0 0 0

Blank "EngineGroup-4-mass"
  location (X Y Z) 18.77 -8.1 9.25, rotation 0 0 0

Blank "EngineGroup-5-mass"
  location (X Y Z) 4.625 8.2 7, rotation 0 0 0

Blank "EngineGroup-6-mass"
  location (X Y Z) 18.75 8.4 9.25, rotation 0 0 0

Blank "EngineGroup-7-mass"
  location (X Y Z) 5 18.75 6.75, rotation 0 0 0

Blank "EngineGroup-8-mass"
  location (X Y Z) 19.22 18.75 9, rotation 0 0 0

Blank "EngineGroup-9-mass"
  location (X Y Z) 32 0 7.79, rotation 0 0 0

Blank "EngineGroup-10-mass"
  location (X Y Z) 2.75 0 4.15, rotation 0 0 0

Blank "FuelTank_1_050.leftmass"
  location (X Y Z) 16 -2.65 3.35, rotation 0 0 0

Blank "FuelTank_1_050.rightmass"
  location (X Y Z) 16 2.65 3.35, rotation 0 0 0

BodyOfRevolution "LandingGear-010_NoseWheel"
  location (X Y Z) 5.35 -0.375 0.75, rotation 0 0 90
  bounding box size 1.75 0.75 1.75
  Design: A0=0.785398 Ae=0.785398 Amin=0.0490874 AminW=0.25 Angle=0 Diameter=1 Mode=0
  profile: circle Circle_Diameter=0.75

BodyOfRevolution "LandingGear-020_LeftWheel"
  location (X Y Z) 15.35 -3.375 0.75, rotation -180 0 -90
  bounding box size 1.75 0.75 1.75
  Design: A0=0.785398 Ae=0.785398 Amin=0.0490874 AminW=0.25 Angle=0 Diameter=1 Mode=0
  profile: circle Circle_Diameter=0.75

BodyOfRevolution "LandingGear-020_RightWheel"
  location (X Y Z) 15.35 2.625 0.75, rotation -180 0 -90
  bounding box size 1.75 0.75 1.75
  Design: A0=0.785398 Ae=0.785398 Amin=0.0490874 AminW=0.25 Angle=0 Diameter=1 Mode=0
  profile: circle Circle_Diameter=0.75

Fuselage "Rotor_1_Support"
  location (X Y Z) 4.2 -18.75 7.615, rotation 0 0 0
  bounding box size 8 1 1
  Design: Length=8
  cross sections:
    n  XLocPercent  YLocPercent  ZLocPercent  shape
    0  0            0            0            point
    1  0.25         0            0            circle Circle_Diameter=1
    2  0.5          0            0            as above
    3  0.75         0            0            as above
    4  1            0            0            point

Propeller "Rotor_2_blades"
  location (X Y Z) 19.2 -18.75 9.01, rotation 0 90 0
  bounding box size 10.1868 4.137 0.535717
  Design: Diameter=10 NumBlade=2 Beta34=0 UseBeta34Flag=1 Feather=0 Rotate=90 Precone=0 ReverseFlag=1 FoldAngle=0 PropMode=0 AF=352.964 CLi=0 Chord=0.4873 Solidity=0.310225 ConstructXoC=0.25 FeatherAxisXoC=0.25 FeatherOffsetXoC=0
  cross sections:
    n  RadiusFrac  shape
    0  0.21        airfoil file "BOEING-VERTOL VR-12 AIRFOIL"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 BaseThickChord=0.106373 Chord=2.785 ThickChord=0.106373
    1  0.85        airfoil file "BOEING-VERTOL VR-12 AIRFOIL"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 BaseThickChord=0.106373 Chord=2.22034 ThickChord=0.106373
    2  0.95        airfoil file "SIKORSKY SSC-A09  AIRFOIL"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 BaseThickChord=0.0901604 Chord=2.13211 ThickChord=0.0902
    3  1           airfoil file "SIKORSKY SSC-A09  AIRFOIL"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 BaseThickChord=0.0901604 Chord=2.088 ThickChord=0.0902
  blade curves as in "Rotor_1_blades"

Fuselage "Rotor_2_Hub", child of "Rotor_2_blades"
  location (X Y Z) 19.2 -18.75 9.635, rotation 0 90 0; relative location -0.625 0 0, rotation 0 0 0
  bounding box size 2.25 2.25 1.04
  Design: Length=1
  cross sections:
    n  XLocPercent  YLocPercent  ZLocPercent  shape
    0  0            0            0            point
    1  0.11         0            0            circle Circle_Diameter=2.25
    2  0.5          0            0            as above
    3  0.89         0            0            as above
    4  1            0            0            point

Custom "Rotor_2_disk", child of "Rotor_2_blades"
  location (X Y Z) 19.2 -18.75 9.01, rotation 0 90 0; relative location 0 0 0, rotation 0 0 0
  bounding box size 10 10 0
  Design: Diameter=10
  custom script Disk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

Blank "Rotor_2_mass", child of "Rotor_2_blades"
  location (X Y Z) 19.2 -18.75 9.01, rotation 0 0 0; relative location 0 0 0, rotation 0 -90 0

Blank "Propulsion_2", child of "Rotor_2_blades"
  location (X Y Z) 19.13 -18.75 9.03, rotation 0 0 0; relative location -0.02 0 -0.07, rotation 0 -90 0

Blank "EngineGroup_2_mass", child of "Rotor_2_blades"
  location (X Y Z) 19.13 -18.75 9.03, rotation 0 0 0; relative location -0.02 0 -0.07, rotation 0 -90 0

Propeller "Rotor_3_blades"
  location (X Y Z) 4.63 -8.13 7.04, rotation 8 90 0
  bounding box size 10.1868 4.09674 0.907178
  Design: Diameter=10 NumBlade=2 Beta34=0 UseBeta34Flag=1 Feather=0 Rotate=90 Precone=0 ReverseFlag=1 FoldAngle=0 PropMode=0 AF=352.964 CLi=0 Chord=0.4873 Solidity=0.310225 ConstructXoC=0.25 FeatherAxisXoC=0.25 FeatherOffsetXoC=0
  cross sections:
    n  RadiusFrac  shape
    0  0.21        airfoil file "BOEING-VERTOL VR-12 AIRFOIL"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 BaseThickChord=0.106373 Chord=2.785 ThickChord=0.106373
    1  0.85        airfoil file "BOEING-VERTOL VR-12 AIRFOIL"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 BaseThickChord=0.106373 Chord=2.22034 ThickChord=0.106373
    2  0.95        airfoil file "SIKORSKY SSC-A09  AIRFOIL"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 BaseThickChord=0.0901604 Chord=2.13211 ThickChord=0.0902
    3  1           airfoil file "SIKORSKY SSC-A09  AIRFOIL"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 BaseThickChord=0.0901604 Chord=2.088 ThickChord=0.0902
  blade curves as in "Rotor_1_blades"

Fuselage "Rotor_3_Hub", child of "Rotor_3_blades"
  location (X Y Z) 4.63 -8.21698 7.65892, rotation 8 90 0; relative location -0.625 0 0, rotation 0 0 0
  bounding box size 2.25 2.37284 1.34302
  Design: Length=1
  cross sections:
    n  XLocPercent  YLocPercent  ZLocPercent  shape
    0  0            0            0            point
    1  0.11         0            0            circle Circle_Diameter=2.25
    2  0.5          0            0            as above
    3  0.89         0            0            as above
    4  1            0            0            point

Custom "Rotor_3_disk", child of "Rotor_3_blades"
  location (X Y Z) 4.63 -8.13 7.04, rotation 8 90 0; relative location 0 0 0, rotation 0 0 0
  bounding box size 10 9.90268 1.39173
  Design: Diameter=10
  custom script Disk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

Blank "Rotor_3_mass", child of "Rotor_3_blades"
  location (X Y Z) 4.63 -8.13 7.04, rotation 8 0 0; relative location 0 0 0, rotation 0 -90 0

Blank "Propulsion_3", child of "Rotor_3_blades"
  location (X Y Z) 4.56 -8.13278 7.05981, rotation 8 0 0; relative location -0.02 0 -0.07, rotation 0 -90 0

Blank "EngineGroup_3_mass", child of "Rotor_3_blades"
  location (X Y Z) 4.56 -8.13278 7.05981, rotation 8 0 0; relative location -0.02 0 -0.07, rotation 0 -90 0

Propeller "Rotor_4_blades"
  location (X Y Z) 18.76 -8.45 9.3, rotation 8 90 0
  bounding box size 10.1868 4.09674 0.907178
  Design: Diameter=10 NumBlade=2 Beta34=0 UseBeta34Flag=1 Feather=0 Rotate=90 Precone=0 ReverseFlag=0 FoldAngle=0 PropMode=0 AF=352.964 CLi=0 Chord=0.4873 Solidity=0.310225 ConstructXoC=0.25 FeatherAxisXoC=0.25 FeatherOffsetXoC=0
  cross sections:
    n  RadiusFrac  shape
    0  0.21        airfoil file "BOEING-VERTOL VR-12 AIRFOIL"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 BaseThickChord=0.106373 Chord=2.785 ThickChord=0.106373
    1  0.85        airfoil file "BOEING-VERTOL VR-12 AIRFOIL"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 BaseThickChord=0.106373 Chord=2.22034 ThickChord=0.106373
    2  0.95        airfoil file "SIKORSKY SSC-A09  AIRFOIL"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 BaseThickChord=0.0901604 Chord=2.13211 ThickChord=0.0902
    3  1           airfoil file "SIKORSKY SSC-A09  AIRFOIL"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 BaseThickChord=0.0901604 Chord=2.088 ThickChord=0.0902
  blade curves as in "Rotor_1_blades"

Fuselage "Rotor_4_Hub", child of "Rotor_4_blades"
  location (X Y Z) 18.76 -8.53698 9.91892, rotation 8 90 0; relative location -0.625 0 0, rotation 0 0 0
  bounding box size 2.25 2.37284 1.34302
  Design: Length=1
  cross sections:
    n  XLocPercent  YLocPercent  ZLocPercent  shape
    0  0            0            0            point
    1  0.11         0            0            circle Circle_Diameter=2.25
    2  0.5          0            0            as above
    3  0.89         0            0            as above
    4  1            0            0            point

Custom "Rotor_4_disk", child of "Rotor_4_blades"
  location (X Y Z) 18.76 -8.45 9.3, rotation 8 90 0; relative location 0 0 0, rotation 0 0 0
  bounding box size 10 9.90268 1.39173
  Design: Diameter=10
  custom script Disk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

Blank "Rotor_4_mass", child of "Rotor_4_blades"
  location (X Y Z) 18.76 -8.45 9.3, rotation 8 0 0; relative location 0 0 0, rotation 0 -90 0

Blank "Propulsion_4", child of "Rotor_4_blades"
  location (X Y Z) 18.69 -8.45278 9.31981, rotation 8 0 0; relative location -0.02 0 -0.07, rotation 0 -90 0

Blank "EngineGroup_4_mass", child of "Rotor_4_blades"
  location (X Y Z) 18.69 -8.45278 9.31981, rotation 8 0 0; relative location -0.02 0 -0.07, rotation 0 -90 0

Propeller "Rotor_5_blades"
  location (X Y Z) 4.63 8.45 7.04, rotation -8 90 0
  bounding box size 10.1868 4.09674 0.907178
  Design: Diameter=10 NumBlade=2 Beta34=0 UseBeta34Flag=1 Feather=0 Rotate=90 Precone=0 ReverseFlag=0 FoldAngle=0 PropMode=0 AF=352.964 CLi=0 Chord=0.4873 Solidity=0.310225 ConstructXoC=0.25 FeatherAxisXoC=0.25 FeatherOffsetXoC=0
  cross sections:
    n  RadiusFrac  shape
    0  0.21        airfoil file "BOEING-VERTOL VR-12 AIRFOIL"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 BaseThickChord=0.106373 Chord=2.785 ThickChord=0.106373
    1  0.85        airfoil file "BOEING-VERTOL VR-12 AIRFOIL"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 BaseThickChord=0.106373 Chord=2.22034 ThickChord=0.106373
    2  0.95        airfoil file "SIKORSKY SSC-A09  AIRFOIL"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 BaseThickChord=0.0901604 Chord=2.13211 ThickChord=0.0902
    3  1           airfoil file "SIKORSKY SSC-A09  AIRFOIL"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 BaseThickChord=0.0901604 Chord=2.088 ThickChord=0.0902
  blade curves as in "Rotor_1_blades"

Fuselage "Rotor_5_Hub", child of "Rotor_5_blades"
  location (X Y Z) 4.63 8.53698 7.65892, rotation -8 90 0; relative location -0.625 0 0, rotation 0 0 0
  bounding box size 2.25 2.37284 1.34302
  Design: Length=1
  cross sections:
    n  XLocPercent  YLocPercent  ZLocPercent  shape
    0  0            0            0            point
    1  0.11         0            0            circle Circle_Diameter=2.25
    2  0.5          0            0            as above
    3  0.89         0            0            as above
    4  1            0            0            point

Custom "Rotor_5_disk", child of "Rotor_5_blades"
  location (X Y Z) 4.63 8.45 7.04, rotation -8 90 0; relative location 0 0 0, rotation 0 0 0
  bounding box size 10 9.90268 1.39173
  Design: Diameter=10
  custom script Disk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

Blank "Rotor_5_mass", child of "Rotor_5_blades"
  location (X Y Z) 4.63 8.45 7.04, rotation -8 0 0; relative location 0 0 0, rotation 0 -90 0

Blank "Propulsion_5", child of "Rotor_5_blades"
  location (X Y Z) 4.56 8.45278 7.05981, rotation -8 0 0; relative location -0.02 0 -0.07, rotation 0 -90 0

Blank "EngineGroup_5_mass", child of "Rotor_5_blades"
  location (X Y Z) 4.56 8.45278 7.05981, rotation -8 0 0; relative location -0.02 0 -0.07, rotation 0 -90 0

Propeller "Rotor_6_blades"
  location (X Y Z) 18.76 8.45 9.3, rotation -8 90 0
  bounding box size 10.1868 4.09674 0.907178
  Design: Diameter=10 NumBlade=2 Beta34=0 UseBeta34Flag=1 Feather=0 Rotate=90 Precone=0 ReverseFlag=1 FoldAngle=0 PropMode=0 AF=352.964 CLi=0 Chord=0.4873 Solidity=0.310225 ConstructXoC=0.25 FeatherAxisXoC=0.25 FeatherOffsetXoC=0
  cross sections:
    n  RadiusFrac  shape
    0  0.21        airfoil file "BOEING-VERTOL VR-12 AIRFOIL"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 BaseThickChord=0.106373 Chord=2.785 ThickChord=0.106373
    1  0.85        airfoil file "BOEING-VERTOL VR-12 AIRFOIL"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 BaseThickChord=0.106373 Chord=2.22034 ThickChord=0.106373
    2  0.95        airfoil file "SIKORSKY SSC-A09  AIRFOIL"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 BaseThickChord=0.0901604 Chord=2.13211 ThickChord=0.0902
    3  1           airfoil file "SIKORSKY SSC-A09  AIRFOIL"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 BaseThickChord=0.0901604 Chord=2.088 ThickChord=0.0902
  blade curves as in "Rotor_1_blades"

Fuselage "Rotor_6_Hub", child of "Rotor_6_blades"
  location (X Y Z) 18.76 8.53698 9.91892, rotation -8 90 0; relative location -0.625 0 0, rotation 0 0 0
  bounding box size 2.25 2.37284 1.34302
  Design: Length=1
  cross sections:
    n  XLocPercent  YLocPercent  ZLocPercent  shape
    0  0            0            0            point
    1  0.11         0            0            circle Circle_Diameter=2.25
    2  0.5          0            0            as above
    3  0.89         0            0            as above
    4  1            0            0            point

Custom "Rotor_6_disk", child of "Rotor_6_blades"
  location (X Y Z) 18.76 8.45 9.3, rotation -8 90 0; relative location 0 0 0, rotation 0 0 0
  bounding box size 10 9.90268 1.39173
  Design: Diameter=10
  custom script Disk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

Blank "Rotor_6_mass", child of "Rotor_6_blades"
  location (X Y Z) 18.76 8.45 9.3, rotation -8 0 0; relative location 0 0 0, rotation 0 -90 0

Blank "Propulsion_6", child of "Rotor_6_blades"
  location (X Y Z) 18.69 8.45278 9.31981, rotation -8 0 0; relative location -0.02 0 -0.07, rotation 0 -90 0

Blank "EngineGroup_6_mass", child of "Rotor_6_blades"
  location (X Y Z) 18.69 8.45278 9.31981, rotation -8 0 0; relative location -0.02 0 -0.07, rotation 0 -90 0

Propeller "Rotor_7_blades"
  location (X Y Z) 5.07 18.75 6.73, rotation 0 90 0
  bounding box size 10.1868 4.137 0.535717
  Design: Diameter=10 NumBlade=2 Beta34=0 UseBeta34Flag=1 Feather=0 Rotate=90 Precone=0 ReverseFlag=1 FoldAngle=0 PropMode=0 AF=352.964 CLi=0 Chord=0.4873 Solidity=0.310225 ConstructXoC=0.25 FeatherAxisXoC=0.25 FeatherOffsetXoC=0
  cross sections:
    n  RadiusFrac  shape
    0  0.21        airfoil file "BOEING-VERTOL VR-12 AIRFOIL"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 BaseThickChord=0.106373 Chord=2.785 ThickChord=0.106373
    1  0.85        airfoil file "BOEING-VERTOL VR-12 AIRFOIL"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 BaseThickChord=0.106373 Chord=2.22034 ThickChord=0.106373
    2  0.95        airfoil file "SIKORSKY SSC-A09  AIRFOIL"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 BaseThickChord=0.0901604 Chord=2.13211 ThickChord=0.0902
    3  1           airfoil file "SIKORSKY SSC-A09  AIRFOIL"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 BaseThickChord=0.0901604 Chord=2.088 ThickChord=0.0902
  blade curves as in "Rotor_1_blades"

Fuselage "Rotor_7_Hub", child of "Rotor_7_blades"
  location (X Y Z) 5.07 18.75 7.355, rotation 0 90 0; relative location -0.625 0 0, rotation 0 0 0
  bounding box size 2.25 2.25 1.04
  Design: Length=1
  cross sections:
    n  XLocPercent  YLocPercent  ZLocPercent  shape
    0  0            0            0            point
    1  0.11         0            0            circle Circle_Diameter=2.25
    2  0.5          0            0            as above
    3  0.89         0            0            as above
    4  1            0            0            point

Custom "Rotor_7_disk", child of "Rotor_7_blades"
  location (X Y Z) 5.07 18.75 6.73, rotation 0 90 0; relative location 0 0 0, rotation 0 0 0
  bounding box size 10 10 0
  Design: Diameter=10
  custom script Disk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

Blank "Rotor_7_mass", child of "Rotor_7_blades"
  location (X Y Z) 5.07 18.75 6.73, rotation 0 0 0; relative location 0 0 0, rotation 0 -90 0

Blank "Propulsion_7", child of "Rotor_7_blades"
  location (X Y Z) 5 18.75 6.75, rotation 0 0 0; relative location -0.02 0 -0.07, rotation 0 -90 0

Blank "EngineGroup_7_mass", child of "Rotor_7_blades"
  location (X Y Z) 5 18.75 6.75, rotation 0 0 0; relative location -0.02 0 -0.07, rotation 0 -90 0

Propeller "Rotor_8_blades"
  location (X Y Z) 19.2 18.75 9.01, rotation 0 90 0
  bounding box size 10.1868 4.137 0.535717
  Design: Diameter=10 NumBlade=2 Beta34=0 UseBeta34Flag=1 Feather=0 Rotate=90 Precone=0 ReverseFlag=0 FoldAngle=0 PropMode=0 AF=352.964 CLi=0 Chord=0.4873 Solidity=0.310225 ConstructXoC=0.25 FeatherAxisXoC=0.25 FeatherOffsetXoC=0
  cross sections:
    n  RadiusFrac  shape
    0  0.21        airfoil file "BOEING-VERTOL VR-12 AIRFOIL"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 BaseThickChord=0.106373 Chord=2.785 ThickChord=0.106373
    1  0.85        airfoil file "BOEING-VERTOL VR-12 AIRFOIL"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 BaseThickChord=0.106373 Chord=2.22034 ThickChord=0.106373
    2  0.95        airfoil file "SIKORSKY SSC-A09  AIRFOIL"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 BaseThickChord=0.0901604 Chord=2.13211 ThickChord=0.0902
    3  1           airfoil file "SIKORSKY SSC-A09  AIRFOIL"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 BaseThickChord=0.0901604 Chord=2.088 ThickChord=0.0902
  blade curves as in "Rotor_1_blades"

Fuselage "Rotor_8_Hub", child of "Rotor_8_blades"
  location (X Y Z) 19.2 18.75 9.635, rotation 0 90 0; relative location -0.625 0 0, rotation 0 0 0
  bounding box size 2.25 2.25 1.04
  Design: Length=1
  cross sections:
    n  XLocPercent  YLocPercent  ZLocPercent  shape
    0  0            0            0            point
    1  0.11         0            0            circle Circle_Diameter=2.25
    2  0.5          0            0            as above
    3  0.89         0            0            as above
    4  1            0            0            point

Custom "Rotor_8_disk", child of "Rotor_8_blades"
  location (X Y Z) 19.2 18.75 9.01, rotation 0 90 0; relative location 0 0 0, rotation 0 0 0
  bounding box size 10 10 0
  Design: Diameter=10
  custom script Disk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

Blank "Rotor_8_mass", child of "Rotor_8_blades"
  location (X Y Z) 19.2 18.75 9.01, rotation 0 0 0; relative location 0 0 0, rotation 0 -90 0

Blank "Propulsion_8", child of "Rotor_8_blades"
  location (X Y Z) 19.13 18.75 9.03, rotation 0 0 0; relative location -0.02 0 -0.07, rotation 0 -90 0

Blank "EngineGroup_8_mass", child of "Rotor_8_blades"
  location (X Y Z) 19.13 18.75 9.03, rotation 0 0 0; relative location -0.02 0 -0.07, rotation 0 -90 0

Propeller "Rotor_9_blades"
  location (X Y Z) 31.94 0 7.79, rotation 0 0 0
  bounding box size 0.813661 9.15366 9.0711
  Design: Diameter=9 NumBlade=6 Beta34=0 UseBeta34Flag=1 Feather=-0.42 Rotate=0 Precone=0 ReverseFlag=0 FoldAngle=0 PropMode=0 AF=322.402 CLi=0.538476 Chord=0.44505 Solidity=0.849983 ConstructXoC=0.25 FeatherAxisXoC=0.25 FeatherOffsetXoC=0
  cross sections:
    n  RadiusFrac  shape
    0  0.21        airfoil file "BOEING-VERTOL VR-12 AIRFOIL"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 BaseThickChord=0.106373 Chord=2.2887 ThickChord=0.1064
    1  0.85        airfoil file "BOEING-VERTOL VR-12 AIRFOIL"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 BaseThickChord=0.106373 Chord=1.82535 ThickChord=0.1064
    2  0.95        airfoil file "SIKORSKY SSC-A09  AIRFOIL"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 BaseThickChord=0.0901604 Chord=1.75295 ThickChord=0.0902
    3  1           airfoil file "SIKORSKY SSC-A09  AIRFOIL"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 BaseThickChord=0.0901604 Chord=1.71675 ThickChord=0.0902
  Chord along r/R (linear): 0.21: 0.5086, 1: 0.3815
  Twist along r/R (linear): 0.21: 19.32, 1: -8.33
  Thick along r/R (linear): 0.21: 0.1064, 0.85: 0.1064, 0.95: 0.0902, 1: 0.0902
  CLI along r/R (cubic Bezier): 0.21: 0, 0.273333: 0.7, 0.336667: 0.7, 0.4: 0.7, 0.466667: 0.7, 0.533333: 0.7, 0.6: 0.7, 0.733333: 0.7, 0.866667: 0.7, 1: 0.2

Fuselage "Rotor_9_Hub", child of "Rotor_9_blades"
  location (X Y Z) 31.625 0 7.79, rotation 0 0 0; relative location -0.315 0 0, rotation 0 0 0
  bounding box size 1.03333 1.5 1.5
  Design: Length=1
  cross sections:
    n  XLocPercent  YLocPercent  ZLocPercent  shape
    0  0            0            0            point
    1  0.125        0            0            circle Circle_Diameter=1.5
    2  0.6          0            0            as above
    3  1            0            0            point

Custom "Rotor-9-disk", child of "Rotor_9_blades"
  location (X Y Z) 31.94 0 7.79, rotation 0 0 0; relative location 0 0 0, rotation 0 0 0
  bounding box size 0 9 9
  Design: Diameter=9
  custom script Disk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

Advanced link "BladePitch"
  input Pitch75R = (not in this file)
  output Pitch1 = (not in this file)
  output Pitch2 = (not in this file)
  output Pitch3 = (not in this file)
    Pitch1 = Pitch75R;
    Pitch2 = Pitch75R;
    Pitch3 = Pitch75R;
