OpenVSP model (file version 5), 5 components.
Geometry view with OpenVSP parameter names; values to 6 digits, angles in degrees, lengths in the model's unit.
Overall bounding box: X_Min=-14.7131 X_Len=26.3674 Y_Min=-6.11651 Y_Len=12.2623 Z_Min=-3.10199 Z_Len=4.21733

Wing "Htail"
  location (X Y Z) 7.56334 0 0, rotation 0 0 0
  symmetric about XZ
  bounding box size 4.57132 5.44914 0.409328
  totals: TotalSpan=5.44914 TotalProjectedSpan=5.44914 TotalChord=2.83415 TotalArea=15.4436 TotalAR=1.92267
  root: chord 4.09091, twist 0, NACA 4-series Camber=0 CamberLoc=0.2 ThickChord=0.1
  sections:
    n  Span     Root_Chord  Tip_Chord  Area     Sweep  Sweep_Location  Dihedral  Twist  Twist_Location  tip airfoil
    1  2.72457  4.09091     1.57738    7.72182  -10    0               0         0      0.25            as above

Wing "Vtail"
  location (X Y Z) 5.84203 -0.5 0, rotation -90 0 0
  bounding box size 4.67937 0.409328 3.10199
  totals: TotalSpan=3.10199 TotalProjectedSpan=3.10199 TotalChord=2.83415 TotalArea=8.7915 TotalAR=1.09451
  root: chord 4.09091, twist 0, NACA 4-series Camber=0 CamberLoc=0.2 ThickChord=0.1
  sections:
    n  Span     Root_Chord  Tip_Chord  Area    Sweep  Sweep_Location  Dihedral  Twist  Twist_Location  tip airfoil
    1  3.10199  4.09091     1.57738    8.7915  45     0               0         0      0.25            as above

Blank "BlankGeom"
  location (X Y Z) 0 0 0, rotation -1.34328 0 0

Wing "Wing", child of "BlankGeom"
  location (X Y Z) 0 0.00960761 0.409723, rotation -0.0984065 0 0; relative location 0 0 0.409836, rotation 1.24488 0 0
  symmetric about XZ
  bounding box size 5.32355 12.2623 0.562746
  totals: TotalSpan=12.2727 TotalProjectedSpan=12.2696 TotalChord=1.97511 TotalArea=24.24 TotalAR=6.21057
  root: chord 2.46212, twist 0, NACA 4-series Camber=0 CamberLoc=0.2 ThickChord=0.075
  sections:
    n  Span     Root_Chord  Tip_Chord  Area   Sweep  Sweep_Location  Dihedral  Twist  Twist_Location  tip airfoil
    1  6.13636  2.46212     1.4881     12.12  -25    0               1.28571   0      0.25            as above

Stack "Fuse"
  location (X Y Z) -14.7131 0 -0.491803, rotation 0 0 0
  bounding box size 26.0987 3.58018 2.97595
  cross sections:
    n  XDelta   YDelta  ZDelta    shape
    0  0        0       0         point
    1  4.68421  0       0         edit curve Width=3.44898 Height=3.21429 AbsoluteFlag=0 SymType=1 cubic Bezier points (X Y): 0.5 0.121265, 0.5 -0.00661448, 0.454414 -0.18741, 0.367808 -0.359387, 0.269178 -0.350568, 0.162329 -0.354977, 0 -0.350568, -0.162329 -0.354977, -0.269178 -0.350568, -0.367808 -0.359387, -0.454414 -0.18741, -0.5 -0.00661448, -0.5 0.121265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
    2  14.2039  0       0         edit curve Width=3.44898 Height=3.21429 AbsoluteFlag=0 SymType=1 cubic Bezier points (X Y): 0.5 0, 0.5 -0.13458, 0.446715 -0.256813, 0.360109 -0.35, 0.269129 -0.35, 0.141377 -0.35, 0 -0.35, -0.141377 -0.35, -0.269129 -0.35, -0.360109 -0.35, -0.446715 -0.256813, -0.5 -0.13458, -0.5 0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
    3  7.21053  0       0.592105  point
