OpenVSP model (file version 4), 4 components.
Geometry view with OpenVSP parameter names; values to 6 digits, angles in degrees, lengths in the model's unit.
Overall bounding box: X_Min=0 X_Len=18.2101 Y_Min=-22.1398 Y_Len=44.2795 Z_Min=-1.09545 Z_Len=2.99946

Fuselage "Fuselage"
  location (X Y Z) 0 0 0, rotation 0 0 0
  bounding box size 15.5909 2.12891 2.10605
  Design: Length=15.5909
  cross sections:
    n  XLocPercent  YLocPercent  ZLocPercent   shape
    0  0            0            -0.0108842    point
    1  0.148578     -0.0013587   -0.00272104   ellipse Ellipse_Height=2.10605 Ellipse_Width=2.12891
    2  0.262279     -0.0013587   -0.00272104   as above
    3  0.536005     -0.0013587   -0.00272104   circle Circle_Diameter=0.383462
    4  1            0            -5.90737e-05  as above

Wing "WingMain"
  location (X Y Z) 3.52941 0.378151 -0.136555, rotation 0 0 0
  symmetric about XZ
  bounding box size 2.56891 41.593 0.257598
  totals: TotalSpan=40.8367 TotalProjectedSpan=40.8367 TotalChord=1.94493 TotalArea=79.4243
  root: chord 2.56901, twist 0.542636, NACA 4-series Camber=0 CamberLoc=0.2 ThickChord=0.1
  sections:
    n  Span     Root_Chord  Tip_Chord  Area     Sweep     Sweep_Location  Dihedral  Twist  Twist_Location  tip airfoil
    1  20.4183  2.56901     1.32084    39.7121  0.225806  0               0         -2     0.25            as above

Wing "V-tail"
  location (X Y Z) 12.8782 0 -0.136555, rotation 96.8067 0 0
  symmetric about XZ
  bounding box size 5.33192 8.12932 2.06096
  totals: TotalSpan=8.93758 TotalProjectedSpan=4.97612 TotalChord=2.56393 TotalArea=22.9153
  root: chord 3.43976, twist 0, NACA 4-series Camber=0 CamberLoc=0.2 ThickChord=0.1
  sections:
    n  Span     Root_Chord  Tip_Chord  Area     Sweep    Sweep_Location  Dihedral  Twist  Twist_Location  tip airfoil
    1  4.46879  3.43976     1.6881     11.4577  39.1935  0               56.1678   0      0.25            as above

Wing "Wing_tips"
  location (X Y Z) 3.59244 20.712 -0.157563, rotation 45 0 0
  symmetric about XZ
  bounding box size 1.38243 44.2795 1.46585
  totals: TotalSpan=4.016 TotalProjectedSpan=4.016 TotalChord=0.64956 TotalArea=2.60863
  root: chord 1.07601, twist 0, NACA 4-series Camber=0 CamberLoc=0.2 ThickChord=0.1
  sections:
    n  Span   Root_Chord  Tip_Chord  Area     Sweep  Sweep_Location  Dihedral  Twist  Twist_Location  tip airfoil
    1  2.008  1.07601     0.223111   1.30432  30     0               0         0      0.25            as above
