OpenVSP model (file version 5), 7 components.
Geometry view with OpenVSP parameter names; values to 6 digits, angles in degrees, lengths in the model's unit.
Overall bounding box: X_Min=0 X_Len=32.7273 Y_Min=-18.6578 Y_Len=37.3155 Z_Min=-2.89217 Z_Len=7.29028

Fuselage "FuselageGeom"
  location (X Y Z) 0 0 0, rotation 0 0 0
  bounding box size 32.7273 5.78434 5.78434
  Design: Length=32.7273
  cross sections:
    n  XLocPercent  YLocPercent  ZLocPercent  shape
    0  0            0            0            circle Circle_Diameter=0
    1  0.25         0            0            ellipse Ellipse_Height=3 Ellipse_Width=2.5
    2  0.5          0            0            as above
    3  0.75         0            0            as above
    4  1            0            0            circle Circle_Diameter=0

Wing "WingGeom", child of "FuselageGeom"
  location (X Y Z) 10.7609 0 0, rotation -1.73913 0 0
  symmetric about XZ
  bounding box size 9.63785 37.3155 1.01242
  totals: TotalSpan=37.1672 TotalProjectedSpan=37.1672 TotalChord=4.33627 TotalArea=161.167 TotalAR=8.57122
  root: chord 6.93804, twist 5.36082, NACA 16-series IdealCl=0.2 ThickChord=0.1
  sections:
    n  Span     Root_Chord  Tip_Chord  Area     Sweep    Sweep_Location  Dihedral  Twist  Twist_Location  tip airfoil
    1  18.5836  6.93804     1.73451    80.5835  23.0909  0               0         -8     0.25            NACA 4-series Camber=0 CamberLoc=0.2 ThickChord=0.1

Custom "TransportFuse", child of "WingGeom"
  location (X Y Z) 9.64286 6.90476 -0.714286, rotation -0.952381 2.38095 0
  bounding box size 11.0274 1.00985 1.32899
  Design: AftCenter=0.3 AftHeight=0.3 AftMult=3 AftWidth=0.1 Diameter=1 Length=11.0004 NoseCenter=-0.2 NoseMult=1.5
  custom script TransportFuse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

Custom "TransportFuse", child of "TransportFuse"
  location (X Y Z) 9.63 -6.905 -0.47619, rotation 0.952 2.381 0
  bounding box size 10.0278 1.00904 1.28051
  Design: AftCenter=0.3 AftHeight=0.3 AftMult=3 AftWidth=0.1 Diameter=1 Length=10 NoseCenter=-0.2 NoseMult=1.5
  custom script TransportFuse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

Conformal "ConformalGeom", child of "FuselageGeom"
  location (X Y Z) 0 0 0, rotation 0 0 0
  bounding box size 32.4644 5.5275 5.5275
  Design: ChordTrimFlag=0 ChordTrimMax=0.9 ChordTrimMin=0.1 Offset=0.1 UTrimFlag=0 UTrimMax=0.9 UTrimMin=0.1 V1TrimBegin=0.3 V1TrimEnd=1 V1TrimFlag=0 V2TrimBegin=0.25 V2TrimEnd=0.75 V2TrimFlag=0

Wing "WingGeom"
  location (X Y Z) 23.3696 0 0, rotation 27.7174 0 0
  symmetric about XZ
  bounding box size 6.40447 16.6199 4.57526
  totals: TotalSpan=18.7216 TotalProjectedSpan=18.7216 TotalChord=2.5 TotalArea=46.8041 TotalAR=7.48866
  root: chord 4, twist 0, NACA 4-series Camber=0 CamberLoc=0.2 ThickChord=0.1
  sections:
    n  Span     Root_Chord  Tip_Chord  Area     Sweep  Sweep_Location  Dihedral  Twist  Twist_Location  tip airfoil
    1  9.36082  4           1          23.4021  30     0               0         0      0.25            as above

Propeller "PropGeom", child of "WingGeom"
  location (X Y Z) 31.8 0 0, rotation 0 0 0
  bounding box size 0.298182 4.71162 5.39129
  Design: Diameter=6 NumBlade=3 Beta34=20 UseBeta34Flag=1 Feather=0 Rotate=0 Precone=0 ReverseFlag=0 FoldAngle=0 PropMode=0 AF=151.538 CLi=0.538798 Chord=0.177656 Solidity=0.169649 ConstructXoC=0.5 FeatherAxisXoC=0.5 FeatherOffsetXoC=0
  cross sections:
    n  RadiusFrac  shape
    0  0.2         ellipse Ellipse_Height=0.12 Ellipse_Width=0.24
    1  0.4         NACA 16-series Chord=0.49875 IdealCl=0.7 ThickChord=0.144074
    2  1           NACA 16-series Chord=0.39 IdealCl=0.2 ThickChord=0.03
  Chord along r/R (cubic Bezier): 0.2: 0.08, 0.333333: 0.15, 0.466667: 0.2, 0.6: 0.2, 0.716667: 0.2, 0.833333: 0.2, 0.95: 0.2, 0.966667: 0.2, 0.983333: 0.2, 1: 0.13
  Twist along r/R (PCHIP): 0.2: 46.75, 0.75: 20, 1: 13
  Thick along r/R (cubic Bezier): 0.2: 0.5, 0.233333: 0.3, 0.266667: 0.225, 0.3: 0.2, 0.4: 0.125, 0.5: 0.115, 0.6: 0.1, 0.733333: 0.075, 0.866667: 0.055, 1: 0.03
  CLI along r/R (cubic Bezier): 0.2: 0, 0.266667: 0.7, 0.333333: 0.7, 0.4: 0.7, 0.466667: 0.7, 0.533333: 0.7, 0.6: 0.7, 0.733333: 0.7, 0.866667: 0.7, 1: 0.2
