OpenVSP model (file version 5), 14 components.
Geometry view with OpenVSP parameter names; values to 6 digits, angles in degrees, lengths in the model's unit.
Overall bounding box: X_Min=-10.8172 X_Len=31.0972 Y_Min=-20.0116 Y_Len=37.144 Z_Min=-6.65912 Z_Len=10.5151

Fuselage "Fuselage_***.main"
  location (X Y Z) -9 0 -3.5234, rotation 0 0 0
  bounding box size 30.4909 5.98475 6.38336
  Design: Length=29.28
  cross sections:
    n  XLocPercent  YLocPercent  ZLocPercent  shape
    0  0            0            -0.037       ellipse Ellipse_Height=2.82 Ellipse_Width=3.05
    1  0.166667     0            0.00352083   general fuselage BotStr=1.25605 BotTanAngle=90 CornerRad=0 Height=6.2 LowStr=1.03977 MaxWidthLoc=0 TopStr=0.83 TopTanAngle=90 UpStr=0.83 Width=5.8
    2  0.409722     0            0.00675      general fuselage BotStr=1.23109 BotTanAngle=90 CornerRad=0 Height=6.1 LowStr=0.998182 MaxWidthLoc=0 TopStr=0.83 TopTanAngle=90 UpStr=0.83 Width=5.8
    3  0.565972     0            0.0525833    rounded rectangle RoundRectXSec_Radius=1.5 RoundedRect_Height=3.06 RoundedRect_Width=3.9
    4  0.991319     0            0.08175      ellipse Ellipse_Height=0.52 Ellipse_Width=0.52
    5  1            0            0.0827917    point
  SS_Rectangle "Left door": Center_U=0.425 Center_W=0.5 U_Length=0.095 W_Length=0.201087
  SS_Rectangle "Left windscreen": Center_U=0.2375 Center_W=0.625 U_Length=0.135 W_Length=0.217391
  SS_Rectangle "Right windscreen": Center_U=0.2375 Center_W=0.875 U_Length=0.135 W_Length=0.2147
  SS_Rectangle "Left chin window": Center_U=0.207 Center_W=0.413043 U_Length=0.082 W_Length=0.141304
  SS_Rectangle "Right chin window": Center_U=0.207 Center_W=0.0869565 U_Length=0.082 W_Length=0.143

Pod "Fuselage_***.fairing", child of "Fuselage_***.main"
  location (X Y Z) -3.7619 0 -0.7234, rotation 0 0 0; relative location 5.2381 0 2.8, rotation 0 0 0
  bounding box size 9.33333 2.51685 2.51685
  Design: FineRatio=7.41667 Length=9.33333

Wing "geom_strake", child of "Fuselage_***.main"
  location (X Y Z) -2.39391 2.68261 -6.55435, rotation 105 0 0; relative location 6.60609 2.68261 -3.03095, rotation 105 0 0
  symmetric about XZ
  bounding box size 5.04818 5.41382 0.616744
  totals: TotalSpan=1.25 TotalProjectedSpan=1.25 TotalChord=5 TotalArea=6.25 TotalAR=0.25
  root: chord 4.9935, twist 0, NACA 4-series Camber=0 CamberLoc=0.2 ThickChord=0.01
  sections:
    n  Span   Root_Chord  Tip_Chord  Area   Sweep  Sweep_Location  Dihedral  Twist  Twist_Location  tip airfoil
    1  0.625  4.9935      5.0065     3.125  -5     0               0         0      0.25            as above

Wing "Tail_1_156.tails12", child of "Fuselage_***.main"
  location (X Y Z) 17.78 0 -1.12826, rotation 0 0 0; relative location 26.78 0 2.39514, rotation 0 0 0
  symmetric about XZ
  bounding box size 1.79151 6.06218 1.93035
  totals: TotalSpan=7 TotalProjectedSpan=6.06218 TotalChord=1.76738 TotalArea=12.3717 TotalAR=2.9705
  root: chord 1.76738, twist 0, NACA 4-series Camber=0 CamberLoc=0.2 ThickChord=0.12
  sections:
    n  Span  Root_Chord  Tip_Chord  Area     Sweep  Sweep_Location  Dihedral  Twist  Twist_Location  tip airfoil
    1  3.5   1.76738     1.76738    6.18583  9      0               -30       0      0.25            NACA 4-series Camber=0 CamberLoc=0.2 Scale=0.7 ThickChord=0.12

Custom "FuelTank_1", child of "Fuselage_***.main"
  location (X Y Z) 3.25619 0 -4.26398, rotation 0 0 0; relative location 12.2562 0 -0.740575, rotation 0 0 0
  bounding box size 2 3.55 1
  Design: Height=1 Length=2 SquareFlag=0 Width=3.55
  custom script Box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

Wing "Wing_1"
  location (X Y Z) -0.306 0 0, rotation 0 0 0
  symmetric about XZ
  bounding box size 1.22023 18.3368 0.988342
  totals: TotalSpan=18.362 TotalProjectedSpan=18.3368 TotalChord=1.224 TotalArea=22.4751 TotalAR=14.9605
  root: chord 1.224, twist 10, NACA 4-series Camber=0.0197419 CamberLoc=0.2 ThickChord=0.4
  sections:
    n  Span   Root_Chord  Tip_Chord  Area     Sweep  Sweep_Location  Dihedral  Twist  Twist_Location  tip airfoil
    1  9.181  1.224       1.224      11.2375  0      0               3         5      0.25            NACA 4-series Camber=0.018 CamberLoc=0.2 ThickChord=0.4

Propeller "Rotor_1_blades", child of "Wing_1"
  location (X Y Z) 0 9.181 3.24, rotation 0 87 0
  bounding box size 15.881 15.9028 0.885616
  Design: Diameter=21.602 NumBlade=4 Beta34=0 UseBeta34Flag=1 Feather=0 Rotate=-45 Precone=0 ReverseFlag=0 FoldAngle=0 PropMode=0 AF=75.2911 CLi=0.614704 Chord=0.0996572 Solidity=0.126887 ConstructXoC=0.25 FeatherAxisXoC=0.25 FeatherOffsetXoC=0
  cross sections:
    n  RadiusFrac  shape
    0  0.16        airfoil file "BOEING-VERTOL VR-12 AIRFOIL"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 BaseThickChord=0.106373 Chord=1.09198 ThickChord=0.1064
    1  0.85        as above
    2  0.95        airfoil file "SIKORSKY SSC-A09  AIRFOIL"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 BaseThickChord=0.0901604 Chord=1.01925 ThickChord=0.0902
    3  0.95        as above
    4  1           airfoil file "SIKORSKY SSC-A09  AIRFOIL"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 BaseThickChord=0.0901604 Chord=0.655621 ThickChord=0.0902
  Chord along r/R (linear): 0.16: 0.1011, 0.94: 0.1011, 1: 0.0607
  Twist along r/R (linear): 0.16: 9.44, 1: -4
  Sweep along r/R (linear): 0.16: 0, 0.94: 0, 1: 0.262
  Thick along r/R (linear): 0.16: 0.1064, 0.85: 0.1064, 0.95: 0.0902, 1: 0.0902
  CLI along r/R (linear): 0.16: 0.615689, 0.45: 0.615689, 0.7: 0.615689, 1: 0.615689

Fuselage "Rotor_1_hub", child of "Rotor_1_blades"
  location (X Y Z) -0.0314016 9.181 3.83918, rotation 0 87 0; relative location -0.6 0 0, rotation 0 0 0
  bounding box size 2.75757 2.75 1.23199
  Design: Length=1.2
  cross sections:
    n  XLocPercent  YLocPercent  ZLocPercent  shape
    0  0            0            0            point
    1  0.25         0            0            circle Circle_Diameter=2.5
    2  0.5          0            0            circle Circle_Diameter=2.75
    3  0.75         0            0            circle Circle_Diameter=2.5
    4  1            0            0            point

Propeller "Rotor_2_blades", child of "Wing_1"
  location (X Y Z) 0 -9.181 3.24, rotation 0 87 0
  bounding box size 21.6332 21.6612 1.20037
  Design: Diameter=21.602 NumBlade=4 Beta34=0 UseBeta34Flag=1 Feather=0 Rotate=0 Precone=0 ReverseFlag=1 FoldAngle=0 PropMode=0 AF=75.2911 CLi=0.614704 Chord=0.0996572 Solidity=0.126887 ConstructXoC=0.25 FeatherAxisXoC=0.25 FeatherOffsetXoC=0
  cross sections:
    n  RadiusFrac  shape
    0  0.16        airfoil file "BOEING-VERTOL VR-12 AIRFOIL"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 BaseThickChord=0.106373 Chord=1.09198 ThickChord=0.1064
    1  0.85        as above
    2  0.85        as above
    3  0.95        airfoil file "SIKORSKY SSC-A09  AIRFOIL"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 BaseThickChord=0.0901604 Chord=1.01925 ThickChord=0.0902
    4  1           airfoil file "SIKORSKY SSC-A09  AIRFOIL"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 BaseThickChord=0.0901604 Chord=0.655621 ThickChord=0.0902
  blade curves as in "Rotor_1_blades"

Fuselage "Rotor_2_hub", child of "Rotor_2_blades"
  location (X Y Z) -0.0314016 -9.181 3.83918, rotation 0 87 0; relative location -0.6 0 0, rotation 0 0 0
  bounding box size 2.75757 2.75 1.23199
  Design: Length=1.2
  cross sections:
    n  XLocPercent  YLocPercent  ZLocPercent  shape
    0  0            0            0            point
    1  0.25         0            0            circle Circle_Diameter=2.5
    2  0.5          0            0            circle Circle_Diameter=2.75
    3  0.75         0            0            circle Circle_Diameter=2.5
    4  1            0            0            point

Fuselage "Rotor_1_cowling"
  location (X Y Z) -3.34783 9.01666 0.83913, rotation 0 0 0
  bounding box size 6 3.15354 2.04955
  Design: Length=6
  cross sections:
    n  XLocPercent  YLocPercent  ZLocPercent  shape
    0  0            -0.0326083   0            point
    1  0.386869     -0.0326087   0            ellipse Ellipse_Height=2 Ellipse_Width=2
    2  0.560145     0.0477317    0            ellipse Ellipse_Height=2 Ellipse_Width=3
    3  1            0.0217383    0            ellipse Ellipse_Height=1.7 Ellipse_Width=2.5
    4  1            0.0217391    0            point

Fuselage "EngineGroup_1"
  location (X Y Z) -0.326087 9.451 0.835, rotation 0 0 0
  bounding box size 3 1.673 1.673
  Design: Length=3
  cross sections:
    n  XLocPercent  YLocPercent  ZLocPercent  shape
    0  0            0            0            circle Circle_Diameter=1.62
    1  0.5          0            0            circle Circle_Diameter=1.673
    2  1            0            0            as above

Fuselage "EngineGroup_2"
  location (X Y Z) -0.326 -9.45135 0.835, rotation 0 0 0
  bounding box size 3 1.673 1.673
  Design: Length=3
  cross sections:
    n  XLocPercent  YLocPercent  ZLocPercent  shape
    0  0            0            0            circle Circle_Diameter=1.62
    1  0.5          0            0            circle Circle_Diameter=1.673
    2  1            0            0            as above

Fuselage "Rotor_2_cowling"
  location (X Y Z) -3.348 -9.017 0.839, rotation 180 0 0
  bounding box size 6 3.15354 2.04955
  Design: Length=6
  cross sections:
    n  XLocPercent  YLocPercent  ZLocPercent  shape
    0  0            -0.0326083   0            point
    1  0.386869     -0.0326087   0            ellipse Ellipse_Height=2 Ellipse_Width=2
    2  0.560145     0.0477317    0            ellipse Ellipse_Height=2 Ellipse_Width=3
    3  1            0.0217383    0            ellipse Ellipse_Height=1.7 Ellipse_Width=2.5
    4  1            0.0217391    0            point

VSPAERO settings: Sref=49.5 bref=22 cref=2.25 Xcg=9.04452 Ycg=-0.0104482 Zcg=2.09208 AlphaStart=1 AlphaEnd=10 AlphaNpts=3 BetaStart=0 BetaEnd=0 BetaNpts=1 MachStart=0 MachEnd=0 MachNpts=1 ReCref=1e+07 Vinf=100 Rho=0.002377
