OpenVSP model (file version 5), 7 components.
Geometry view with OpenVSP parameter names; values to 6 digits, angles in degrees, lengths in the model's unit.
Overall bounding box: X_Min=-30 X_Len=266.904 Y_Min=-164.818 Y_Len=329.637 Z_Min=-24.5963 Z_Len=64.5963

Fuselage "FuselageGeom"
  location (X Y Z) -15 0 0, rotation 0 0 0
  bounding box size 250 64.2334 52.373
  Design: Length=250
  cross sections:
    n  XLocPercent  YLocPercent  ZLocPercent  shape
    0  0            0            0.01         general fuselage BotStr=1.25 BotTanAngle=90 CornerRad=0 Height=12.5 LowStr=0.25 MaxWidthLoc=0 TopStr=1.75 TopTanAngle=90 UpStr=0.75 Width=30
    1  0.038        0            0            general fuselage BotStr=0.95 BotTanAngle=90 CornerRad=0 Height=21 LowStr=1.08 MaxWidthLoc=0.2 TopStr=1.55 TopTanAngle=90 UpStr=0.75 Width=40.5
    2  0.189        0            -0.01        general fuselage BotStr=1.6 BotTanAngle=90 CornerRad=0 Height=30.5 LowStr=0.825 MaxWidthLoc=0.0373134 TopStr=1.35 TopTanAngle=75.25 UpStr=0.975 Width=52.5
    3  0.3          0            0            general fuselage BotStr=1.35 BotTanAngle=90 CornerRad=0 Height=47.5 LowStr=0.65 MaxWidthLoc=-0.165672 TopStr=1.5 TopTanAngle=90 UpStr=1.3 Width=62.5
    4  0.448        0            -0.004       general fuselage BotStr=0.8 BotTanAngle=90 CornerRad=0 Height=44 LowStr=1 MaxWidthLoc=-0.0298507 TopStr=1.75 TopTanAngle=90 UpStr=0.25 Width=55.5
    5  0.54         0            -0.004       general fuselage BotStr=1.425 BotTanAngle=90 CornerRad=0 Height=31 LowStr=0.5 MaxWidthLoc=0.03 TopStr=1.55 TopTanAngle=90 UpStr=0.5 Width=45.5
    6  1            0            -0.022       super ellipse Super_Height=9 Super_M=5 Super_MaxWidthLoc=0 Super_N=2 Super_Width=2

Fuselage "Spinner", child of "FuselageGeom"
  location (X Y Z) -30 0 2.5, rotation 0 0 0
  bounding box size 15 12.5 12.5
  Design: Length=15
  cross sections:
    n  XLocPercent  YLocPercent  ZLocPercent  shape
    0  0            0            0            point
    1  1            0            0            circle Circle_Diameter=12.5

Fuselage "UL520IS"
  location (X Y Z) 0 0 0, rotation 0 0 0
  bounding box size 28.4 29 18.6
  Design: Length=28.4
  cross sections:
    n  XLocPercent  YLocPercent  ZLocPercent  shape
    0  0            0            0            super ellipse Super_Height=18.6 Super_M=5 Super_MaxWidthLoc=0 Super_N=2 Super_Width=29
    1  1            0            0            as above

Human "HumanGeom"
  location (X Y Z) 75 -15 -5, rotation 0 35 0
  symmetric about XZ
  mass: Density=0.0392479 Shell_Flag=0 Mass_Area=1 Mass_Prior=0
  Anthropometric: Age=30 AutoDensity=1 BMI=23.1104 BMI_pct=0.156871 GenderFlag=0 LenUnit=3 Mass=180 MassUnit=3 SitFrac=0.51 Stature=74 Stature_pct=0.947797 Volume=4586.23

Wing "Wing"
  location (X Y Z) 45 0 -17.5, rotation 0 0 0
  symmetric about XZ
  bounding box size 70 329.637 12.8114
  totals: TotalSpan=330 TotalProjectedSpan=329.637 TotalChord=50.625 TotalArea=14831.2 TotalAR=7.32645
  root: chord 70, twist 0, NACA 4-series Camber=0 CamberLoc=0.2 ThickChord=0.14
  sections:
    n  Span   Root_Chord  Tip_Chord  Area     Sweep  Sweep_Location  Dihedral  Twist  Twist_Location  tip airfoil
    1  32.5   70          50         1950     9.5    0               0         0      0.25            as above
    2  132.5  50          32.5       5465.62  0      0               3         0      0.25            NACA 4-series Camber=0 CamberLoc=0.2 ThickChord=0.06
  SS_Control "F0": UStart=0.5 UEnd=0.625 Length_C_Start=0.25 Length_C_End=0.25 Length_Start=12.5 Length_End=10.3125 LE_Flag=0 Surf_Type=2
  SS_Control "A0": UStart=0.625 UEnd=0.725 Length_C_Start=0.3 Length_C_End=0.3 Length_Start=12.375 Length_End=10.275 LE_Flag=0 Surf_Type=2

Wing "HT"
  location (X Y Z) 200 0 2.5, rotation 0 0 0
  symmetric about XZ
  bounding box size 25 80 2.50145
  totals: TotalSpan=80 TotalProjectedSpan=80 TotalChord=22.5 TotalArea=1800 TotalAR=3.55556
  root: chord 25, twist 0, NACA 4-series Camber=0 CamberLoc=0.2 ThickChord=0.1
  sections:
    n  Span  Root_Chord  Tip_Chord  Area  Sweep  Sweep_Location  Dihedral  Twist  Twist_Location  tip airfoil
    1  40    25          20         900   5      0               0         0      0.25            as above
  SS_Control "E0": UStart=0.35 UEnd=0.65 Length_C_Start=0.35 Length_C_End=0.35 Length_Start=8.6625 Length_End=7.0875 LE_Flag=0 Surf_Type=2

Wing "VT"
  location (X Y Z) 110 0 -10, rotation 90 0 0
  bounding box size 126.904 12.5073 50
  totals: TotalSpan=50 TotalProjectedSpan=50 TotalChord=57.5 TotalArea=2875 TotalAR=0.869565
  root: chord 125, twist 0, NACA 4-series Camber=0 CamberLoc=0.2 ThickChord=0.1
  sections:
    n  Span  Root_Chord  Tip_Chord  Area    Sweep  Sweep_Location  Dihedral  Twist  Twist_Location  tip airfoil
    1  25    125         40         2062.5  73.5   0               0         0      0.25            as above
    2  25    40          25         812.5   35     0               0         0      0.25            as above
  SS_Control "R0": UStart=0.5 UEnd=0.725 Length_C_Start=0.2 Length_C_End=0.2 Length_Start=8 Length_End=5.3 LE_Flag=0 Surf_Type=2
  SS_Control "R1": UStart=0.3 UEnd=0.5 Length_C_Start=0.075 Length_C_End=0.2 Length_Start=8.1 Length_End=8 LE_Flag=0 Surf_Type=2
