OpenVSP model (file version 4), 19 components.
Geometry view with OpenVSP parameter names; values to 6 digits, angles in degrees, lengths in the model's unit.
Overall bounding box: X_Min=-0.87 X_Len=2.11984 Y_Min=-1.4 Y_Len=2.8 Z_Min=-0.42 Z_Len=0.61

Wing "MainWing"
  location (X Y Z) -0.15 0 0, rotation 0 3.4 0
  symmetric about XZ
  bounding box size 0.379408 2.8 0.0576727
  totals: TotalSpan=2.8 TotalProjectedSpan=2.8 TotalChord=0.3475 TotalArea=0.934
  root: chord 0.38, twist 0, NACA 4-series Camber=0.0356 CamberLoc=0.4 ThickChord=0.15
  sections:
    n  Span  Root_Chord  Tip_Chord  Area   Sweep  Sweep_Location  Dihedral  Twist  Twist_Location  tip airfoil
    1  0.4   0.38        0.38       0.152  0      0               0         0      0.25            as above
    2  1     0.38        0.25       0.315  3      0               0         0      0.25            as above

Wing "HTail"
  location (X Y Z) 0.95 0 -0.03, rotation 0 2 0
  symmetric about XZ
  bounding box size 0.214879 0.7 0.0264394
  totals: TotalSpan=0.7 TotalProjectedSpan=0.7 TotalChord=0.215 TotalArea=0.1505
  root: chord 0.215, twist 0, NACA 4-series Camber=0 CamberLoc=0.2 ThickChord=0.12
  sections:
    n  Span  Root_Chord  Tip_Chord  Area     Sweep  Sweep_Location  Dihedral  Twist  Twist_Location  tip airfoil
    1  0.35  0.215       0.215      0.07525  0      0               0         0      0.25            as above

Fuselage "boom", child of "HTail"
  location (X Y Z) 0.15 0.35 -0.03, rotation 0 0 0
  symmetric about XZ
  bounding box size 0.906667 0.72 0.02
  Design: Length=0.9
  cross sections:
    n  XLocPercent  YLocPercent  ZLocPercent  shape
    0  0            0            0            point
    1  0            0            0            circle Circle_Diameter=0.02
    2  1            0            0            as above
    3  1            0            0            point

Wing "TwinVTail"
  location (X Y Z) 0.95 0.35 -0.03, rotation -90 0 0
  symmetric about XZ
  bounding box size 0.257509 0.726417 0.1
  totals: TotalSpan=0.2 TotalProjectedSpan=0.2 TotalChord=0.115 TotalArea=0.023
  root: chord 0.22, twist 0, NACA 4-series Camber=0 CamberLoc=0.2 ThickChord=0.12
  sections:
    n  Span  Root_Chord  Tip_Chord  Area    Sweep  Sweep_Location  Dihedral  Twist  Twist_Location  tip airfoil
    1  0.1   0.22        0.01       0.0115  68     0               0         0      0.25            as above

Wing "VTail", child of "TwinVTail"
  location (X Y Z) 0.95 0.35 -0.03, rotation 90 0 0
  symmetric about XZ
  bounding box size 0.299839 0.726417 0.22
  totals: TotalSpan=0.44 TotalProjectedSpan=0.44 TotalChord=0.18 TotalArea=0.0792
  root: chord 0.22, twist 0, NACA 4-series Camber=0 CamberLoc=0.2 ThickChord=0.12
  sections:
    n  Span  Root_Chord  Tip_Chord  Area    Sweep  Sweep_Location  Dihedral  Twist  Twist_Location  tip airfoil
    1  0.22  0.22        0.14       0.0396  36     0               0         0      0.25            as above

Fuselage "Fuselage"
  location (X Y Z) -0.87 0 -0.11, rotation 0 0 0
  bounding box size 1.11922 0.22 0.25
  Design: Length=1.1
  cross sections:
    n  XLocPercent  YLocPercent  ZLocPercent  shape
    0  0            0            0            circle Circle_Diameter=0
    1  0.00873556   0            0            circle Circle_Diameter=0.05
    2  0.114384     0            0            circle Circle_Diameter=0.21
    3  0.303676     0            0.0181818    ellipse Ellipse_Height=0.25 Ellipse_Width=0.22
    4  0.650224     0            0.01         general fuselage BotStr=0.83 BotTanAngle=90 CornerRad=0 Height=0.22 LowStr=0.83 MaxWidthLoc=0 TopStr=1.83 TopTanAngle=90 UpStr=0.83 Width=0.2
    5  0.80163      0            0            rounded rectangle RoundRectXSec_Radius=0.02 RoundedRect_Height=0.18 RoundedRect_Width=0.18
    6  0.99         0            0            rounded rectangle RoundRectXSec_Radius=0 RoundedRect_Height=0.18 RoundedRect_Width=0.18
    7  1            0            0            point

Pod "PodGeom", child of "Fuselage"
  location (X Y Z) -0.87 0 -0.11, rotation 0 0 0
  bounding box size 0.5 0.217391 0.217391
  Design: FineRatio=4.6 Length=0.5

Fuselage "VTOLArm"
  location (X Y Z) -0.55 0.4 -0.03, rotation 0 0 0
  symmetric about XZ
  bounding box size 1.11 0.83 0.03
  Design: Length=1.1
  cross sections:
    n  XLocPercent  YLocPercent  ZLocPercent  shape
    0  0            0            0            point
    1  0            0            0            circle Circle_Diameter=0.03
    2  1            0            0            as above
    3  1            0            0            point

Custom "Box", child of "VTOLArm"
  location (X Y Z) 0.5 0.4 -0.03, rotation 0 0 0
  symmetric about XZ, YZ
  bounding box size 1.2 0.85 0.03
  Design: Height=0.03 Length=0.1 SquareFlag=0 Width=0.05
  custom script Box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

Fuselage "VTMotor", child of "VTOLArm"
  location (X Y Z) 0.55 0.4 0.01, rotation 0 90 0
  symmetric about XZ, YZ
  bounding box size 1.1868 0.8868 0.0441667
  Design: Length=0.0265
  cross sections:
    n  XLocPercent  YLocPercent  ZLocPercent  shape
    0  0            0            0            point
    1  0            0            0            circle Circle_Diameter=0.0868
    2  1            0            0            as above
    3  1            0            0            point

Disk "VTProp", child of "VTMotor"
  location (X Y Z) 0.55 0.4 0.02, rotation 0 90 0
  symmetric about XZ, YZ
  bounding box size 1.6588 1.3588 0
  Design: Diameter=0.5588
  custom script Disk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

Fuselage "Motor"
  location (X Y Z) 0.23 0 -0.1, rotation 0 0 0
  bounding box size 0.0816667 0.05 0.05
  Design: Length=0.065
  cross sections:
    n  XLocPercent  YLocPercent  ZLocPercent  shape
    0  0            0            0            point
    1  0            0            0            circle Circle_Diameter=0.05
    2  1            0            0            as above
    3  1            0            0            point

Disk "Disk", child of "Motor"
  location (X Y Z) 0.29 0 -0.1, rotation 0 0 0
  bounding box size 0 0.508 0.508
  Design: Diameter=0.508
  custom script Disk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

Fuselage "MainGear"
  location (X Y Z) 0.1 0.08 -0.18, rotation 40 90 0
  symmetric about XZ
  bounding box size 0.03 0.441822 0.221053
  Design: Length=0.25
  cross sections:
    n  XLocPercent  YLocPercent  ZLocPercent  shape
    0  0            0            0            point
    1  0            0            0            super ellipse Super_Height=0.03 Super_M=2 Super_MaxWidthLoc=0 Super_N=2 Super_Width=0.005
    2  0.771739     0            0            rounded rectangle RoundRectXSec_Radius=0.0025 RoundedRect_Height=0.03 RoundedRect_Width=0.005
    3  1            -0.15        0            point

Fuselage "Wheel", child of "MainGear"
  location (X Y Z) 0.1 0.215 -0.37, rotation 0 0 90
  symmetric about XZ
  bounding box size 0.1 0.49 0.1
  Design: Length=0.03
  cross sections:
    n  XLocPercent  YLocPercent  ZLocPercent  shape
    0  0            0            0            point
    1  0.25         0            0            circle Circle_Diameter=0.1
    2  0.75         0            0            as above
    3  1            0            0            point

Fuselage "Axle", child of "MainGear"
  location (X Y Z) 0.1 0.2 -0.37, rotation 0 0 90
  symmetric about XZ
  bounding box size 0.005 0.501667 0.005
  Design: Length=0.05
  cross sections:
    n  XLocPercent  YLocPercent  ZLocPercent  shape
    0  0            0            0            point
    1  0            0            0            circle Circle_Diameter=0.005
    2  1            0            0            as above
    3  1            0            0            point

Fuselage "FrontGear"
  location (X Y Z) -0.6 0 -0.2, rotation 0 90 0
  bounding box size 0.01 0.01 0.208333
  Design: Length=0.205
  cross sections:
    n  XLocPercent  YLocPercent  ZLocPercent  shape
    0  0            0            0            point
    1  0            0            0            circle Circle_Diameter=0.01
    2  1            0            0            as above
    3  1            0            0            point

Fuselage "Wheel", child of "FrontGear"
  location (X Y Z) -0.6 0.01 -0.395, rotation 0 0 90
  symmetric about XZ
  bounding box size 0.05 0.0466667 0.05
  Design: Length=0.01
  cross sections:
    n  XLocPercent  YLocPercent  ZLocPercent  shape
    0  0            0            0            point
    1  0            0            0            circle Circle_Diameter=0.05
    2  1            0            0            as above
    3  1            0            0            point

Fuselage "Axle", child of "FrontGear"
  location (X Y Z) -0.6 -0.02 -0.395, rotation 0 0 90
  bounding box size 0.005 0.0416667 0.005
  Design: Length=0.04
  cross sections:
    n  XLocPercent  YLocPercent  ZLocPercent  shape
    0  0            0            0            point
    1  0            0            0            circle Circle_Diameter=0.005
    2  1            0            0            as above
    3  1            0            0            point
